# Polypropylene granulate (PP); production mix, at plant

Dataset: ILCD process, Partly terminated system
Geography: RER
Reference year: 1999
Valid until: 2009
Classification: Materials production / Plastics
Synonyms: Polypropylene; Polypropene; Propene polymers; Propylene polymers; 1-Propene homopolymer
LCI method principle: Attributional
LCI method approaches: Allocation - element content
Completeness: All relevant flows quantified
Share of supply or production covered: 77 %
Project: PlasticsEurope Eco-Profiles
Generated by: Boustead
Owner: Plastics Europe
Compliance: ILCD Data Network - Entry-level
Review: Dependent internal review by Plastics Europe; Dependent internal review by Boustead
Amounts: no units in this file; such an amount is in the reference unit of its flow, which a separate flow dataset defines
copyright: true
accessRestrictions: The data set can be used free of charge by anybody to perform LCA studies, to distribute it to third parties, to convert it to other formats, to develop own data sets etc. as long as the copyright and license conditions for the ELCD data sets and the ILCD format are met that can be accessed via http://lca.jrc.ec.europa.eu. Please note e.g. that reference must be given to the 'Owner of data set' and to the 'ELCD database' plus version number, when using the data set or parts thereof. Please note also, that any modifications/omissions of the data set results in invalidity of any existing 'Official approval of data set by producer/operator', that the impression must be avoided that this would still be a complete ELCD data set, and that the content of further fields has to be adjusted. For details see the aforementioned copyright and license conditions.

## General comment
Raw data for polymerization and intermediate products are collected by several producers in Europe; the average is calculated by the consultant based on the production capacity of the companies. The LCI result is calculated with background data from the Boustead database.

## Geography
The data set represents the region specific situation, focusing on the main technologies and the region specific characteristics.

## Time period
The data on propylene is based on crackers of 1999. Data on crude oil extraction and refining and on natural gas extraction and processing was collected in 2001. All the calculations were carried out in 2005.

## Technology and included processes
Three main techniques are employed in the production of polyolefins: high pressure technology, solution or slurry processes and gas phase polymerisation. High pressure technology: When monomer is held at high pressures and temperatures above the polymer melting point, the monomer/polymer mixture can act as a polymerisation medium. Initiators and catalysts can be added to this medium. This technology is used only for LDPE and employs pressures up to 300 MPa and temperatures up to 300°C. Solution or slurry processes: Many low molecular weight, saturated hydrocarbons will dissolve polyolefins. If the temperature is higher than the melting point of the polymer and the concentration of the polymer is low, the polymer will remain as a true solution. However, at lower temperatures and higher concentrations, the polymer will form a suspension or mobile slurry. Using solutions or slurries as the polymerisation medium requires relatively low temperatures (70-110°C) and relatively low pressures (1-5 MPa). Gas phase polymerisation: A gas phase reactor is essentially a fluidised bed of dry polymer particles maintained either by stirring or by passing gas at high speeds through it. Pressures are usually relatively low at ~2MPa and temperatures are usually in the range 70-110°C. A variety of different configurations are used mainly to obtain an acceptable particle size and shape in the final product. Gas phase polymerisation is used for HDPE, PP and LLDPE. The background system is addressed as follows:
Electricity:
Electricity used, is modelled according to the individual country-specific situation. Modelling the electricity production system covers the production and delivery of primary fuels, the steam generator, the electricity generator and the distributor.
Electricity is regarded to be derived from the public electricity supply and from on-site electricity generation of plants. Input materials used for producing electricity are fossil fuels, like coal, oil and gas.
Process Steam:
Process steam/thermal energy used, is modelled according to the individual country-specific situation. Process steam is regarded to be derived as by-product from the public electricity supply and from on-site steam generation of plants. Input materials used for producing process steam are fossil fuels, like coal, oil and gas. Another source for process steam are waste incineration plants.
Transport:
All relevant and known transport processes used, are included. Overseas transport to and from major ports as well as all relevant and known pipeline and / or tanker transport of crude oil imports are included.
Energy carriers:
Crude oil is modelled according to the production and supply of crude oil to Western Europe. The crude oil supply is regarded regional. Therefore, interchanges between countries within that region do not count as imports or exports. Oil processing is reckoned as standard worldwide with overall energy production efficiency of the order of 90%. The IEA data on world oil production and processing data have been used for the use of energy. The total inputs have been partitioned between the products using energy as the partitioning parameter. Modelling covers the extraction, the transport and the delivery including emissions arising at the extraction site and reported losses during subsequent distribution of the oil. The transport for indigenous crude oil production is based on the characteristics of North Sea production since this represents 98% of indigenous production. For North Sea oil some 75% is delivered by pipeline with the remainder delivered by tanker.
Coal modelling covers the production, the transport and the delivery.

## Technical purpose
A large proportion of polypropylene is used in fibres as constituents of fabrics, upholstery and carpets. Many industrial uses involve ropes, woven and non-woven fabrics and reinforcements. Blow moulded containers, such as bottles. A wide range of injection moulded items exists in appliance housings, resistant containers, car components, toys and furniture

## Reference product
- polypropylene granulate (PP): 1

## Inputs
- carcass meal: 1.7579e-9
- energy (recovered): -1.90674
- hydrogen: 9.80471e-7
- municipal waste (unspecified): 0.00488244
- air (Resources from air): 0.296533
- baryte (Resources from ground): 3.53265e-8
- bauxite (Resources from ground): 2.15237e-6
- bentonite (Resources from ground): 3.81422e-5
- biomass (Resources from biosphere): 0.0753853
- brown coal (Resources from ground): 0.000152381
- calcium carbonate (Resources from ground): 0.000144391
- chromium (Resources from ground): 6.46356e-13
- clay (Resources from ground): 2.04252e-10
- copper (Resources from ground): 1.29087e-8
- crude oil (Resources from ground): 42.8405
- dolomite (Resources from ground): 2.01633e-6
- feldspar (Resources from ground): 7.81755e-17
- fluorspar (Resources from ground): 3.74714e-7
- granite (Resources from ground): 2.85596e-15
- ground water (Resources from water): 0.0551882
- gypsum (Resources from ground): 3.83738e-6
- hard coal (Resources from ground): 2.27825
- inert rock (Resources from ground): 1.38617e-6
- iron (Resources from ground): 0.000164558
- lead (Resources from ground): 3.32334e-7
- magnesium (Resources from ground): 5.85966e-10
- manganese (Resources from ground): 1.24248e-7
- mercury (Resources from ground): 4.86377e-10
- natural aggregate (Resources from ground): 6.06873e-7
- natural gas (Resources from ground): 21.4842
- nickel (Resources from ground): 1.17249e-9
- nitrogen (Resources from air): 0.0944098
- olivine (Resources from ground): 1.54366e-6
- oxygen (Resources from air): 4.86651e-6
- peat (Resources from ground): 0.00822452
- phosphorus (Resources from ground): 8.76636e-13
- potassium chloride (Resources from ground): 9.69965e-9
- primary energy from geothermics (Resources from ground): 0.0238398
- primary energy from hydro power (Resources from water): 0.294569
- primary energy from solar energy (Resources from air): 8.77388e-5
- primary energy from waves (Resources from water): 0.000488811
- primary energy from wind power (Resources from air): 0.0112757
- quartz sand (Resources from ground): 5.3147e-36
- river water (Resources from water): 3.20299
- sand (Resources from ground): 9.5131e-5
- sea water (Resources from water): 6.02642
- slate (Resources from ground): 1.08643e-5
- sodium chloride (Resources from ground): 0.0002672
- sodium nitrate (Resources from ground): 1.7579e-9
- sulfur (Resources from ground): 3.33131e-5
- talc (Resources from ground): 7.94348e-27
- titanium (Resources from ground): 1.82359e-6
- uranium (Resources from ground): 2.74336
- water (Resources from water): 31.1191
- wood (Resources from biosphere): 1.22859e-5
- zinc (Resources from ground): 6.13945e-5

## Outputs
- chemical waste (unspecified): 0.00191269
- chemical waste, inert (unspecified): 0.000814561
- chemical waste, toxic (unspecified): 0.00170323
- demolition waste (unspecified): 2.19607e-6
- industrial waste (unspecified): 0.00113199
- mineral waste (unspecified): 0.000205438
- municipal waste (unspecified): -0.00460609
- organic waste (unspecified): 1.6851e-6
- overburden (unspecified): 0.0162911
- packaging waste (metal): 3.17164e-8
- packaging waste (plastic): 6.62987e-13
- plastic (unspecified): 0.000340307
- tailings (unspecified): 0.000245832
- waste (unspecified): 0.000931891
- waste paper (unspecified): 2.35282e-9
- wood (unspecified): 2.9822e-8
- wooden pallet (EURO): 5.89215e-10
- 1,2-dichloroethane (Emissions to air): 1.38802e-11
- 1,2-dichloroethane (Emissions to water): 3.16206e-13
- 2,3,7,8-tetrachlorodibenzo-p-dioxin (Emissions to air): 3.75151e-32
- 2,3,7,8-tetrachlorodibenzo-p-dioxin (Emissions to water): 1.22359e-16
- acid (as H+) (Emissions to air): 4.32516e-17
- acid (as H+) (Emissions to water): 2.01459e-6
- adsorbable organic halogen compounds (Emissions to water): 6.93781e-13
- aluminium (Emissions to water): 4.05764e-7
- ammonia (Emissions to air): 1.58174e-10
- ammonia (Emissions to water): 3.38722e-6
- antimony (Emissions to air): 7.96073e-11
- arsenic (Emissions to air): 8.40721e-11
- arsenic (Emissions to water): 1.84575e-10
- benzene (Emissions to air): 3.34853e-18
- benzene (Emissions to water): 6.57861e-22
- biological oxygen demand (Emissions to water): 2.87704e-5
- bromate (Emissions to water): 4.13201e-10
- cadmium (Emissions to air): 8.62283e-11
- cadmium (Emissions to water): 4.35904e-11
- calcium (Emissions to water): 3.64799e-8
- carbon dioxide (Emissions to air): 1.67002
- carbon disulfide (Emissions to air): 1.97786e-11
- carbon monoxide (Emissions to air): 0.00610104
- carbonate (Emissions to water): 2.8348e-5
- chemical oxygen demand (Emissions to water): 0.000240465
- chlorate (Emissions to water): 6.77367e-8
- chloride (Emissions to water): 0.000152803
- chlorine (Emissions to air): 3.70597e-10
- chlorine (Emissions to water): 8.0335e-10
- chromium (Emissions to air): 3.82877e-10
- chromium (Emissions to water): 4.92929e-12
- copper (Emissions to air): 8.89735e-12
- copper (Emissions to water): 1.02974e-8
- cyanide (Emissions to water): 1.55997e-11
- decane (Emissions to water): 1.3887e-5
- dichloromethane (Emissions to air): 9.23998e-13
- ethyl benzene (Emissions to air): 1.96568e-19
- ethylene (Emissions to air): 1.65794e-6
- fluoride (Emissions to water): 3.59409e-9
- fluorine (Emissions to air): 3.22798e-11
- hydrocarbons (unspecified) (Emissions to water): 5.10829e-6
- hydrocyanic acid (Emissions to air): 6.21184e-19
- hydrogen (Emissions to air): 3.01575e-5
- hydrogen chloride (Emissions to air): 5.1316e-5
- hydrogen fluoride (Emissions to air): 1.49402e-6
- hydrogen sulfide (Emissions to air): 5.52275e-9
- iron (Emissions to water): 1.80508e-8
- lead (Emissions to air): 1.98576e-9
- lead (Emissions to water): 3.82831e-10
- manganese (Emissions to water): 6.27562e-10
- mercury (Emissions to air): 1.79759e-9
- mercury (Emissions to water): 1.69831e-10
- methane (Emissions to air): 0.011832
- nickel (Emissions to air): 8.72896e-14
- nickel (Emissions to water): 2.57529e-10
- nitrate (Emissions to water): 0.000119815
- nitrogen (Emissions to water): 8.77406e-7
- nitrogen dioxide (Emissions to air): 0.00328681
- nitrous oxide (Emissions to air): 4.82328e-13
- non-methane volatile organic compounds (Emissions to air): 0.00351334
- oxygen (Emissions to air): 7.97957e-24
- particles (> PM10) (Emissions to water): 8.64326e-5
- particles (PM10) (Emissions to air): 0.000595486
- particles (PM10) (Emissions to water): 8.7473e-6
- particles (PM2.5) (Emissions to air): 3.89526e-15
- phenol (Emissions to water): 1.99219e-6
- phosphate (Emissions to water): 0.000537367
- polycyclic aromatic hydrocarbons (Emissions to air): 1.3551e-18
- potassium (Emissions to water): 1.17514e-9
- propene (Emissions to air): 1.2281e-6
- selenium (Emissions to air): 1.00504e-25
- silver (Emissions to air): 2.90199e-24
- sodium (Emissions to water): 8.11121e-5
- strontium (Emissions to water): 7.14858e-12
- styrene (Emissions to air): 2.7641e-20
- sulfate (Emissions to water): 0.000930217
- sulfur (Emissions to water): 3.48885e-13
- sulfur dioxide (Emissions to air): 0.00378433
- tin (Emissions to water): 1.52796e-16
- toluene (Emissions to air): 5.60791e-19
- total organic carbon (Emissions to water): 8.94023e-6
- vinyl chloride (Emissions to air): 3.11252e-10
- vinyl chloride (Emissions to water): 5.77602e-12
- volatile organic compound (Emissions to air): 0.000178735
- volatile organic compound (Emissions to water): 1.05965e-5
- xylene (all isomers) (Emissions to air): 2.5923e-19
- zinc (Emissions to air): 4.86367e-9
- zinc (Emissions to water): 9.69492e-8

## Deviations from the LCI method approaches
Propylene: Cracker - Mass allocation

## Modelling constants
All data used in the calculation of the LCI results refer to net calorific value.

## Cut-off and completeness
All relevant mass and energy flows are included in the inventory; no specific cut-off rule is applied.

## Deviations from cut-off and completeness
It is unusually to receive questionnaires completed in all respects. In such cases data are extrapolated.

## Data selection and combination
Full coverage of the European industry, modelling the integrated sites as far as possible.

## Deviations from data selection and combination
Many industrial sites contain a large number of different plants and therefore it is usual that certain services are provided from some central source. That is the case of the provision of steam and compressed air, and the treatment of water. In this case the attribution of these central services is a matter of estimating and guesswork. Frequently the information is not held by the companies in a form that is directly usable in eco-profile calculations. For example, air and water emission are normally expressed as concentrations (kg/m3) whereas eco-profiles want the total annual loading (kg/year). Companies can often make the conversion using internal conversion factors, but there is no standarisation of these factors across Europe. Besides, issues such as weighing errors, materials in transit, stock changes and so on, make it difficult to maintain absolutely accurate records.

## Data treatment and extrapolations
Missing data are substituted by the average value calculated from the data supplied by those plants that made positive returns. Thus, for example, suppose that three plants with the same output volume fill in questionnaires. For one of the parameters, one plant returns a value of 1 mg, the second plant returns a value of 2 mg and the third is unable to provide the data. The average from the two plants returning data is 1.5 mg and this value is substituted in place of the missing data for the third plant.

## Annual supply or production volume
Data have been obtained for the production of 5,69 million tonnes of PP. This represents 76,9% of all West European production.

## Sampling procedure
The data are collected from participating companies for the performance characteristics of their plants through questionnaires. Most of the information supplied is derived from the records that are already kept by companies and plants.

## Use advice
The LCI data set should be used for LCI/ LCA studies where PP resin is used along the production chain, e.g. injection molding, of a product.

## Data sources
- Boustead Model
- Ecoprofile PP

## Intended applications
Provide well documented, high quality, up-to-date and industry representative LCI data sets for any kind of LCA study. In order to elaborate the reports, some objectives shall be defined: target generic data which could be used to optimise the management of plastics waste (facilitates choosing among options such as mechanical recycling, reuse as a petrochemical raw material and use as a substitute fuel, and provide sufficient data to investigate alternative solutions for regulatory compliance), compile average industry data which could be used for internal company benchmarking allowing individual process improvement (leading to elimination of poor sections of processes, improvements by addition of waste treatment sections), include sufficient data which could be used by customers for product development against environmental criteria to (allow evaluation of the plastics contribution relative to the overall product, enable collaboration with recovery procedures to reduce collective impacts, draw attention to poor environmental links in user chains, which can lead to subsequent improvement). It was also important to provide neutral, objective, quantitative information with no attempt at interpretation, so that only explanations on how the data were generated need be given.
