# Polyvinylchloride resin (S-PVC); suspension polymerisation; production mix, at plant

Dataset: ILCD process, Partly terminated system
Geography: RER
Reference year: 1998
Valid until: 2008
Classification: Materials production / Plastics
Synonyms: PVC, Polyvinyl Chloride Latex, Vinyl Chloride Polymer, Chloroethene Homopolymer
LCI method principle: Attributional
LCI method approaches: Allocation - element content
Completeness: All relevant flows quantified
Share of supply or production covered: 95 %
Project: PlasticsEurope Eco-Profiles
Generated by: Boustead
Owner: Plastics Europe
Compliance: ILCD Data Network - Entry-level
Review: Dependent internal review by Plastics Europe; Dependent internal review by Boustead
Amounts: no units in this file; such an amount is in the reference unit of its flow, which a separate flow dataset defines
copyright: true
accessRestrictions: The data set can be used free of charge by anybody to perform LCA studies, to distribute it to third parties, to convert it to other formats, to develop own data sets etc. as long as the copyright and license conditions for the ELCD data sets and the ILCD format are met that can be accessed via http://lca.jrc.ec.europa.eu. Please note e.g. that reference must be given to the 'Owner of data set' and to the 'ELCD database' plus version number, when using the data set or parts thereof. Please note also, that any modifications/omissions of the data set results in invalidity of any existing 'Official approval of data set by producer/operator', that the impression must be avoided that this would still be a complete ELCD data set, and that the content of further fields has to be adjusted. For details see the aforementioned copyright and license conditions.

## General comment
Raw data for polymerization and intermediate products are collected by several producers in Europe; the average is calculated by the consultant based on the production capacity of the companies. The LCI result is calculated with background data from the Boustead database. Suspension PVC accounts for more than 80% of the PVC market. In practice the polymer used in production contains stabilisers and fillers/pigments (rigid PVC). The soft PVC also contains plasticises.

## Geography
The data set represents the region specific situation, focusing on the main technologies and the region specific characteristics.

## Time period
The data corresponding to the vinyl chloride production (VCM) and suspension polymerisation were collected in 1998. Data on crude oil extraction and refining and on natural gas extraction and processing was collected in 2001. All the calculations were carried out in 2005.

## Technology and included processes
Suspension polymerisation: Liquid vinyl chloride is insoluble in water and disperses to fine droplets when mechanically agitated. The droplets remain in suspension as long as the agitation continues. Polymerisation is carried out in pressurised vessels under the influence of heat and initiators and/or catalysts, which are soluble in the water. A typical initiator is an organic peroxide. The reaction is exothermic and the heat evolved is carried to the sides of the reaction vessel by the water. Suspensions agents known as protective colloids are added to the reactor to prevent the monomer droplets coalescing and the polymer particles from agglomerating. When the desired conversion is reached, the batch is transferred to a blow down vassel. Several batches may be transferred to this vassel for blending. Unreacted monomer is recovered and recycled back to the polymerisation reactor. The polymer particles are dried. The background system is addressed as follows:
Electricity:
Electricity used, is modelled according to the individual country-specific situation. Modelling the electricity production system covers the production and delivery of primary fuels, the steam generator, the electricity generator and the distributor.
Electricity is regarded to be derived from the public electricity supply and from on-site electricity generation of plants. Input materials used for producing electricity are fossil fuels, like coal, oil and gas.
Process Steam:
Process steam/thermal energy used, is modelled according to the individual country-specific situation. Process steam is regarded to be derived as by-product from the public electricity supply and from on-site steam generation of plants. Input materials used for producing process steam are fossil fuels, like coal, oil and gas. Another source for process steam are waste incineration plants.
Transport:
All relevant and known transport processes used, are included. Overseas transport to and from major ports as well as all relevant and known pipeline and / or tanker transport of crude oil imports are included.
Energy carriers:
Crude oil is modelled according to the production and supply of crude oil to Western Europe. The crude oil supply is regarded regional. Therefore, interchanges between countries within that region do not count as imports or exports. Oil processing is reckoned as standard worldwide with overall energy production efficiency of the order of 90%. The IEA data on world oil production and processing data have been used for the use of energy. The total inputs have been partitioned between the products using energy as the partitioning parameter. Modelling covers the extraction, the transport and the delivery including emissions arising at the extraction site and reported losses during subsequent distribution of the oil. The transport for indigenous crude oil production is based on the characteristics of North Sea production since this represents 98% of indigenous production. For North Sea oil some 75% is delivered by pipeline with the remainder delivered by tanker.
Coal modelling covers the production, the transport and the delivery.

## Technical purpose
Suspension PVC is the general purpose grade and is used for most rigid PVC applications such as pipes, profiles, other building materials and hard foils. It is also plasticised and used for most flexible applications such as cable insulation, soft foils and medical products.

## Reference product
- polyvinylchloride resin (S-PVC): 1

## Inputs
- carcass meal: 9.09758e-12
- energy (recovered): -0.81836
- hydrogen: 0.00377161
- municipal waste (unspecified): 0.014289
- air (Resources from air): 0.428252
- baryte (Resources from ground): 0.000205836
- bauxite (Resources from ground): 3.899e-6
- bentonite (Resources from ground): 2.49263e-5
- biomass (Resources from biosphere): 0.119969
- brown coal (Resources from ground): 0.00779321
- calcium carbonate (Resources from ground): 0.025306
- chromium (Resources from ground): 4.86657e-12
- clay (Resources from ground): 1.82913e-6
- copper (Resources from ground): 9.64431e-5
- crude oil (Resources from ground): 20.277
- dolomite (Resources from ground): 2.46103e-6
- feldspar (Resources from ground): 4.9288e-17
- fluorspar (Resources from ground): 2.04368e-6
- granite (Resources from ground): 1.89315e-13
- ground water (Resources from water): 0.842363
- gypsum (Resources from ground): 2.54074e-6
- hard coal (Resources from ground): 6.08858
- inert rock (Resources from ground): 1.27866e-8
- iron (Resources from ground): 0.000201131
- lead (Resources from ground): 8.5646e-7
- magnesium (Resources from ground): 1.42579e-22
- manganese (Resources from ground): 1.51613e-7
- mercury (Resources from ground): 2.75072e-6
- natural aggregate (Resources from ground): 7.41996e-7
- natural gas (Resources from ground): 22.7979
- nickel (Resources from ground): 4.20412e-8
- nitrogen (Resources from air): 0.075922
- olivine (Resources from ground): 1.88669e-6
- oxygen (Resources from air): 0.0780051
- peat (Resources from ground): 0.00214686
- phosphorus (Resources from ground): 9.69721e-7
- potassium chloride (Resources from ground): 0.00103416
- primary energy from geothermics (Resources from ground): 0.0487212
- primary energy from hydro power (Resources from water): 0.813756
- primary energy from solar energy (Resources from air): 0.000439372
- primary energy from waves (Resources from water): 0.00100807
- primary energy from wind power (Resources from air): 0.0333907
- quartz sand (Resources from ground): 9.82667e-22
- river water (Resources from water): 36.0395
- sand (Resources from ground): 0.000555532
- sea water (Resources from water): 5.80047
- slate (Resources from ground): 7.19335e-6
- sodium chloride (Resources from ground): 1.01651
- sodium nitrate (Resources from ground): 4.28286e-22
- sulfur (Resources from ground): -0.00041678
- talc (Resources from ground): 1.78692e-26
- titanium (Resources from ground): 2.24387e-31
- uranium (Resources from ground): 6.03893
- water (Resources from water): 20.2907
- wood (Resources from biosphere): 0.0178912
- zinc (Resources from ground): 5.72987e-8

## Outputs
- chemical waste (unspecified): 0.00421163
- chemical waste, inert (unspecified): 0.00485031
- chemical waste, toxic (unspecified): 0.00332208
- demolition waste (unspecified): 9.03478e-5
- industrial waste (unspecified): -0.00104378
- mineral waste (unspecified): 0.00797788
- municipal waste (unspecified): -0.0134799
- organic waste (unspecified): 1.00921e-7
- overburden (unspecified): 0.0507399
- packaging waste (metal): 3.62777e-9
- packaging waste (plastic): 5.00168e-12
- plastic (unspecified): 0.000633376
- tailings (unspecified): 0.00383966
- waste (unspecified): 0.00113217
- waste paper (unspecified): 3.77392e-10
- wood (unspecified): 4.34803e-5
- wooden pallet (EURO): 2.44513e-11
- 1,2-dichloroethane (Emissions to air): 4.81876e-5
- 1,2-dichloroethane (Emissions to water): 2.01876e-6
- 2,3,7,8-tetrachlorodibenzo-p-dioxin (Emissions to air): 2.91931e-10
- 2,3,7,8-tetrachlorodibenzo-p-dioxin (Emissions to water): 6.57091e-9
- acid (as H+) (Emissions to air): 7.06148e-16
- acid (as H+) (Emissions to water): 1.36824e-5
- adsorbable organic halogen compounds (Emissions to water): 1.36072e-6
- aluminium (Emissions to water): 2.15452e-7
- ammonia (Emissions to air): 1.20748e-5
- ammonia (Emissions to water): 1.74142e-5
- antimony (Emissions to air): 1.89814e-13
- arsenic (Emissions to air): 4.00845e-9
- arsenic (Emissions to water): 2.60647e-10
- benzene (Emissions to air): 2.18079e-12
- benzene (Emissions to water): 6.17916e-14
- biological oxygen demand (Emissions to water): 0.00012588
- bromate (Emissions to water): 4.13833e-7
- cadmium (Emissions to air): 1.19449e-9
- cadmium (Emissions to water): 5.41622e-12
- calcium (Emissions to water): 0.000345424
- carbon dioxide (Emissions to air): 2.12757
- carbon disulfide (Emissions to air): 2.45789e-9
- carbon monoxide (Emissions to air): 0.00261477
- carbonate (Emissions to water): 0.000770723
- chemical oxygen demand (Emissions to water): 0.0133308
- chlorate (Emissions to water): 0.000240031
- chloride (Emissions to water): 0.0460949
- chlorine (Emissions to air): 0.000124394
- chlorine (Emissions to water): 3.1673e-6
- chromium (Emissions to air): 1.33746e-7
- chromium (Emissions to water): 2.21076e-12
- copper (Emissions to air): 3.0778e-8
- copper (Emissions to water): 1.59205e-6
- cyanide (Emissions to water): 1.73425e-11
- decane (Emissions to water): 8.22937e-6
- dichloromethane (Emissions to air): 3.11446e-7
- ethyl benzene (Emissions to air): 2.38829e-13
- ethylene (Emissions to air): 1.44533e-5
- fluoride (Emissions to water): 2.23682e-9
- fluorine (Emissions to air): 4.0704e-9
- hydrocarbons (unspecified) (Emissions to water): 3.08033e-6
- hydrocyanic acid (Emissions to air): 3.91644e-19
- hydrogen (Emissions to air): 0.00435308
- hydrogen chloride (Emissions to air): 0.000152088
- hydrogen fluoride (Emissions to air): 3.58422e-6
- hydrogen sulfide (Emissions to air): 6.29974e-9
- iron (Emissions to water): 4.65181e-7
- lead (Emissions to air): 1.18853e-7
- lead (Emissions to water): 6.6188e-9
- manganese (Emissions to water): 1.99442e-11
- mercury (Emissions to air): 3.16112e-7
- mercury (Emissions to water): 2.17991e-8
- methane (Emissions to air): 0.0232413
- nickel (Emissions to air): 1.83296e-7
- nickel (Emissions to water): 1.05651e-6
- nitrate (Emissions to water): 6.11815e-6
- nitrogen (Emissions to water): 1.41197e-5
- nitrogen dioxide (Emissions to air): 0.00478082
- nitrous oxide (Emissions to air): 1.56054e-12
- non-methane volatile organic compounds (Emissions to air): 0.0018048
- oxygen (Emissions to air): 1.41877e-6
- particles (> PM10) (Emissions to water): 0.0064366
- particles (PM10) (Emissions to air): 0.00121472
- particles (PM10) (Emissions to water): 3.9982e-5
- particles (PM2.5) (Emissions to air): 4.77582e-11
- phenol (Emissions to water): 5.2114e-7
- phosphate (Emissions to water): 0.000175993
- polycyclic aromatic hydrocarbons (Emissions to air): 1.27309e-12
- potassium (Emissions to water): 3.25167e-5
- propene (Emissions to air): 8.01479e-7
- selenium (Emissions to air): 1.09867e-11
- silver (Emissions to air): 5.27381e-10
- sodium (Emissions to water): 0.0469021
- strontium (Emissions to water): 5.42789e-8
- styrene (Emissions to air): 1.24049e-14
- sulfate (Emissions to water): 0.00331877
- sulfur (Emissions to water): 8.95739e-8
- sulfur dioxide (Emissions to air): 0.00764453
- tin (Emissions to water): 9.52772e-9
- toluene (Emissions to air): 4.26528e-13
- total organic carbon (Emissions to water): 1.12882e-5
- vinyl chloride (Emissions to air): 7.80885e-5
- vinyl chloride (Emissions to water): 9.52749e-6
- volatile organic compound (Emissions to air): 0.000112508
- volatile organic compound (Emissions to water): 0.000176605
- xylene (all isomers) (Emissions to air): 2.0445e-13
- zinc (Emissions to air): 1.19403e-8
- zinc (Emissions to water): 7.5967e-8

## Deviations from the LCI method approaches
Chlorine cell: The steam input to the chlorine cell has been partitioned across all products on a simple mass basis. Any HCl input to the chlorine cell electrolyte will be completely dissociated and will therefore provide an additional source of chloride ions in the electrolyte. It has therefore has been attributed to the production of chlorine. Any NaOH input to the chlorine cell has been attributed solely to the production of NaOH on the assumption that it will be recovered along with the NaOH generated within the electrolytic process. An input of 98% sulphuric acid is used for chlorine drying and so has all been attributed to the chlorine output. Hydrogen emissions from the chlorine cell refer to the losses of hydrogen to the atmosphere. These emissions have therefore all been attributed to the production of hydrogen. Chlorine gas emissions from the chlorine cell refer to the loss of chlorine to the atmosphere. These emissions have therefore all been attributed to the production of chlorine. The electricity use in the chlorine cell is partitioned over all marketable or usable products on a simple mass basis. Those water emissions associated with NaCl and its purification have been attributed to chlorine, sodium hydroxide and, where appropriate, sodium hypochlorite and hydrogen chloride on the basis of the quantities of sodium chloride attributed to each of these products. Water emissions, which could not be directly attributed to sodium chloride, e.g. mercury emissions, were partitioned between the products on a simple mass basis.

## Modelling constants
All data used in the calculation of the LCI results refer to net calorific value.

## Cut-off and completeness
All relevant mass and energy flows are included in the inventory; no specific cut-off rule is applied.

## Deviations from cut-off and completeness
It is unusually to receive questionnaires completed in all respects. In such cases data are extrapolated.

## Data selection and combination
Full coverage of the European industry, modelling the integrated sites as far as possible.

## Deviations from data selection and combination
Many industrial sites contain a large number of different plants and therefore it is usual that certain services are provided from some central source. That is the case of the provision of steam and compressed air, and the treatment of water. In this case the attribution of these central services is a matter of estimating and guesswork. Frequently the information is not held by the companies in a form that is directly usable in eco-profile calculations. For example, air and water emission are normally expressed as concentrations (kg/m3) whereas eco-profiles want the total annual loading (kg/year). Companies can often make the conversion using internal conversion factors, but there is no standarisation of these factors across Europe. Besides, issues such as weighing errors, materials in transit, stock changes and so on, make it difficult to maintain absolutely accurate records.

## Data treatment and extrapolations
Missing data are substituted by the average value calculated from the data supplied by those plants that made positive returns. Thus, for example, suppose that three plants with the same output volume fill in questionnaires. For one of the parameters, one plant returns a value of 1 mg, the second plant returns a value of 2 mg and the third is unable to provide the data. The average from the two plants returning data is 1.5 mg and this value is substituted in place of the missing data for the third plant.

## Sampling procedure
The data are collected from participating companies for the performance characteristics of their plants through questionnaires. Most of the information supplied is derived from the records that are already kept by companies and plants.

## Use advice
The LCI data set should be used for LCI/ LCA studies where suspension PVC is used along the production chain, e.g. sheet calendaring, pipe extrusion, film extrusion or injection moulding, for a product.

## Data sources
- Ecoprofile S-PVC
- Ecoprofile Chlorine
- Ecoprofile Ethylene
- Boustead Model

## Intended applications
Provide well documented, high quality, up-to-date and industry representative LCI data sets for any kind of LCA study. In order to elaborate the reports, some objectives shall be defined: target generic data which could be used to optimise the management of plastics waste (facilitates choosing among options such as mechanical recycling, reuse as a petrochemical raw material and use as a substitute fuel, and provide sufficient data to investigate alternative solutions for regulatory compliance), compile average industry data which could be used for internal company benchmarking allowing individual process improvement (leading to elimination of poor sections of processes, improvements by addition of waste treatment sections), include sufficient data which could be used by customers for product development against environmental criteria to (allow evaluation of the plastics contribution relative to the overall product, enable collaboration with recovery procedures to reduce collective impacts, draw attention to poor environmental links in user chains, which can lead to subsequent improvement). It was also important to provide neutral, objective, quantitative information with no attempt at interpretation, so that only explanations on how the data were generated need be given.
