# Plane; technology mix, cargo; 68 t payload

Dataset: ILCD process, Unit process, single operation
Geography: GLO
Reference year: 2000
Valid until: 2009
Classification: Transport services / Air
LCI method principle: Attributional
Completeness: All relevant flows quantified
Share of supply or production covered: 95 %
Method details: GaBi Modelling Principles
Generated by: PE INTERNATIONAL; LBP-GaBi
Owner: PE INTERNATIONAL
Compliance: ILCD Data Network - Entry-level
Review: Dependent internal review by PE INTERNATIONAL, LBP-GaBi, Ecobilan
Amounts: no units in this file; such an amount is in the reference unit of its flow, which a separate flow dataset defines
copyright: true
accessRestrictions: The data set can be used free of charge by anybody to perform LCA studies, to distribute it to third parties, to convert it to other formats, to develop own data sets etc. as long as the copyright and license conditions for the ELCD data sets and the ILCD format are met that can be accessed via http://lca.jrc.ec.europa.eu. Please note e.g. that reference must be given to the 'Owner of data set' and to the 'ELCD database' plus version number, when using the data set or parts thereof. Please note also, that any modifications/omissions of the data set results in invalidity of any existing 'Official approval of data set by producer/operator', that the impression must be avoided that this would still be a complete ELCD data set, and that the content of further fields has to be adjusted. For details see the aforementioned copyright and license conditions.

## General comment
The data set represents the applied technology with a good overall data quality. The inventory is based on industry and literature data.

## Geography
The data set is representative for the mentioned region.

## Time period
Average

## Technology and included processes
Plane for cargo with 68t pay load capacity. Variable parameters (with default setting) are: distance (1000km). Inputs: Kerosene and cargo. Outputs: cargo and combustion emissions (carbon dioxide, carbon monoxide, methane, nitrogen oxides, NMVOC, sulphur dioxide). Plane production, end-of-life treatment of the plane and the fuel supply chain (emissions of exploration, refinery, transportation etc.) are not included in the data set.

## Technical purpose
Transport of packaged goods with a payload of up to 68 t for long distance transport (airway).

## Model description
The emission profile as well as the fuel consumption is calculated according to the settings of the variable parameters as described in the technology description. The calculation formulas of the single variables are given in the section variable / parameter.

## Parameters
- Auslast: 0.57
  [-] average utilisation ratio (57%)
- Distanz: 10000
  [km] distance start - destination (min. 200 km)
- Nutzlast: 67.9442; = if(Distanz<600;15.1;if(Distanz>10000;68;0.5397*Distanz^0.525))
  [t] max. loading
- Spez_Verbr: 2.68132; = Verbrauch/(Nutzlast*Auslast*1000)
  [kg] Kerosene per kg cargo
- Verbrauch: 103843; = (3.6*75.773*Distanz^-0.3435*Distanz*Auslast*Nutzlast/43)
  [kg] Kerosene total consumption

## Reference product
- cargo: 1

## Inputs
- cargo: 1
- kerosene: 2.68132; = Spez_Verbr; calculated

## Outputs
All rows: calculated
- carbon dioxide (Emissions to air): 8.45687; = 3.154 * Spez_Verbr
- carbon monoxide (Emissions to air): 0.00273909; = 0.00102155 * Spez_Verbr
- methane (Emissions to air): 7.60422e-6; = 2.836e-6 * Spez_Verbr
- nitrogen dioxide (Emissions to air): 0.0437618; = 0.016321 * Spez_Verbr
- nitrous oxide (Emissions to air): 0.000268132; = 0.0001 * Spez_Verbr
- non-methane volatile organic compounds (Emissions to air): 0.000226357; = 8.442e-5 * Spez_Verbr
- particles (PM2.5) (Emissions to air): 0.000536264; = 0.0002 * Spez_Verbr
- sulfur dioxide (Emissions to air): 0.000134066; = 5e-5 * Spez_Verbr

## Modelling constants
All data used in the calculation of the LCI results refer to net calorific value.

## Cut-off and completeness
Cut-off rules for each unit process: Coverage of at least 95 % of mass and energy of the input and output flows, and 98 % of their environmental relevance (according to expert judgement).

## Deviations from cut-off and completeness
Manufacturing and EoL of the plane is not included.

## Data selection and combination
Data sources for the transport system are sufficiently consistent, emission factors are based on average European conditions (key emissions are based on measured operating data). LCI modelling is fully consistent.

## Data treatment and extrapolations
Several data sources have been averaged. Measured data from representative transport systems have been upscaled.

## Data collection period
2007

## Use advice
The data set should be used for LCI/LCA studies where packaged goods have to be transported via airway. The data set allows individual settings of the variable parameters. The following parameter is variable (default setting): distance (1000 km). Default value of the variable parameter has to be checked and adjusted for individual use. The data set does not include the fuel supply route. Therefore the fuel supply data set (kerosene) has to be linked with this data set. Plane production and end-of-life treatment are not part of the data set (negligible from a LCA point of view).

## Review details
Inventory: The internal review was done by several iteration steps concerning raw data validation, raw data documentation, representativity, completeness and consistency of modelling with regard to ISO 14040 and 14044.; Documentation: The review of the documentation was performed by Ecobilan and is in compliance with ISO 14040 and 14044. The data set documentation is correct in view of the appropriateness of the information provided. It includes all relevant information in view of data quality and scope of application of the respective LCI result.

## Data sources
- Spezif. Energieeinsatz im Verkehr, Ermittlung und Vergleich der spezif. Energieverbräuche, 1990
- GaBi databases 2006

## Intended applications
This background LCI data set can be used for any types of LCA studies.
