# Polymethyl methacrylate (PMMA) beads; production mix, at plant

Dataset: ILCD process, Partly terminated system
Geography: RER
Reference year: 1996
Valid until: 2006
Classification: Materials production / Plastics
Synonyms: Poly(methyl) methacrylate, methyl methacrylate resin
LCI method principle: Attributional
LCI method approaches: Allocation - element content
Completeness: All relevant flows quantified
Share of supply or production covered: 95 %
Project: PlasticsEurope Eco-Profiles
Generated by: Boustead
Owner: Plastics Europe
Compliance: ILCD Data Network - Entry-level
Review: Dependent internal review by Plastics Europe; Dependent internal review by Boustead
Amounts: no units in this file; such an amount is in the reference unit of its flow, which a separate flow dataset defines
copyright: true
accessRestrictions: The data set can be used free of charge by anybody to perform LCA studies, to distribute it to third parties, to convert it to other formats, to develop own data sets etc. as long as the copyright and license conditions for the ELCD data sets and the ILCD format are met that can be accessed via http://lca.jrc.ec.europa.eu. Please note e.g. that reference must be given to the 'Owner of data set' and to the 'ELCD database' plus version number, when using the data set or parts thereof. Please note also, that any modifications/omissions of the data set results in invalidity of any existing 'Official approval of data set by producer/operator', that the impression must be avoided that this would still be a complete ELCD data set, and that the content of further fields has to be adjusted. For details see the aforementioned copyright and license conditions.

## General comment
Raw data for polymerization and intermediate products are collected by several producers in Europe; the average is calculated by the consultant based on the production capacity of the companies. The LCI result is calculated with background data from the Boustead database.

## Geography
The data set represents the region specific situation, focusing on the main technologies and the region specific characteristics.

## Time period
The data corresponding to the methacrylate production was collected in 1996. Data on crude oil extraction and refining and on natural gas extraction and processing was collected in 2001. All the calculations were carried out in 2005.

## Technology and included processes
Unlike the polyolefins, the production route for polymethyl methacrylate requires the production of a significant number of intermediates. Essentially the processes produce acetone cyanohydrin which is then converted to methyl methacrylate. The monomer may be polymerised to produce beads which can then be extruded, or the monomer may be directly polymerised as in the production of cast sheet. There are a number of different routes to acetone but the most commonly used is as a by-product in the manufacture of phenol and this route has been used in the present work. Hydrogen cyanide is mainly produced by the reaction of methane (natural gas) with ammonia. A small proportion of hydrogen cyanide, however, is obtained as a by-product from acrylonitrile production. For the purposes of thisprofile, it has been assumed that all hydrogen cyanide is produced from the reaction of methane and ammonia. Acetone is then reacted with hydrogen cyanide to produce acetone cyanohydrin and this is converted to methyl methacrylate in an acid solution of sulphuric acid. The intermediate, methacrylamide sulphate is not isolated but the spent sulphuric acid from the process is recovered and regenerated for further use. The background system is addressed as follows:
Electricity:
Electricity used, is modelled according to the individual country-specific situation. Modelling the electricity production system covers the production and delivery of primary fuels, the steam generator, the electricity generator and the distributor.
Electricity is regarded to be derived from the public electricity supply and from on-site electricity generation of plants. Input materials used for producing electricity are fossil fuels, like coal, oil and gas.
Process Steam:
Process steam/thermal energy used, is modelled according to the individual country-specific situation. Process steam is regarded to be derived as by-product from the public electricity supply and from on-site steam generation of plants. Input materials used for producing process steam are fossil fuels, like coal, oil and gas. Another source for process steam are waste incineration plants.
Transport:
All relevant and known transport processes used, are included. Overseas transport to and from major ports as well as all relevant and known pipeline and / or tanker transport of crude oil imports are included.
Energy carriers:
Crude oil is modelled according to the production and supply of crude oil to Western Europe. The crude oil supply is regarded regional. Therefore, interchanges between countries within that region do not count as imports or exports. Oil processing is reckoned as standard worldwide with overall energy production efficiency of the order of 90%. The IEA data on world oil production and processing data have been used for the use of energy. The total inputs have been partitioned between the products using energy as the partitioning parameter. Modelling covers the extraction, the transport and the delivery including emissions arising at the extraction site and reported losses during subsequent distribution of the oil. The transport for indigenous crude oil production is based on the characteristics of North Sea production since this represents 98% of indigenous production. For North Sea oil some 75% is delivered by pipeline with the remainder delivered by tanker.
Coal modelling covers the production, the transport and the delivery.

## Technical purpose
Its durability, plus its high quality finish, ensures that it is in demand for the longer lasting high quality products, such as baths, sinks and showers. Its mechanical properties of high softening point and high impact strength, when combined with its good weatherability and resistance to most aqueous inorganic reagents, favour its use in external applications. Illuminated signs, glazing and motor vehicle rear lights are only a few of the examples of the use to which it can be put. Because of its optical clarity and stability, PMMA has found uses in the medical field where special grades have long been successfully employed for intra-ocular lenses, contact lenses and implants and film. Besides self-polymerisation, methyl methacrylate (MMA), will polymerise with a range of other materials, yielding co-polymers with properties tailored to specific applications.

## Reference product
- polymethyl methacrylate (PMMA) beads: 1

## Inputs
- carcass meal: 3.59177e-11
- energy (recovered): -17.1753
- hydrogen: 0.000147537
- municipal waste (unspecified): 0.0076623
- air (Resources from air): -0.151404
- baryte (Resources from ground): 7.01777e-5
- bauxite (Resources from ground): 0.000514549
- bentonite (Resources from ground): 4.13591e-5
- biomass (Resources from biosphere): 0.105341
- brown coal (Resources from ground): 6.72235e-5
- calcium carbonate (Resources from ground): 0.00675829
- chromium (Resources from ground): 1.44796e-10
- clay (Resources from ground): 8.01237e-9
- copper (Resources from ground): 1.11306e-6
- crude oil (Resources from ground): 48.6936
- dolomite (Resources from ground): 7.39401e-6
- feldspar (Resources from ground): 7.18068e-15
- fluorspar (Resources from ground): 1.16553e-5
- granite (Resources from ground): 3.53022e-14
- ground water (Resources from water): 0.195011
- gypsum (Resources from ground): 4.09412e-6
- hard coal (Resources from ground): 8.00234
- inert rock (Resources from ground): 3.84287e-8
- iron (Resources from ground): 0.000604464
- lead (Resources from ground): 3.63217e-6
- magnesium (Resources from ground): 2.59733e-16
- manganese (Resources from ground): 4.55654e-7
- mercury (Resources from ground): 3.4664e-8
- natural aggregate (Resources from ground): 2.23002e-6
- natural gas (Resources from ground): 60.046
- nickel (Resources from ground): 1.31902e-10
- nitrogen (Resources from air): 0.108955
- olivine (Resources from ground): 5.67038e-6
- oxygen (Resources from air): 0.130993
- peat (Resources from ground): 0.00117678
- phosphorus (Resources from ground): 0.000841634
- potassium chloride (Resources from ground): 3.64143e-6
- primary energy from geothermics (Resources from ground): 0.0168586
- primary energy from hydro power (Resources from water): 0.479681
- primary energy from solar energy (Resources from air): 0.000722628
- primary energy from waves (Resources from water): 0.000936556
- primary energy from wind power (Resources from air): 0.0461106
- quartz sand (Resources from ground): 1.1032e-23
- river water (Resources from water): 13.7064
- sand (Resources from ground): 0.00332366
- sea water (Resources from water): 4.9119
- slate (Resources from ground): 1.15905e-5
- sodium chloride (Resources from ground): 0.0319913
- sodium nitrate (Resources from ground): 7.80201e-16
- sulfur (Resources from ground): 0.0428265
- talc (Resources from ground): 9.95923e-27
- titanium (Resources from ground): 6.91165e-33
- uranium (Resources from ground): 5.17758
- water (Resources from water): 55.2782
- wood (Resources from biosphere): 0.000810356
- zinc (Resources from ground): 1.33094e-7

## Outputs
- chemical waste (unspecified): 0.0156045
- chemical waste, inert (unspecified): 0.00629107
- chemical waste, toxic (unspecified): 0.00894865
- demolition waste (unspecified): 1.52249e-5
- industrial waste (unspecified): 0.0121346
- mineral waste (unspecified): 0.0032177
- municipal waste (unspecified): -0.00722831
- organic waste (unspecified): 1.05912e-7
- overburden (unspecified): 0.0571808
- packaging waste (metal): 8.94541e-10
- packaging waste (plastic): 7.59799e-12
- plastic (unspecified): 1.86411e-5
- tailings (unspecified): 6.3088e-5
- waste (unspecified): 0.00670524
- waste paper (unspecified): 1.07857e-10
- wood (unspecified): 1.96903e-6
- wooden pallet (EURO): 3.72303e-11
- 1,2-dichloroethane (Emissions to air): 2.98982e-10
- 1,2-dichloroethane (Emissions to water): 5.10967e-12
- 2,3,7,8-tetrachlorodibenzo-p-dioxin (Emissions to air): 1.39188e-30
- 2,3,7,8-tetrachlorodibenzo-p-dioxin (Emissions to water): 2.23192e-13
- acid (as H+) (Emissions to air): 2.09046e-10
- acid (as H+) (Emissions to water): 7.77313e-5
- adsorbable organic halogen compounds (Emissions to water): 1.45235e-11
- aluminium (Emissions to water): 5.38425e-7
- ammonia (Emissions to air): 9.33464e-6
- ammonia (Emissions to water): 0.0011341
- antimony (Emissions to air): 2.37001e-12
- arsenic (Emissions to air): 8.97482e-11
- arsenic (Emissions to water): 2.62556e-10
- benzene (Emissions to air): 5.7721e-6
- benzene (Emissions to water): 1.0406e-12
- biological oxygen demand (Emissions to water): 0.000512014
- bromate (Emissions to water): 3.27352e-9
- cadmium (Emissions to air): 6.43743e-11
- cadmium (Emissions to water): 5.10931e-12
- calcium (Emissions to water): 0.000112991
- carbon dioxide (Emissions to air): 5.85718
- carbon disulfide (Emissions to air): 5.28811e-11
- carbon monoxide (Emissions to air): 0.00553372
- carbonate (Emissions to water): 5.52084e-5
- chemical oxygen demand (Emissions to water): 0.00168913
- chlorate (Emissions to water): 4.45037e-6
- chloride (Emissions to water): 0.00868786
- chlorine (Emissions to air): 4.35035e-7
- chlorine (Emissions to water): 1.35378e-8
- chromium (Emissions to air): 9.51688e-7
- chromium (Emissions to water): 3.47793e-11
- copper (Emissions to air): 1.82735e-9
- copper (Emissions to water): 5.16451e-8
- cyanide (Emissions to water): 3.66421e-6
- decane (Emissions to water): 1.20265e-5
- dichloromethane (Emissions to air): 9.5974e-10
- ethyl benzene (Emissions to air): 3.26032e-7
- ethylene (Emissions to air): 2.8954e-6
- fluoride (Emissions to water): 6.6352e-6
- fluorine (Emissions to air): 7.12543e-9
- hydrocarbons (unspecified) (Emissions to water): 5.44733e-6
- hydrocyanic acid (Emissions to air): 2.80179e-6
- hydrogen (Emissions to air): 0.000114475
- hydrogen chloride (Emissions to air): 0.000159703
- hydrogen fluoride (Emissions to air): 6.87456e-6
- hydrogen sulfide (Emissions to air): 2.0243e-8
- iron (Emissions to water): 3.09071e-8
- lead (Emissions to air): 2.29362e-9
- lead (Emissions to water): 1.82922e-6
- manganese (Emissions to water): 2.27146e-11
- mercury (Emissions to air): 1.70679e-8
- mercury (Emissions to water): 3.25194e-9
- methane (Emissions to air): 0.047663
- nickel (Emissions to air): 1.73009e-6
- nickel (Emissions to water): 3.57075e-8
- nitrate (Emissions to water): 9.47269e-6
- nitrogen (Emissions to water): 1.68424e-6
- nitrogen dioxide (Emissions to air): 0.0123508
- nitrous oxide (Emissions to air): 7.63962e-9
- non-methane volatile organic compounds (Emissions to air): 0.0120521
- oxygen (Emissions to air): 3.27928e-12
- particles (> PM10) (Emissions to water): 0.00168309
- particles (PM10) (Emissions to air): 0.00200375
- particles (PM10) (Emissions to water): 5.82144e-5
- particles (PM2.5) (Emissions to air): 9.55684e-13
- phenol (Emissions to water): 5.12232e-7
- phosphate (Emissions to water): 0.00491652
- polycyclic aromatic hydrocarbons (Emissions to air): 1.73009e-6
- potassium (Emissions to water): 1.14467e-7
- propene (Emissions to air): 2.14469e-6
- selenium (Emissions to air): 2.08621e-13
- silver (Emissions to air): 6.02377e-12
- sodium (Emissions to water): 0.0185258
- strontium (Emissions to water): 4.88588e-10
- styrene (Emissions to air): 5.78024e-8
- sulfate (Emissions to water): 0.0272921
- sulfur (Emissions to water): 1.07942e-9
- sulfur dioxide (Emissions to air): 0.0288749
- tin (Emissions to water): 2.81043e-13
- toluene (Emissions to air): 9.78223e-7
- total organic carbon (Emissions to water): 1.69281e-5
- vinyl chloride (Emissions to air): 3.60589e-9
- vinyl chloride (Emissions to water): 6.61336e-11
- volatile organic compound (Emissions to air): 0.00202425
- volatile organic compound (Emissions to water): 0.00107796
- xylene (all isomers) (Emissions to air): 4.04026e-7
- zinc (Emissions to air): 9.90229e-10
- zinc (Emissions to water): 8.94854e-8

## Modelling constants
All data used in the calculation of the LCI results refer to net calorific value.

## Cut-off and completeness
All relevant mass and energy flows are included in the inventory; no specific cut-off rule is applied.

## Deviations from cut-off and completeness
It is unusually to receive questionnaires completed in all respects. In such cases data are extrapolated.

## Data selection and combination
Full coverage of the European industry, modelling the integrated sites as far as possible.

## Deviations from data selection and combination
Many industrial sites contain a large number of different plants and therefore it is usual that certain services are provided from some central source. That is the case of the provision of steam and compressed air, and the treatment of water. In this case the attribution of these central services is a matter of estimating and guesswork. Frequently the information is not held by the companies in a form that is directly usable in eco-profile calculations. For example, air and water emission are normally expressed as concentrations (kg/m3) whereas eco-profiles want the total annual loading (kg/year). Companies can often make the conversion using internal conversion factors, but there is no standarisation of these factors across Europe. Besides, issues such as weighing errors, materials in transit, stock changes and so on, make it difficult to maintain absolutely accurate records.

## Data treatment and extrapolations
Missing data are substituted by the average value calculated from the data supplied by those plants that made positive returns. Thus, for example, suppose that three plants with the same output volume fill in questionnaires. For one of the parameters, one plant returns a value of 1 mg, the second plant returns a value of 2 mg and the third is unable to provide the data. The average from the two plants returning data is 1.5 mg and this value is substituted in place of the missing data for the third plant.

## Sampling procedure
The data are collected from participating companies for the performance characteristics of their plants through questionnaires. Most of the information supplied is derived from the records that are already kept by companies and plants.

## Use advice
The LCI data set should be used for LCI/ LCA studies where PMMA beads are used along the production chain, e.g. sheet casting and extrusion, of a product, e.g. baths, sinks and showers.

## Data sources
- Boustead Model
- Ecoprofile PMMA

## Intended applications
Provide well documented, high quality, up-to-date and industry representative LCI data sets for any kind of LCA study. In order to elaborate the reports, some objectives shall be defined: target generic data which could be used to optimise the management of plastics waste (facilitates choosing among options such as mechanical recycling, reuse as a petrochemical raw material and use as a substitute fuel, and provide sufficient data to investigate alternative solutions for regulatory compliance), compile average industry data which could be used for internal company benchmarking allowing individual process improvement (leading to elimination of poor sections of processes, improvements by addition of waste treatment sections), include sufficient data which could be used by customers for product development against environmental criteria to (allow evaluation of the plastics contribution relative to the overall product, enable collaboration with recovery procedures to reduce collective impacts, draw attention to poor environmental links in user chains, which can lead to subsequent improvement). It was also important to provide neutral, objective, quantitative information with no attempt at interpretation, so that only explanations on how the data were generated need be given.
