# Compressed air; 14 bar, low efficiency; production mix; high power consumption

Dataset: ILCD process, Unit process, single operation
Geography: GLO
Reference year: 2002
Valid until: 2010
Classification: Energy carriers and technologies / Mechanical energy
LCI method principle: Attributional
Completeness: All relevant flows quantified
Share of supply or production covered: 95 %
Method details: GaBi Modelling Principles
Generated by: PE INTERNATIONAL; LBP-GaBi
Owner: PE INTERNATIONAL
Compliance: ILCD Data Network - Entry-level
Review: Dependent internal review by PE INTERNATIONAL, LBP-GaBi, Ecobilan
Amounts: no units in this file; such an amount is in the reference unit of its flow, which a separate flow dataset defines
copyright: true
accessRestrictions: The data set can be used free of charge by anybody to perform LCA studies, to distribute it to third parties, to convert it to other formats, to develop own data sets etc. as long as the copyright and license conditions for the ELCD data sets and the ILCD format are met that can be accessed via http://lca.jrc.ec.europa.eu. Please note e.g. that reference must be given to the 'Owner of data set' and to the 'ELCD database' plus version number, when using the data set or parts thereof. Please note also, that any modifications/omissions of the data set results in invalidity of any existing 'Official approval of data set by producer/operator', that the impression must be avoided that this would still be a complete ELCD data set, and that the content of further fields has to be adjusted. For details see the aforementioned copyright and license conditions.

## General comment
The data set covers all relevant process steps / technologies with a good overall data quality. The inventory is mainly based on industry data and completed, where necessary, by secondary data.

## Geography
The data set represents the country / region specific situation, focusing on the main technologies and the region specific characteristics.

## Time period
Annual average

## Technology and included processes
The data set describes the production of compressed air. Commonly either screw-type-compressors or piston compressors are used. The electricity consumption of the compression depends mainly on the respective pressure stage. The pressure stages 7 bar, 10 bar and 14 bar, which are usual, are modelled. The power consumption values are based on average industrial data verified with literature data.

## Technical purpose
Compressed air to serve as a utility in many manufacturing operations e.g. industrial maintenance work, on the production line as pneumatic tools, etc.

## Reference product
- compressed air: 1

## Inputs
- electricity: 0.611995

## Cut-off and completeness
Cut-off rules for each unit process: Coverage of at least 95 % of energy of the input and output flows, and 98 % of their environmental relevance (according to expert judgement).

## Data selection and combination
Representative plants were selected to collect data. LCI modelling is fully consistent.

## Data treatment and extrapolations
Several data sources have been averaged.

## Sampling procedure
Energy consumption based on average technology available.

## Data collection period
2004-2005

## Use advice
The LCI data set should be used for LCI/LCA studies where compressed air with 14 bar (low efficiency) is used with high power consumption. The data set does not include the power grid mix process. Therefore the power grid mix data set has to be linked with this data set.

## Review details
Inventory: The internal review was done by several iteration steps concerning raw data validation, raw data documentation, representativity, completeness and consistency of modelling with regard to ISO 14040 and 14044.; Documentation: The review of the documentation was performed by Ecobilan and is in compliance with ISO 14040 and 14044. The data set documentation is correct in view of the appropriateness of the information provided. It includes all relevant information in view of data quality and scope of application of the respective LCI result.

## Data sources
- Druckluft Effizient - Druckluft Abschlussbericht, 2005
- Druckluft Effizient - Druckluft Fakten, 2003
- CompAir Presseinformation - Wirtschaftliche Druckluft-Erzeugung auch ohne Drehzahlregelung, 2004
- CompAir Presseinformation, 2004
- Umwelterklärung Daimler Chrysler - Standort Bremen, 2004
- Erprobung von Contracting in gewerblichen Unternehmen, 2004
- Effiziente Druckluftsysteme für Gewerbe und Industrie, 2005
- Industrial Assessment Center Report - Repair compressed Air Leaks, 2005
- Compressed Air Systems in the European Union, 2001
- Improving Compressed Air System Performance - a sourcebook for industry, 2003
- GaBi databases 2006

## Intended applications
This background LCI data set can be used for any types of LCA studies.
