# Sodium chloride (NaCl, dissolved); production mix for PVC production, at plant

Dataset: ILCD process, Partly terminated system
Geography: RER
Reference year: 1996
Valid until: 2006
Classification: Materials production / Inorganic chemicals
LCI method principle: Attributional
LCI method approaches: Allocation - element content
Completeness: All relevant flows quantified
Share of supply or production covered: 95 %
Project: PlasticsEurope Eco-Profiles
Generated by: Boustead
Owner: Plastics Europe
Compliance: ILCD Data Network - Entry-level
Review: Dependent internal review by Plastics Europe; Dependent internal review by Boustead
Amounts: no units in this file; such an amount is in the reference unit of its flow, which a separate flow dataset defines
copyright: true
accessRestrictions: The data set can be used free of charge by anybody to perform LCA studies, to distribute it to third parties, to convert it to other formats, to develop own data sets etc. as long as the copyright and license conditions for the ELCD data sets and the ILCD format are met that can be accessed via http://lca.jrc.ec.europa.eu. Please note e.g. that reference must be given to the 'Owner of data set' and to the 'ELCD database' plus version number, when using the data set or parts thereof. Please note also, that any modifications/omissions of the data set results in invalidity of any existing 'Official approval of data set by producer/operator', that the impression must be avoided that this would still be a complete ELCD data set, and that the content of further fields has to be adjusted. For details see the aforementioned copyright and license conditions.

## General comment
Raw data for polymerization and intermediate products are collected by several producers in Europe; the average is calculated by the consultant based on the production capacity of the companies. The LCI result is calculated with background data from the Boustead database. The eco-profile data are based on the production of a purified, saturated solution and the data refer to a solution containing 1 kg of sodium chloride.

## Geography
The data set represents the region specific situation, focusing on the main technologies and the region specific characteristics.

## Time period
The data corresponding to the brine production (extraction and purification) were collected in 1994. All the calculations were carried out in 2005.

## Technology and included processes
Raw materials: The primary source of sodium and chlorine is naturally occurring sodium chloride (common salt) and the chlor-alkali industry, based on sodium chloride and, to a lesser extent, potassium chloride, has existed for many thousands of years. Salt can be mined from massive deposits as rock salt or it can be extracted directly as a saturated brine by passing water down a bore-hole into the deposit, allowing the salt to dissolve and then pumping the resulting solution to the surface. A third source, which is available in warmer climates, is from sea water. The sea water is flooded into enclosed ponds which are then sealed and the water allowed to evaporate in the sun - hence the name solar salt. The resulting solid salt can be collected for use. Purification: All sources of salt contain unwanted impurities of which the ions Ca++, Mg++ and SO4-- are usually the most significant. Before use, the salt must be purified, usually by a sequence of precipitation reactions in solution using barium carbonate to remove sulphate ions, sodium carbonate or carbon dioxide to remove calcium ions and sodium hydroxide to remove magnesium ions. Depending on the quality of the brine, other purification processes may also be applied. Some of the salt is separately purified and the water evaporated to produce a solid salt referred to as vacuum salt. Plants that have their own local sources of sodium chloride often produce vacuum salt to resaturate depleted brine streams. Plants that do not have access to a local supply of natural sodium chloride buy in salt, usually as vacuum salt. It should also be noted that sodium chloride is used in many industries production and so most vacuum salt manufacturers produce salt for the open market. The background system is addressed as follows:
Electricity:
Electricity used, is modelled according to the individual country-specific situation. Modelling the electricity production system covers the production and delivery of primary fuels, the steam generator, the electricity generator and the distributor.
Electricity is regarded to be derived from the public electricity supply and from on-site electricity generation of plants. Input materials used for producing electricity are fossil fuels, like coal, oil and gas.
Process Steam:
Process steam/thermal energy used, is modelled according to the individual country-specific situation. Process steam is regarded to be derived as by-product from the public electricity supply and from on-site steam generation of plants. Input materials used for producing process steam are fossil fuels, like coal, oil and gas. Another source for process steam are waste incineration plants.
Transport:
All relevant and known transport processes used, are included. Overseas transport to and from major ports as well as all relevant and known pipeline and / or tanker transport of crude oil imports are included.
Energy carriers:
Crude oil is modelled according to the production and supply of crude oil to Western Europe. The crude oil supply is regarded regional. Therefore, interchanges between countries within that region do not count as imports or exports. Oil processing is reckoned as standard worldwide with overall energy production efficiency of the order of 90%. The IEA data on world oil production and processing data have been used for the use of energy. The total inputs have been partitioned between the products using energy as the partitioning parameter. Modelling covers the extraction, the transport and the delivery including emissions arising at the extraction site and reported losses during subsequent distribution of the oil. The transport for indigenous crude oil production is based on the characteristics of North Sea production since this represents 98% of indigenous production. For North Sea oil some 75% is delivered by pipeline with the remainder delivered by tanker.
Coal modelling covers the production, the transport and the delivery.

## Technical purpose
Most industrial applications involving sodium chloride use it as an aqueous solution.

## Reference product
- sodium chloride: 1

## Inputs
- carcass meal: 1.89799e-14
- energy (recovered): 0.0720362
- hydrogen: 8.51011e-5
- municipal waste (unspecified): 0.000281148
- air (Resources from air): 0.00725766
- baryte (Resources from ground): 0.000240447
- bauxite (Resources from ground): 3.78461e-7
- bentonite (Resources from ground): 6.91594e-8
- biomass (Resources from biosphere): 0.00203597
- brown coal (Resources from ground): 0.000986685
- calcium carbonate (Resources from ground): 0.0313744
- chromium (Resources from ground): 1.45331e-12
- clay (Resources from ground): 4.0831e-6
- copper (Resources from ground): 3.73109e-11
- crude oil (Resources from ground): 0.491802
- dolomite (Resources from ground): 1.12477e-6
- feldspar (Resources from ground): 2.11461e-23
- fluorspar (Resources from ground): 3.14744e-8
- granite (Resources from ground): 6.09842e-15
- ground water (Resources from water): 4.17177e-7
- gypsum (Resources from ground): 5.17909e-10
- hard coal (Resources from ground): 0.356506
- inert rock (Resources from ground): 5.8523e-9
- iron (Resources from ground): 9.2054e-5
- lead (Resources from ground): 6.83157e-7
- magnesium (Resources from ground): 3.92493e-29
- manganese (Resources from ground): 6.93916e-8
- mercury (Resources from ground): 3.52006e-8
- natural aggregate (Resources from ground): 3.39609e-7
- natural gas (Resources from ground): 0.962669
- nickel (Resources from ground): 9.89774e-8
- nitrogen (Resources from air): 8.08066e-6
- olivine (Resources from ground): 8.63542e-7
- oxygen (Resources from air): 1.68514e-6
- peat (Resources from ground): 1.68964e-5
- phosphorus (Resources from ground): 2.07521e-8
- potassium chloride (Resources from ground): 1.27911e-7
- primary energy from geothermics (Resources from ground): 0.00299881
- primary energy from hydro power (Resources from water): 0.0162221
- primary energy from solar energy (Resources from air): 9.64405e-6
- primary energy from waves (Resources from water): 2.25423e-5
- primary energy from wind power (Resources from air): 0.00098095
- quartz sand (Resources from ground): 1.66731e-36
- river water (Resources from water): 4.82963e-6
- sand (Resources from ground): 6.25477e-6
- sea water (Resources from water): 0.000405285
- slate (Resources from ground): 1.4665e-9
- sodium chloride (Resources from ground): 1.11433
- sodium nitrate (Resources from ground): 1.179e-28
- sulfur (Resources from ground): 0.000473752
- talc (Resources from ground): 4.27581e-28
- titanium (Resources from ground): 8.1412e-34
- uranium (Resources from ground): 0.106454
- water (Resources from water): 2.65089
- wood (Resources from biosphere): 0.000105558
- zinc (Resources from ground): 2.51687e-8

## Outputs
- chemical waste (unspecified): 0.00203296
- chemical waste, inert (unspecified): 5.92106e-5
- chemical waste, toxic (unspecified): 0.00513064
- demolition waste (unspecified): 1.20407e-8
- industrial waste (unspecified): 0.000669202
- mineral waste (unspecified): 0.0074019
- municipal waste (unspecified): -0.000265207
- organic waste (unspecified): 2.07609e-8
- overburden (unspecified): 0.00251723
- packaging waste (metal): 2.23444e-10
- packaging waste (plastic): 1.49078e-12
- plastic (unspecified): 3.05929e-6
- tailings (unspecified): 2.50103e-6
- waste (unspecified): 0.000140279
- waste paper (unspecified): 2.65512e-11
- wood (unspecified): 2.56488e-7
- wooden pallet (EURO): 7.30381e-12
- 1,2-dichloroethane (Emissions to air): 4.28825e-11
- 1,2-dichloroethane (Emissions to water): 6.76404e-13
- 2,3,7,8-tetrachlorodibenzo-p-dioxin (Emissions to air): 1.36139e-38
- 2,3,7,8-tetrachlorodibenzo-p-dioxin (Emissions to water): 6.79032e-14
- acid (as H+) (Emissions to air): 7.62064e-16
- acid (as H+) (Emissions to water): 2.88294e-7
- adsorbable organic halogen compounds (Emissions to water): 5.8392e-9
- aluminium (Emissions to water): 1.33416e-10
- ammonia (Emissions to air): 3.54343e-10
- ammonia (Emissions to water): 2.46965e-7
- antimony (Emissions to air): 7.21032e-13
- arsenic (Emissions to air): 1.15347e-23
- arsenic (Emissions to water): 1.57566e-13
- benzene (Emissions to air): 7.1023e-19
- benzene (Emissions to water): 1.13206e-20
- biological oxygen demand (Emissions to water): 3.77281e-8
- bromate (Emissions to water): 1.9236e-9
- cadmium (Emissions to air): 4.46273e-12
- cadmium (Emissions to water): 1.53758e-12
- calcium (Emissions to water): 0.000102287
- carbon dioxide (Emissions to air): 0.149258
- carbon disulfide (Emissions to air): 2.92935e-15
- carbon monoxide (Emissions to air): 0.000124068
- carbonate (Emissions to water): 0.000153628
- chemical oxygen demand (Emissions to water): 7.76046e-7
- chlorate (Emissions to water): 8.40961e-5
- chloride (Emissions to water): 0.0159279
- chlorine (Emissions to air): 4.14108e-9
- chlorine (Emissions to water): 1.86629e-9
- chromium (Emissions to air): 1.49851e-13
- chromium (Emissions to water): 2.76073e-13
- copper (Emissions to air): 1.09592e-13
- copper (Emissions to water): 2.0565e-7
- cyanide (Emissions to water): 8.74555e-12
- decane (Emissions to water): 4.32368e-9
- dichloromethane (Emissions to air): 3.27306e-13
- ethyl benzene (Emissions to air): 6.15074e-20
- ethylene (Emissions to air): 1.18459e-11
- fluoride (Emissions to water): 4.33552e-10
- fluorine (Emissions to air): 4.89484e-11
- hydrocarbons (unspecified) (Emissions to water): 4.99659e-9
- hydrocyanic acid (Emissions to air): 1.68028e-25
- hydrogen (Emissions to air): 0.00727
- hydrogen chloride (Emissions to air): 5.2756e-6
- hydrogen fluoride (Emissions to air): 1.98477e-7
- hydrogen sulfide (Emissions to air): 3.07866e-9
- iron (Emissions to water): 1.08865e-7
- lead (Emissions to air): 9.99133e-11
- lead (Emissions to water): 7.07322e-11
- manganese (Emissions to water): 7.18993e-12
- mercury (Emissions to air): 1.0095e-8
- mercury (Emissions to water): 6.18472e-9
- methane (Emissions to air): 0.000670469
- nickel (Emissions to air): 1.86721e-13
- nickel (Emissions to water): 1.86098e-7
- nitrate (Emissions to water): 2.39565e-8
- nitrogen (Emissions to water): 3.24213e-6
- nitrogen dioxide (Emissions to air): 0.000395679
- nitrous oxide (Emissions to air): 1.03134e-12
- non-methane volatile organic compounds (Emissions to air): 0.000114495
- oxygen (Emissions to air): 1.37258e-24
- particles (> PM10) (Emissions to water): 0.00560963
- particles (PM10) (Emissions to air): 0.000361356
- particles (PM10) (Emissions to water): 5.83726e-7
- particles (PM2.5) (Emissions to air): 1.79154e-13
- phenol (Emissions to water): 2.40647e-10
- phosphate (Emissions to water): 2.11448e-6
- polycyclic aromatic hydrocarbons (Emissions to air): 3.37662e-19
- potassium (Emissions to water): 1.41324e-10
- propene (Emissions to air): 2.10109e-19
- selenium (Emissions to air): 3.15281e-26
- silver (Emissions to air): 9.10398e-25
- sodium (Emissions to water): 0.0242812
- strontium (Emissions to water): 7.52668e-9
- styrene (Emissions to air): 5.19426e-21
- sulfate (Emissions to water): 0.00131005
- sulfur (Emissions to water): 7.42325e-13
- sulfur dioxide (Emissions to air): 0.000770295
- tin (Emissions to water): 8.47938e-14
- toluene (Emissions to air): 1.30558e-19
- total organic carbon (Emissions to water): 1.30182e-7
- vinyl chloride (Emissions to air): 6.80683e-10
- vinyl chloride (Emissions to water): 1.23556e-11
- volatile organic compound (Emissions to air): 1.82918e-7
- volatile organic compound (Emissions to water): 7.2918e-8
- xylene (all isomers) (Emissions to air): 6e-20
- zinc (Emissions to air): 1.52968e-10
- zinc (Emissions to water): 2.12073e-11

## Modelling constants
All data used in the calculation of the LCI results refer to net calorific value.

## Cut-off and completeness
All relevant mass and energy flows are included in the inventory; no specific cut-off rule is applied.

## Deviations from cut-off and completeness
It is unusually to receive questionnaires completed in all respects. In such cases data are extrapolated.

## Data selection and combination
Full coverage of the European industry, modelling the integrated sites as far as possible.

## Deviations from data selection and combination
Many industrial sites contain a large number of different plants and therefore it is usual that certain services are provided from some central source. That is the case of the provision of steam and compressed air, and the treatment of water. In this case the attribution of these central services is a matter of estimating and guesswork. Frequently the information is not held by the companies in a form that is directly usable in eco-profile calculations. For example, air and water emission are normally expressed as concentrations (kg/m3) whereas eco-profiles want the total annual loading (kg/year). Companies can often make the conversion using internal conversion factors, but there is no standarisation of these factors across Europe. Besides, issues such as weighing errors, materials in transit, stock changes and so on, make it difficult to maintain absolutely accurate records.

## Data treatment and extrapolations
Missing data are substituted by the average value calculated from the data supplied by those plants that made positive returns. Thus, for example, suppose that three plants with the same output volume fill in questionnaires. For one of the parameters, one plant returns a value of 1 mg, the second plant returns a value of 2 mg and the third is unable to provide the data. The average from the two plants returning data is 1.5 mg and this value is substituted in place of the missing data for the third plant.

## Sampling procedure
The data are collected from participating companies for the performance characteristics of their plants through questionnaires. Most of the information supplied is derived from the records that are already kept by companies and plants.

## Use advice
The LCI data set should be used for LCI/ LCA studies where saturated solution containing sodium chloride is used along the production of PVC.

## Data sources
- Boustead Model
- Ecoprofile (purified brine)

## Intended applications
Provide well documented, high quality, up-to-date and industry representative LCI data sets for any kind of LCA study. In order to elaborate the reports, some objectives shall be defined: target generic data which could be used to optimise the management of plastics waste (facilitates choosing among options such as mechanical recycling, reuse as a petrochemical raw material and use as a substitute fuel, and provide sufficient data to investigate alternative solutions for regulatory compliance), compile average industry data which could be used for internal company benchmarking allowing individual process improvement (leading to elimination of poor sections of processes, improvements by addition of waste treatment sections), include sufficient data which could be used by customers for product development against environmental criteria to (allow evaluation of the plastics contribution relative to the overall product, enable collaboration with recovery procedures to reduce collective impacts, draw attention to poor environmental links in user chains, which can lead to subsequent improvement). It was also important to provide neutral, objective, quantitative information with no attempt at interpretation, so that only explanations on how the data were generated need be given.
