# Excavator; technology mix; 100 kW, Construction

Dataset: ILCD process, Unit process, single operation
Geography: GLO
Reference year: 2005
Valid until: 2015
Classification: Transport services / Other transport
Synonyms: Digger
LCI method principle: Attributional
Completeness: All relevant flows quantified
Share of supply or production covered: 95 %
Method details: GaBi Modelling Principles
Generated by: PE INTERNATIONAL; LBP-GaBi
Owner: PE INTERNATIONAL
Compliance: ILCD Data Network - Entry-level
Review: Dependent internal review by PE INTERNATIONAL, LBP-GaBi, Ecobilan
Amounts: no units in this file; such an amount is in the reference unit of its flow, which a separate flow dataset defines
copyright: true
accessRestrictions: The data set can be used free of charge by anybody to perform LCA studies, to distribute it to third parties, to convert it to other formats, to develop own data sets etc. as long as the copyright and license conditions for the ELCD data sets and the ILCD format are met that can be accessed via http://lca.jrc.ec.europa.eu. Please note e.g. that reference must be given to the 'Owner of data set' and to the 'ELCD database' plus version number, when using the data set or parts thereof. Please note also, that any modifications/omissions of the data set results in invalidity of any existing 'Official approval of data set by producer/operator', that the impression must be avoided that this would still be a complete ELCD data set, and that the content of further fields has to be adjusted. For details see the aforementioned copyright and license conditions.

## General comment
The data set represents the applied technology with a good overall quality. The inventory is mainly based on literature data and datasheets available from machinery manufacturers.

## Geography
The data set is representative for the mentioned region.

## Time period
Average

## Technology and included processes
Excavator as used for construction works. Inputs are diesel and excavated material. Outputs are combustion emissions due to engine operation, comprising regulated emissions (NOx, CO, Hydrocarbons and Particles), fuel dependent emissions (CO2, SO2, benzene, toluene and xylene) and others such as CH4 and N2O. Emissions due to machinery production, end of life, as well as fuel supply chain (emissions of exploration, refinery and transport) are excluded.

## Technical purpose
Excavation of materials.

## Model description
The emission profile as well as the fuel consumption is calculated according to the settings of the variable parameters as described in the technology description. The calculation formulas of the single variables are given in the section variable / parameter.

## Parameters
- Benzene_h: 0.021
  [13] [g Benzene/h] at full load
- Benzene_t: 0.000458182; = Benzene_h*load_factor/performance*density
  [24] [g Benzene/t]
- bucket_volume: 1.1
  [02a] [m3] bucket volume
- CH4_h: 0.72
  [11] [g CH4/h] at full load
- CH4_t: 0.0157091; = CH4_h*load_factor/performance*density
  [22] [g CH4/t]
- CO_h: 150
  [07] [g CO/h] at full load
- CO_t: 3.27273; = CO_h*load_factor/performance*density
  [18] [g CO/t]
- cycles_min: 0.75
  [02b] [1/min] number of cycles per minute
- density: 1.8
  [01] [t/m3] density of excavated material
- Dust_h: 16
  [09] [g Dust/h] at full load
- Dust_t: 0.349091; = Dust_h*load_factor/performance*density
  [20] [g Dust/t]
- fuel_h: 25.5
  [05] [kg fuel/h] at full load
- fuel_t: 0.556364; = fuel_h*load_factor/performance*density
  [16] [kg fuel/t]
- load_factor: 0.6
  [04] [-] effective power in relation to maximum power = 0,3..1 (default = 0,6)
- N2O_h: 3
  [10] [g N2O/h] at full load
- N2O_t: 0.0654545; = N2O_h*load_factor/performance*density
  [21] [g N2O/t]
- NMVOC_h: 29
  [12] [g NMVOC/h] at full load
- NMVOC_t: 0.632727; = NMVOC_h*load_factor/performance*density
  [23] [g NMVOC/t]
- NOx_h: 520
  [08] [g NOx/h] at full load
- NOx_t: 11.3455; = NOx_h*load_factor/performance*density
  [19] [g NOx/t]
- performance: 49.5; = bucket_volume*cycles_min*60
  [02] [m3/h]
- SO2_h: 0.0102; = fuel_h*sulphur_ppm/1000000*2
  [06] [kg SO2/h] at full load
- SO2_t: 0.000222545; = SO2_h*load_factor/performance*density
  [17] [kg SO2/t]
- sulphur_ppm: 200
  [03] [ppm] sulphur content in fuel
- Toluene_h: 0.003
  [14] [g Toluene/h] at full load
- Toluene_t: 6.54545e-5; = Toluene_h*load_factor/performance*density
  [25] [g Toluene/t]
- Xylene_h: 0.264
  [15] [g Xylene/h] at full load
- Xylene_t: 0.00576; = Xylene_h*load_factor/performance*density
  [26] [g Xylene/t]

## Reference product
- excavated material: 1000

## Inputs
- diesel: 0.556364; = fuel_t; calculated
- excavated material: 1000

## Outputs
All rows: calculated
- benzene (Emissions to air): 4.58182e-7; = 0.001 * Benzene_t
- carbon dioxide (Emissions to air): 1.76645; = 3.175 * fuel_t
- carbon monoxide (Emissions to air): 0.00327273; = 0.001 * CO_t
- methane (Emissions to air): 1.57091e-5; = 0.001 * CH4_t
- nitrogen dioxide (Emissions to air): 0.0113455; = 0.001 * NOx_t
- nitrous oxide (Emissions to air): 6.54545e-5; = 0.001 * N2O_t
- non-methane volatile organic compounds (Emissions to air): 0.000632727; = 0.001 * NMVOC_t
- particles (PM2.5) (Emissions to air): 0.000349091; = 0.001 * Dust_t
- sulfur dioxide (Emissions to air): 0.000222545; = SO2_t
- toluene (Emissions to air): 6.54545e-8; = 0.001 * Toluene_t
- xylene (all isomers) (Emissions to air): 5.76e-6; = 0.001 * Xylene_t

## Modelling constants
All data used in the calculation of the LCI results refer to net calorific value.

## Cut-off and completeness
Cut-off rules for each unit process: Coverage of at least 95 % of mass and energy of the input and output flows, and 98 % of their environmental relevance (according to expert judgement).

## Deviations from cut-off and completeness
Manufacturing and EoL of vehicle is not included.

## Data selection and combination
Data sources for the transport system are sufficiently consistent, emission factors are based on average European conditions (key emissions are based on measured operating data). LCI modelling is fully consistent.

## Data treatment and extrapolations
Several data sources have been averaged. Measured data from representative transport systems have been upscaled.

## Data collection period
2007

## Use advice
The data set allows individual settings for selected variable parameters. In principle all emission data is based on so called basic emission factors relating emissions to the rated engine output of the excavator. The load factor of the engine (effective power in relation to max. power) may be altered by the LCA expert based on case specific expert knowledge. The reference unit [kg emission/h] may be of particular interest if construction processes are modelled and specific productivity data [excavated material/h] is available. For cases no specific information on the productivity of the excavation process is readily available, a default figure for the productivity (performance) [m3/h] and density is presented [t/m3]. The productivity data is based on a bucket capacity of 1,1 m3 and a circulating time of operation of 80 s. Another variable parameter is the S-content of the diesel, determining the SO2-emissions. Vehicle production and end-of-life treatment are not included.

## Review details
Inventory: The internal review was done by several iteration steps concerning raw data validation, raw data documentation, representativity, completeness and consistency of modelling with regard to ISO 14040 and 14044.; Documentation: The review of the documentation was performed by Ecobilan and is in compliance with ISO 14040 and 14044. The data set documentation is correct in view of the appropriateness of the information provided. It includes all relevant information in view of data quality and scope of application of the respective LCI result.

## Data sources
- Emission Inventory Guidebook: Road Transport, 2006
- Handbook emission factors for road transport. v 2.1, 2004
- Luftschadstoffemissionen und Kraftstoffverbrauch von Verbrennungsmotoren (mobil), 2004
- JCB Wheeled excavators data sheets, 2007
- Hydraulikbagger 320D L Product brochure, 2007
- GaBi databases 2006

## Intended applications
This background LCI data set can be used for any types of LCA studies.
