# Articulated lorry transport; Euro 0, 1, 2, 3, 4 mix; 40 t total weight, 27 t max payload

Dataset: ILCD process, Unit process, single operation
Geography: RER
Reference year: 2007
Valid until: 2010
Classification: Transport services / Road
LCI method principle: Attributional
Completeness: All relevant flows quantified
Share of supply or production covered: 95 %
Method details: GaBi Modelling Principles
Generated by: PE INTERNATIONAL; LBP-GaBi
Owner: PE INTERNATIONAL
Compliance: ILCD Data Network - Entry-level
Review: Dependent internal review by PE INTERNATIONAL, LBP-GaBi, Ecobilan
Amounts: no units in this file; such an amount is in the reference unit of its flow, which a separate flow dataset defines
copyright: true
accessRestrictions: The data set can be used free of charge by anybody to perform LCA studies, to distribute it to third parties, to convert it to other formats, to develop own data sets etc. as long as the copyright and license conditions for the ELCD data sets and the ILCD format are met that can be accessed via http://lca.jrc.ec.europa.eu. Please note e.g. that reference must be given to the 'Owner of data set' and to the 'ELCD database' plus version number, when using the data set or parts thereof. Please note also, that any modifications/omissions of the data set results in invalidity of any existing 'Official approval of data set by producer/operator', that the impression must be avoided that this would still be a complete ELCD data set, and that the content of further fields has to be adjusted. For details see the aforementioned copyright and license conditions.

## General comment
The data set represents the applied technology with a good overall data quality. The inventory is based on industry and literature data.

## Geography
The data set is representative for the mentioned region.

## Time period
Annual average

## Technology and included processes
Weighted average of articulated lorries with 40t total weight for emission standards from EURO 0 to EURO 4. Payload of lorry is 27t. The following combustion emissions (measured data) of the lorry are taken into account: ammonia, benzene, carbon dioxide, carbon monoxide, methane, nitrogen oxides, nitrous oxide, NMVOC, particulate PM 2.5, sulfur dioxide, toluene, xylene. NMVOC, toluene and xylene emissions of the vehicle result from imperfect combustion and evaporation losses via diffusion through the tank. Lorry fueled by diesel.

## Technical purpose
Road transport of bulk commodities or packaged goods with a payload of up to 27 t.

## Model description
The emission profile as well as the fuel consumption is calculated according to the settings of the variable parameters as described in the technology description. The calculation formulas of the single variables are given in the section variable / parameter.

## Parameters
- Ant_E_Prüf: 1; = Anteil_E0+Anteil_E1+Anteil_E2+Anteil_E3+Anteil_E4
  Result must be 1!
- Anteil_AB: 0.68
  [04] [-] Percentage on motorway (average speed 82 km/h), Standard = 0,27
- Anteil_AO: 0.24
  [05] [-] Percentage outside of town (average speed 70 km/h), Standard = 0,43
- Anteil_E0: 0.0745897
  [08] [-] Percentage EU0 tonkilometers
- Anteil_E1: 0.0626956
  [09] [-] Percentage EU1 tonkilometers
- Anteil_E2: 0.175313
  [10] [-] Percentage EU2 tonkilometers
- Anteil_E3: 0.357547
  [11] [-] Percentage EU3 tonkilometers
- Anteil_E4: 0.329854
  [12] [-] Percentage EU4 tonkilometers
- Anteil_IO: 0.08
  [06] [-] Percentage within town (average speed 27 km/h), Standard = 0,3
- Anteil_Prüf: 1; = Anteil_AB+Anteil_AO+Anteil_IO
  Result must be 1!
- Auslast: 0.85
  [02] [-] Load based on mass, Standard = 85 % = 0,85
- Distanz: 100
  [01] [km] Distance Start - Finish, Standard = 100 km
- E0Sp_Benzol_AB: 3.64414e-7; = (0.008728771+(0.008298797-0.008728771)*Auslast)/(Nutzlast*1000*Auslast)
  [gBenzene/(kg*km)] Benzene emissions motorway; Euro 0
- E0Sp_Benzol_AO: 3.24506e-7; = (0.007600439+(0.007420419-0.007600439)*Auslast)/(Nutzlast*1000*Auslast)
  [gBenzene/(kg*km)] Benzene emissions outside of town; Euro 0
- E0Sp_Benzol_ges: 4.01436e-5; = ((Anteil_AB*E0Sp_Benzol_AB)+(Anteil_AO*E0Sp_Benzol_AO)+(Anteil_IO*E0Sp_Benzol_IO))*Distanz
  [gBenzene/kg] Benzene emissions weighted; Euro 0
- E0Sp_Benzol_IO: 9.4691e-7; = (0.018180089+(0.022358332-0.018180089)*Auslast)/(Nutzlast*1000*Auslast)
  [gBenzene/(kg*km)] Benzene emissions within a town; Euro 0
- E0Sp_CH4_AB: 5.23708e-7; = (0.012544342+(0.011926415-0.012544342)*Auslast)/(Nutzlast*1000*Auslast)
  [gCH4/(kg*km)] CH4 Emissions motorway; Euro 0
- E0Sp_CH4_AO: 4.66357e-7; = (0.010922788+(0.010664076-0.010922788)*Auslast)/(Nutzlast*1000*Auslast)
  [gCH4/(kg*km)] CH4 Emissions outside of town; Euro 0
- E0Sp_CH4_ges: 5.76914e-5; = ((Anteil_AB*E0Sp_CH4_AB)+(Anteil_AO*E0Sp_CH4_AO)+(Anteil_IO*E0Sp_CH4_IO))*Distanz
  [gCH4/kg] CH4 Emissions weighted; Euro 0
- E0Sp_CH4_IO: 1.36083e-6; = (0.026127076+(0.032131739-0.026127076)*Auslast)/(Nutzlast*1000*Auslast)
  [gCH4/(kg*km)] CH4 Emissions within a town; Euro 0
- E0Sp_CO_AB: 7.87271e-5; = (1.627172947+(1.838482857-1.627172947)*Auslast)/(Nutzlast*1000*Auslast)
  [gCO/(kg*km)] CO Emissions motorway; Euro 0
- E0Sp_CO_AO: 8.52997e-5; = (1.58979249+(2.022540808-1.58979249)*Auslast)/(Nutzlast*1000*Auslast)
  [gCO/(kg*km)] CO Emissions outside of town; Euro 0
- E0Sp_CO_ges: 0.00901902; = ((Anteil_AB*E0Sp_CO_AB)+(Anteil_AO*E0Sp_CO_AO)+(Anteil_IO*E0Sp_CO_IO))*Distanz
  [gCO/kg] CO Emissions weighted; Euro 0
- E0Sp_CO_IO: 0.000202298; = (3.268083811+(4.885313988-3.268083811)*Auslast)/(Nutzlast*1000*Auslast)
  [gCO/(kg*km)] CO Emissions within a town; Euro 0
- E0Sp_CO2_AB: 0.0455631; = (715.6907349+(1103.905396-715.6907349)*Auslast)/(Nutzlast*1000*Auslast)
  [gCO2/(kg*km)] CO2 Emissions motorway; Euro 0
- E0Sp_CO2_AO: 0.0483272; = (684.4699707+(1184.046387-684.4699707)*Auslast)/(Nutzlast*1000*Auslast)
  [gCO2/(kg*km)] CO2 Emissions outside of town; Euro 0
- E0Sp_CO2_ges: 4.8847; = ((Anteil_AB*E0Sp_CO2_AB)+(Anteil_AO*E0Sp_CO2_AO)+(Anteil_IO*E0Sp_CO2_IO))*Distanz
  [gCO2/kg] CO2 Emissions weighted; Euro 0
- E0Sp_CO2_IO: 0.0783199; = (1110.033691+(1918.750122-1110.033691)*Auslast)/(Nutzlast*1000*Auslast)
  [gCO2/(kg*km)] CO2 Emissions within a town; Euro 0
- E0Sp_Diesel_AB: 1.43506e-5; = (0.2254144+(0.34768674-0.2254144)*Auslast)/(Nutzlast*1000*Auslast)
  [kgDiesel/(kg*km)] Diesel consumption; Euro 0
- E0Sp_Diesel_AO: 1.52212e-5; = (0.21558109+(0.37292798-0.21558109)*Auslast)/(Nutzlast*1000*Auslast)
  [kgDiesel/(kg*km)] Diesel consumption; Euro 0
- E0Sp_Diesel_ges: 0.00153849; = ((Anteil_AB*E0Sp_Diesel_AB)+(Anteil_AO*E0Sp_Diesel_AO)+(Anteil_IO*E0Sp_Diesel_IO))*Distanz
  [kgDiesel/kg] Diesel consumption; Euro 0
- E0Sp_Diesel_IO: 2.46677e-5; = (0.34961694+(0.60433075-0.34961694)*Auslast)/(Nutzlast*1000*Auslast)
  [kgDiesel/(kg* km)] Diesel consumption; Euro 0
- E0Sp_N2O_AB: 0.000409586; = 9.4/(Tonnage*1000)
  [mgN2O/(kg*km)] N2O Emissions motorway; Euro 0
- E0Sp_N2O_AO: 0.000592593; = 13.6/(Tonnage*1000)
  [mgN2O/(kg*km)] N2O Emissions outside of town; Euro 0
- E0Sp_N2O_ges: 0.0477211; = ((Anteil_AB*E0Sp_N2O_AB)+(Anteil_AO*E0Sp_N2O_AO)+(Anteil_IO*E0Sp_N2O_IO))*Distanz
  [mgN2O/kg] N2O Emissions weighted; Euro 0
- E0Sp_N2O_IO: 0.000705882; = 16.2/(Tonnage*1000)
  [mgN2O/(kg*km)] N2O Emissions within a town; Euro 0
- E0Sp_NH3: 0.0217865; = 5*Distanz/(Tonnage*1000)
  [mgNH3/kg)] NH3 Emissions in any traffic situation; Euro 0
- E0Sp_NMVOC_AB: 2.06887e-5; = (0.495553806+(0.471143097-0.495553806)*Auslast)/(Nutzlast*1000*Auslast)
  [gNMVOC/(kg*km)] NMVOC Emissions (Without Xylene, Toluene and Benzene); Euro 0
- E0Sp_NMVOC_AO: 1.8423e-5; = (0.431495623+(0.421275411-0.431495623)*Auslast)/(Nutzlast*1000*Auslast)
  [gNMVOC/(kg*km)] NMVOC Emissions (Without Xylene, Toluene and Benzene); Euro 0
- E0Sp_NMVOC_ges: 0.00227905; = ((Anteil_AB*E0Sp_NMVOC_AB)+(Anteil_AO*E0Sp_NMVOC_AO)+(Anteil_IO*E0Sp_NMVOC_IO))*Distanz
  [gNMVOC/kg] NMVOC Emissions (Without Xylene, Toluene and Benzene); Euro 0
- E0Sp_NMVOC_IO: 5.37584e-5; = (1.032128348+(1.26933755-1.032128348)*Auslast)/(Nutzlast*1000*Auslast)
  [gNMVOC/(kg*km)] NMVOC Emissions (Without Xylene, Toluene and Benzene); Euro 0
- E0Sp_NOx_AB: 0.00060833; = (9.15732193+(14.80891418-9.15732193)*Auslast)/(Nutzlast*1000*Auslast)
  [gNOx/(kg*km)] NOx Emissions motorway; Euro 0
- E0Sp_NOx_AO: 0.000662705; = (9.055377007+(16.29502487-9.055377007)*Auslast)/(Nutzlast*1000*Auslast)
  [gNOx/(kg*km)] NOx Emissions outside of town; Euro 0
- E0Sp_NOx_ges: 0.0654401; = ((Anteil_AB*E0Sp_NOx_AB)+(Anteil_AO*E0Sp_NOx_AO)+(Anteil_IO*E0Sp_NOx_IO))*Distanz
  [gNOx/kg] NOx Emissions weighted; Euro 0
- E0Sp_NOx_IO: 0.00102109; = (13.56494427+(25.17553711-13.56494427)*Auslast)/(Nutzlast*1000*Auslast)
  [gNOx/(kg*km)] NOx Emissions within a town; Euro 0
- E0Sp_Part_AB: 1.79494e-5; = (0.324563295+(0.427357554-0.324563295)*Auslast)/(Nutzlast*1000*Auslast)
  [gParticulate matter/(kg*km)] Particulate emissions motorway; Euro 0
- E0Sp_Part_AO: 1.87953e-5; = (0.310613751+(0.45265907-0.310613751)*Auslast)/(Nutzlast*1000*Auslast)
  [gParticulate matter/(kg*km)] Particulate emissions outside of town; Euro 0
- E0Sp_Part_ges: 0.00197785; = ((Anteil_AB*E0Sp_Part_AB)+(Anteil_AO*E0Sp_Part_AO)+(Anteil_IO*E0Sp_Part_IO))*Distanz
  [gParticulate matter/kg] Particulate emissions weighted; Euro 0
- E0Sp_Part_IO: 3.82761e-5; = (0.583988726+(0.93039757-0.583988726)*Auslast)/(Nutzlast*1000*Auslast)
  [gParticulate matter/(kg*km)] Particulate emissions within a town; Euro 0
- E0Sp_SO2_AB: 1.43506e-9; = (ppm_Schwefel/1000000)*2*E0Sp_Diesel_AB
  [kgSO2/(kg*km)] SO2 Emissions motorway / 2 (Molar weight SO2/Molar weight S=64g/32g); Euro 0
- E0Sp_SO2_AO: 1.52212e-9; = (ppm_Schwefel/1000000)*2*E0Sp_Diesel_AO
  [kgSO2/(kg*km)] SO2 Emissions outside of town / 2 (Molar weight SO2/Molar weight S=64g/32g); Euro 0
- E0Sp_SO2_ges: 1.53849e-7; = ((Anteil_AB*E0Sp_SO2_AB)+(Anteil_AO*E0Sp_SO2_AO)+(Anteil_IO*E0Sp_SO2_IO))*Distanz
  [kgSO2/kg] SO2 Emissions weighted; Euro 0
- E0Sp_SO2_IO: 2.46677e-9; = (ppm_Schwefel/1000000)*2*E0Sp_Diesel_IO
  [kgSO2/(kg*km)] SO2 Emissions within a town / 2 (Molar weight SO2/Molar weight S=64g/32g); Euro 0
- E0Sp_Toluol_AB: 6.98278e-8; = (0.001672579+(0.001590189-0.001672579)*Auslast)/(Nutzlast*1000*Auslast)
  [gToluene/(kg*km)] Toluene Emissions motorway; Euro 0
- E0Sp_Toluol_AO: 6.21809e-8; = (0.001456372+(0.001421877-0.001456372)*Auslast)/(Nutzlast*1000*Auslast)
  [gToluene/(kg*km)] Toluene Emissions outside of town; Euro 0
- E0Sp_Toluol_ges: 7.69218e-6; = ((Anteil_AB*E0Sp_Toluol_AB)+(Anteil_AO*E0Sp_Toluol_AO)+(Anteil_IO*E0Sp_Toluol_IO))*Distanz
  [gToluene/kg] Toluene Emissions weighted; Euro 0
- E0Sp_Toluol_IO: 1.81444e-7; = (0.00348361+(0.004284231-0.00348361)*Auslast)/(Nutzlast*1000*Auslast)
  [gToluene/(kg*km)] Toluene Emissions within a town; Euro 0
- E0Sp_Xylol_AB: 1.74569e-7; = (0.004181447+(0.003975472-0.004181447)*Auslast)/(Nutzlast*1000*Auslast)
  [gXylene/(kg*km)] Xylene Emissions motorway; Euro 0
- E0Sp_Xylol_AO: 1.55452e-7; = (0.003640929+(0.003554692-0.003640929)*Auslast)/(Nutzlast*1000*Auslast)
  [gXylene/(kg*km)] Xylene Emissions outside of town; Euro 0
- E0Sp_Xylol_ges: 1.92305e-5; = ((Anteil_AB*E0Sp_Xylol_AB)+(Anteil_AO*E0Sp_Xylol_AO)+(Anteil_IO*E0Sp_Xylol_IO))*Distanz
  [gXylene/kg] Xylene Emissions weighted; Euro 0
- E0Sp_Xylol_IO: 4.5361e-7; = (0.008709026+(0.010710579-0.008709026)*Auslast)/(Nutzlast*1000*Auslast)
  [gXylene/(kg*km)] Xylene Emissions within a town; Euro 0
- E1Sp_Benzol_AB: 4.17512e-7; = (0.009113311+(0.009664588-0.009113311)*Auslast)/(Nutzlast*1000*Auslast)
  [gBenzene/(kg*km)] Benzene emissions motorway; Euro 1
- E1Sp_Benzol_AO: 3.91071e-7; = (0.008164695+(0.009118079-0.008164695)*Auslast)/(Nutzlast*1000*Auslast)
  [gBenzene/(kg*km)] Benzene emissions outside of town; Euro 1
- E1Sp_Benzol_ges: 4.62743e-5; = ((Anteil_AB*E1Sp_Benzol_AB)+(Anteil_AO*E1Sp_Benzol_AO)+(Anteil_IO*E1Sp_Benzol_IO))*Distanz
  [gBenzene/kg] Benzene emissions weighted; Euro 1
- E1Sp_Benzol_IO: 1.06223e-6; = (0.019216917+(0.025288925-0.019216917)*Auslast)/(Nutzlast*1000*Auslast)
  [gBenzene/(kg*km)] Benzene emissions within a town; Euro 1
- E1Sp_CH4_AB: 6.00017e-7; = (0.013096974+(0.013889228-0.013096974)*Auslast)/(Nutzlast*1000*Auslast)
  [gCH4/(kg*km)] CH4 Emissions motorway; Euro 1
- E1Sp_CH4_AO: 5.62018e-7; = (0.011733693+(0.013103827-0.011733693)*Auslast)/(Nutzlast*1000*Auslast)
  [gCH4/(kg*km)] CH4 Emissions outside of town; Euro 1
- E1Sp_CH4_ges: 6.6502e-5; = ((Anteil_AB*E1Sp_CH4_AB)+(Anteil_AO*E1Sp_CH4_AO)+(Anteil_IO*E1Sp_CH4_IO))*Distanz
  [gCH4/kg] CH4 Emissions weighted; Euro 1
- E1Sp_CH4_IO: 1.52655e-6; = (0.027617127+(0.036343366-0.027617127)*Auslast)/(Nutzlast*1000*Auslast)
  [gCH4/(kg*km)] CH4 Emissions within a town; Euro 1
- E1Sp_CO_AB: 6.96594e-5; = (1.375679016+(1.638035655-1.375679016)*Auslast)/(Nutzlast*1000*Auslast)
  [gCO/(kg*km)] CO Emissions motorway; Euro 1
- E1Sp_CO_AO: 7.83098e-5; = (1.362391472+(1.873942018-1.362391472)*Auslast)/(Nutzlast*1000*Auslast)
  [gCO/(kg*km)] CO Emissions outside of town; Euro 1
- E1Sp_CO_ges: 0.0081292; = ((Anteil_AB*E1Sp_CO_AB)+(Anteil_AO*E1Sp_CO_AO)+(Anteil_IO*E1Sp_CO_IO))*Distanz
  [gCO/kg] CO Emissions weighted; Euro 1
- E1Sp_CO_IO: 0.000189116; = (2.961803436+(4.583456516-2.961803436)*Auslast)/(Nutzlast*1000*Auslast)
  [gCO/(kg*km)] CO Emissions within a town; Euro 1
- E1Sp_CO2_AB: 0.0410764; = (629.3200073+(998.0057373-629.3200073)*Auslast)/(Nutzlast*1000*Auslast)
  [gCO2/(kg*km)] CO2 Emissions motorway; Euro 1
- E1Sp_CO2_AO: 0.0440564; = (608.0487671+(1082.220337-608.0487671)*Auslast)/(Nutzlast*1000*Auslast)
  [gCO2/(kg*km)] CO2 Emissions outside of town; Euro 1
- E1Sp_CO2_ges: 4.41975; = ((Anteil_AB*E1Sp_CO2_AB)+(Anteil_AO*E1Sp_CO2_AO)+(Anteil_IO*E1Sp_CO2_IO))*Distanz
  [gCO2/kg] CO2 Emissions weighted; Euro 1
- E1Sp_CO2_IO: 0.07115; = (978.0646973+(1748.449707-978.0646973)*Auslast)/(Nutzlast*1000*Auslast)
  [gCO2/(kg*km)] CO2 Emissions within a town; Euro 1
- E1Sp_Diesel_AB: 1.29374e-5; = (0.19821103+(0.31433252-0.19821103)*Auslast)/(Nutzlast*1000*Auslast)
  [kgDiesel/(kg*km)] Diesel consumption; Euro 1
- E1Sp_Diesel_AO: 1.3876e-5; = (0.19151141+(0.34085678-0.19151141)*Auslast)/(Nutzlast*1000*Auslast)
  [kgDiesel/(kg*km)] Diesel consumption; Euro 1
- E1Sp_Diesel_ges: 0.00139205; = ((Anteil_AB*E1Sp_Diesel_AB)+(Anteil_AO*E1Sp_Diesel_AO)+(Anteil_IO*E1Sp_Diesel_IO))*Distanz
  [kgDiesel/kg] Diesel consumption; Euro 1
- E1Sp_Diesel_IO: 2.24094e-5; = (0.30805188+(0.55069281-0.30805188)*Auslast)/(Nutzlast*1000*Auslast)
  [kgDiesel/(kg* km)] Diesel consumption; Euro 1
- E1Sp_N2O_AB: 0.000409586; = 9.4/(Tonnage*1000)
  [mgN2O/(kg*km)] N2O Emissions motorway; Euro 1
- E1Sp_N2O_AO: 0.000592593; = 13.6/(Tonnage*1000)
  [mgN2O/(kg*km)] N2O Emissions outside of town; Euro 1
- E1Sp_N2O_ges: 0.0477211; = ((Anteil_AB*E1Sp_N2O_AB)+(Anteil_AO*E1Sp_N2O_AO)+(Anteil_IO*E1Sp_N2O_IO))*Distanz
  [mgN2O/kg] N2O Emissions weighted; Euro 1
- E1Sp_N2O_IO: 0.000705882; = 16.2/(Tonnage*1000)
  [mgN2O/(kg*km)] N2O Emissions within a town; Euro 1
- E1Sp_NH3: 0.0217865; = 5*Distanz/(Tonnage*1000)
  [mgNH3/kg)] NH3 Emissions in any traffic situation; Euro 1
- E1Sp_NMVOC_AB: 2.37032e-5; = (0.517385065+(0.548682347-0.517385065)*Auslast)/(Nutzlast*1000*Auslast)
  [gNMVOC/(kg*km)] NMVOC Emissions (Without Xylene, Toluene and Benzene); Euro 1
- E1Sp_NMVOC_AO: 2.2202e-5; = (0.463529751+(0.51765575-0.463529751)*Auslast)/(Nutzlast*1000*Auslast)
  [gNMVOC/(kg*km)] NMVOC Emissions (Without Xylene, Toluene and Benzene); Euro 1
- E1Sp_NMVOC_ges: 0.00262711; = ((Anteil_AB*E1Sp_NMVOC_AB)+(Anteil_AO*E1Sp_NMVOC_AO)+(Anteil_IO*E1Sp_NMVOC_IO))*Distanz
  [gNMVOC/kg] NMVOC Emissions (Without Xylene, Toluene and Benzene); Euro 1
- E1Sp_NMVOC_IO: 6.03053e-5; = (1.090991556+(1.435714404-1.090991556)*Auslast)/(Nutzlast*1000*Auslast)
  [gNMVOC/(kg*km)] NMVOC Emissions (Without Xylene, Toluene and Benzene); Euro 1
- E1Sp_NOx_AB: 0.000415416; = (6.466877937+(10.0750227-6.466877937)*Auslast)/(Nutzlast*1000*Auslast)
  [gNOx/(kg*km)] NOx Emissions motorway; Euro 1
- E1Sp_NOx_AO: 0.000449735; = (6.411221504+(11.01144791-6.411221504)*Auslast)/(Nutzlast*1000*Auslast)
  [gNOx/(kg*km)] NOx Emissions outside of town; Euro 1
- E1Sp_NOx_ges: 0.0447433; = ((Anteil_AB*E1Sp_NOx_AB)+(Anteil_AO*E1Sp_NOx_AO)+(Anteil_IO*E1Sp_NOx_IO))*Distanz
  [gNOx/kg] NOx Emissions weighted; Euro 1
- E1Sp_NOx_IO: 0.000712672; = (9.616233826+(17.54515076-9.616233826)*Auslast)/(Nutzlast*1000*Auslast)
  [gNOx/(kg*km)] NOx Emissions within a town; Euro 1
- E1Sp_Part_AB: 1.43019e-5; = (0.255221397+(0.341112435-0.255221397)*Auslast)/(Nutzlast*1000*Auslast)
  [gParticulate matter/(kg*km)] Particulate emissions motorway; Euro 1
- E1Sp_Part_AO: 1.46231e-5; = (0.225679442+(0.354997188-0.225679442)*Auslast)/(Nutzlast*1000*Auslast)
  [gParticulate matter/(kg*km)] Particulate emissions outside of town; Euro 1
- E1Sp_Part_ges: 0.00160717; = ((Anteil_AB*E1Sp_Part_AB)+(Anteil_AO*E1Sp_Part_AO)+(Anteil_IO*E1Sp_Part_IO))*Distanz
  [gParticulate matter/kg] Particulate emissions weighted; Euro 1
- E1Sp_Part_IO: 3.54612e-5; = (0.531683981+(0.863624692-0.531683981)*Auslast)/(Nutzlast*1000*Auslast)
  [gParticulate matter/(kg*km)] Particulate emissions within a town; Euro 1
- E1Sp_SO2_AB: 1.29374e-9; = (ppm_Schwefel/1000000)*2*E1Sp_Diesel_AB
  [kgSO2/(kg*km)] SO2 Emissions motorway / 2 (Molar weight SO2/Molar weight S=64g/32g); Euro 1
- E1Sp_SO2_AO: 1.3876e-9; = (ppm_Schwefel/1000000)*2*E1Sp_Diesel_AO
  [kgSO2/(kg*km)] SO2 Emissions outside of town / 2 (Molar weight SO2/Molar weight S=64g/32g); Euro 1
- E1Sp_SO2_ges: 1.39205e-7; = ((Anteil_AB*E1Sp_SO2_AB)+(Anteil_AO*E1Sp_SO2_AO)+(Anteil_IO*E1Sp_SO2_IO))*Distanz
  [kgSO2/kg] SO2 Emissions weighted; Euro 1
- E1Sp_SO2_IO: 2.24094e-9; = (ppm_Schwefel/1000000)*2*E1Sp_Diesel_IO
  [kgSO2/(kg*km)] SO2 Emissions within a town / 2 (Molar weight SO2/Molar weight S=64g/32g); Euro 1
- E1Sp_Toluol_AB: 8.00023e-8; = (0.001746263+(0.001851897-0.001746263)*Auslast)/(Nutzlast*1000*Auslast)
  [gToluene/(kg*km)] Toluene Emissions motorway; Euro 1
- E1Sp_Toluol_AO: 7.49357e-8; = (0.001564492+(0.001747177-0.001564492)*Auslast)/(Nutzlast*1000*Auslast)
  [gToluene/(kg*km)] Toluene Emissions outside of town; Euro 1
- E1Sp_Toluol_ges: 8.86694e-6; = ((Anteil_AB*E1Sp_Toluol_AB)+(Anteil_AO*E1Sp_Toluol_AO)+(Anteil_IO*E1Sp_Toluol_IO))*Distanz
  [gToluene/kg] Toluene Emissions weighted; Euro 1
- E1Sp_Toluol_IO: 2.03541e-7; = (0.003682283+(0.004845782-0.003682283)*Auslast)/(Nutzlast*1000*Auslast)
  [gToluene/(kg*km)] Toluene Emissions within a town; Euro 1
- E1Sp_Xylol_AB: 2.00006e-7; = (0.004365658+(0.004629743-0.004365658)*Auslast)/(Nutzlast*1000*Auslast)
  [gXylene/(kg*km)] Xylene Emissions motorway; Euro 1
- E1Sp_Xylol_AO: 1.87339e-7; = (0.003911231+(0.004367942-0.003911231)*Auslast)/(Nutzlast*1000*Auslast)
  [gXylene/(kg*km)] Xylene Emissions outside of town; Euro 1
- E1Sp_Xylol_ges: 2.21673e-5; = ((Anteil_AB*E1Sp_Xylol_AB)+(Anteil_AO*E1Sp_Xylol_AO)+(Anteil_IO*E1Sp_Xylol_IO))*Distanz
  [gXylene/kg] Xylene Emissions weighted; Euro 1
- E1Sp_Xylol_IO: 5.08852e-7; = (0.009205709+(0.012114456-0.009205709)*Auslast)/(Nutzlast*1000*Auslast)
  [gXylene/(kg*km)] Xylene Emissions within a town; Euro 1
- E2Sp_Benzol_AB: 2.45175e-7; = (0.005252009+(0.005692902-0.005252009)*Auslast)/(Nutzlast*1000*Auslast)
  [gBenzene/(kg*km)] Benzene emissions motorway; Euro 2
- E2Sp_Benzol_AO: 2.38497e-7; = (0.004785067+(0.005594997-0.004785067)*Auslast)/(Nutzlast*1000*Auslast)
  [gBenzene/(kg*km)] Benzene emissions outside of town; Euro 2
- E2Sp_Benzol_ges: 2.72117e-5; = ((Anteil_AB*E2Sp_Benzol_AB)+(Anteil_AO*E2Sp_Benzol_AO)+(Anteil_IO*E2Sp_Benzol_IO))*Distanz
  [gBenzene/kg] Benzene emissions weighted; Euro 2
- E2Sp_Benzol_IO: 6.0198e-7; = (0.010779209+(0.014351238-0.010779209)*Auslast)/(Nutzlast*1000*Auslast)
  [gBenzene/(kg*km)] Benzene emissions within a town; Euro 2
- E2Sp_CH4_AB: 3.52347e-7; = (0.007547798+(0.008181416-0.007547798)*Auslast)/(Nutzlast*1000*Auslast)
  [gCH4/(kg*km)] CH4 Emissions motorway; Euro 2
- E2Sp_CH4_AO: 3.4275e-7; = (0.006876743+(0.008040715-0.006876743)*Auslast)/(Nutzlast*1000*Auslast)
  [gCH4/(kg*km)] CH4 Emissions outside of town; Euro 2
- E2Sp_CH4_ges: 3.91066e-5; = ((Anteil_AB*E2Sp_CH4_AB)+(Anteil_AO*E2Sp_CH4_AO)+(Anteil_IO*E2Sp_CH4_IO))*Distanz
  [gCH4/kg] CH4 Emissions weighted; Euro 2
- E2Sp_CH4_IO: 8.65121e-7; = (0.015491079+(0.020624535-0.015491079)*Auslast)/(Nutzlast*1000*Auslast)
  [gCH4/(kg*km)] CH4 Emissions within a town; Euro 2
- E2Sp_CO_AB: 4.9199e-5; = (1.0004493+(1.151823401-1.0004493)*Auslast)/(Nutzlast*1000*Auslast)
  [gCO/(kg*km)] CO Emissions motorway; Euro 2
- E2Sp_CO_AO: 6.21965e-5; = (1.133528352+(1.479269862-1.133528352)*Auslast)/(Nutzlast*1000*Auslast)
  [gCO/(kg*km)] CO Emissions outside of town; Euro 2
- E2Sp_CO_ges: 0.00599242; = ((Anteil_AB*E2Sp_CO_AB)+(Anteil_AO*E2Sp_CO_AO)+(Anteil_IO*E2Sp_CO_IO))*Distanz
  [gCO/kg] CO Emissions weighted; Euro 2
- E2Sp_CO_IO: 0.000144271; = (2.089811325+(3.526530266-2.089811325)*Auslast)/(Nutzlast*1000*Auslast)
  [gCO/(kg*km)] CO Emissions within a town; Euro 2
- E2Sp_CO2_AB: 0.0395899; = (596.019043+(963.7462158-596.019043)*Auslast)/(Nutzlast*1000*Auslast)
  [gCO2/(kg*km)] CO2 Emissions motorway; Euro 2
- E2Sp_CO2_AO: 0.0429581; = (580.3435059+(1057.455444-580.3435059)*Auslast)/(Nutzlast*1000*Auslast)
  [gCO2/(kg*km)] CO2 Emissions outside of town; Euro 2
- E2Sp_CO2_ges: 4.26248; = ((Anteil_AB*E2Sp_CO2_AB)+(Anteil_AO*E2Sp_CO2_AO)+(Anteil_IO*E2Sp_CO2_IO))*Distanz
  [gCO2/kg] CO2 Emissions weighted; Euro 2
- E2Sp_CO2_IO: 0.0674224; = (909.9897461+(1659.818726-909.9897461)*Auslast)/(Nutzlast*1000*Auslast)
  [gCO2/(kg*km)] CO2 Emissions within a town; Euro 2
- E2Sp_Diesel_AB: 1.24692e-5; = (0.18772253+(0.30354211-0.18772253)*Auslast)/(Nutzlast*1000*Auslast)
  [kgDiesel/(kg*km)] Diesel consumption; Euro 2
- E2Sp_Diesel_AO: 1.35301e-5; = (0.18278535+(0.33305682-0.18278535)*Auslast)/(Nutzlast*1000*Auslast)
  [kgDiesel/(kg*km)] Diesel consumption; Euro 2
- E2Sp_Diesel_ges: 0.00134251; = ((Anteil_AB*E2Sp_Diesel_AB)+(Anteil_AO*E2Sp_Diesel_AO)+(Anteil_IO*E2Sp_Diesel_IO))*Distanz
  [kgDiesel/kg] Diesel consumption; Euro 2
- E2Sp_Diesel_IO: 2.12354e-5; = (0.28661096+(0.52277759-0.28661096)*Auslast)/(Nutzlast*1000*Auslast)
  [kgDiesel/(kg* km)] Diesel consumption; Euro 2
- E2Sp_N2O_AB: 0.000383442; = 8.8/(Tonnage*1000)
  [mgN2O/(kg*km)] N2O Emissions motorway; Euro 2
- E2Sp_N2O_AO: 0.000592593; = 13.6/(Tonnage*1000)
  [mgN2O/(kg*km)] N2O Emissions outside of town; Euro 2
- E2Sp_N2O_ges: 0.0458388; = ((Anteil_AB*E2Sp_N2O_AB)+(Anteil_AO*E2Sp_N2O_AO)+(Anteil_IO*E2Sp_N2O_IO))*Distanz
  [mgN2O/kg] N2O Emissions weighted; Euro 2
- E2Sp_N2O_IO: 0.00069281; = 15.9/(Tonnage*1000)
  [mgN2O/(kg*km)] N2O Emissions within a town; Euro 2
- E2Sp_NH3: 0.0217865; = 5*Distanz/(Tonnage*1000)
  [mgNH3/kg)] NH3 Emissions in any traffic situation; Euro 2
- E2Sp_NMVOC_AB: 1.39192e-5; = (0.298169459+(0.323200055-0.298169459)*Auslast)/(Nutzlast*1000*Auslast)
  [gNMVOC/(kg*km)] NMVOC Emissions (Without Xylene, Toluene and Benzene); Euro 2
- E2Sp_NMVOC_AO: 1.35401e-5; = (0.271659991+(0.317641753-0.271659991)*Auslast)/(Nutzlast*1000*Auslast)
  [gNMVOC/(kg*km)] NMVOC Emissions (Without Xylene, Toluene and Benzene); Euro 2
- E2Sp_NMVOC_ges: 0.00154487; = ((Anteil_AB*E2Sp_NMVOC_AB)+(Anteil_AO*E2Sp_NMVOC_AO)+(Anteil_IO*E2Sp_NMVOC_IO))*Distanz
  [gNMVOC/kg] NMVOC Emissions (Without Xylene, Toluene and Benzene); Euro 2
- E2Sp_NMVOC_IO: 3.41759e-5; = (0.611962172+(0.814755088-0.611962172)*Auslast)/(Nutzlast*1000*Auslast)
  [gNMVOC/(kg*km)] NMVOC Emissions (Without Xylene, Toluene and Benzene); Euro 2
- E2Sp_NOx_AB: 0.000454071; = (7.487653255+(10.93857288-7.487653255)*Auslast)/(Nutzlast*1000*Auslast)
  [gNOx/(kg*km)] NOx Emissions motorway; Euro 2
- E2Sp_NOx_AO: 0.000480705; = (7.466893196+(11.66134071-7.466893196)*Auslast)/(Nutzlast*1000*Auslast)
  [gNOx/(kg*km)] NOx Emissions outside of town; Euro 2
- E2Sp_NOx_ges: 0.0488113; = ((Anteil_AB*E2Sp_NOx_AB)+(Anteil_AO*E2Sp_NOx_AO)+(Anteil_IO*E2Sp_NOx_IO))*Distanz
  [gNOx/kg] NOx Emissions weighted; Euro 2
- E2Sp_NOx_IO: 0.000799699; = (11.47814941+(19.5663147-11.47814941)*Auslast)/(Nutzlast*1000*Auslast)
  [gNOx/(kg*km)] NOx Emissions within a town; Euro 2
- E2Sp_Part_AB: 6.74584e-6; = (0.118901379+(0.16115503-0.118901379)*Auslast)/(Nutzlast*1000*Auslast)
  [gParticulate matter/(kg*km)] Particulate emissions motorway; Euro 2
- E2Sp_Part_AO: 7.65406e-6; = (0.121178657+(0.185275152-0.121178657)*Auslast)/(Nutzlast*1000*Auslast)
  [gParticulate matter/(kg*km)] Particulate emissions outside of town; Euro 2
- E2Sp_Part_ges: 0.000757735; = ((Anteil_AB*E2Sp_Part_AB)+(Anteil_AO*E2Sp_Part_AO)+(Anteil_IO*E2Sp_Part_IO))*Distanz
  [gParticulate matter/kg] Particulate emissions weighted; Euro 2
- E2Sp_Part_IO: 1.44151e-5; = (0.19719848+(0.354408681-0.19719848)*Auslast)/(Nutzlast*1000*Auslast)
  [gParticulate matter/(kg*km)] Particulate emissions within a town; Euro 2
- E2Sp_SO2_AB: 1.24692e-9; = (ppm_Schwefel/1000000)*2*E2Sp_Diesel_AB
  [kgSO2/(kg*km)] SO2 Emissions motorway / 2 (Molar weight SO2/Molar weight S=64g/32g); Euro 2
- E2Sp_SO2_AO: 1.35301e-9; = (ppm_Schwefel/1000000)*2*E2Sp_Diesel_AO
  [kgSO2/(kg*km)] SO2 Emissions outside of town / 2 (Molar weight SO2/Molar weight S=64g/32g); Euro 2
- E2Sp_SO2_ges: 1.34251e-7; = ((Anteil_AB*E2Sp_SO2_AB)+(Anteil_AO*E2Sp_SO2_AO)+(Anteil_IO*E2Sp_SO2_IO))*Distanz
  [kgSO2/kg] SO2 Emissions weighted; Euro 2
- E2Sp_SO2_IO: 2.12354e-9; = (ppm_Schwefel/1000000)*2*E2Sp_Diesel_IO
  [kgSO2/(kg*km)] SO2 Emissions within a town / 2 (Molar weight SO2/Molar weight S=64g/32g); Euro 2
- E2Sp_Toluol_AB: 4.69797e-8; = (0.001006373+(0.001090856-0.001006373)*Auslast)/(Nutzlast*1000*Auslast)
  [gToluene/(kg*km)] Toluene Emissions motorway; Euro 2
- E2Sp_Toluol_AO: 4.57e-8; = (0.000916899+(0.001072095-0.000916899)*Auslast)/(Nutzlast*1000*Auslast)
  [gToluene/(kg*km)] Toluene Emissions outside of town; Euro 2
- E2Sp_Toluol_ges: 5.21421e-6; = ((Anteil_AB*E2Sp_Toluol_AB)+(Anteil_AO*E2Sp_Toluol_AO)+(Anteil_IO*E2Sp_Toluol_IO))*Distanz
  [gToluene/kg] Toluene Emissions weighted; Euro 2
- E2Sp_Toluol_IO: 1.15349e-7; = (0.002065477+(0.002749938-0.002065477)*Auslast)/(Nutzlast*1000*Auslast)
  [gToluene/(kg*km)] Toluene Emissions within a town; Euro 2
- E2Sp_Xylol_AB: 1.17449e-7; = (0.002515933+(0.002727139-0.002515933)*Auslast)/(Nutzlast*1000*Auslast)
  [gXylene/(kg*km)] Xylene Emissions motorway; Euro 2
- E2Sp_Xylol_AO: 1.1425e-7; = (0.002292248+(0.002680239-0.002292248)*Auslast)/(Nutzlast*1000*Auslast)
  [gXylene/(kg*km)] Xylene Emissions outside of town; Euro 2
- E2Sp_Xylol_ges: 1.30355e-5; = ((Anteil_AB*E2Sp_Xylol_AB)+(Anteil_AO*E2Sp_Xylol_AO)+(Anteil_IO*E2Sp_Xylol_IO))*Distanz
  [gXylene/kg] Xylene Emissions weighted; Euro 2
- E2Sp_Xylol_IO: 2.88374e-7; = (0.005163693+(0.006874845-0.005163693)*Auslast)/(Nutzlast*1000*Auslast)
  [gXylene/(kg*km)] Xylene Emissions within a town; Euro 2
- E3Sp_Benzol_AB: 2.31095e-7; = (0.005558006+(0.005258731-0.005558006)*Auslast)/(Nutzlast*1000*Auslast)
  [gBenzene/(kg*km)] Benzene emissions motorway; Euro 3
- E3Sp_Benzol_AO: 2.1233e-7; = (0.004798944+(0.004886031-0.004798944)*Auslast)/(Nutzlast*1000*Auslast)
  [gBenzene/(kg*km)] Benzene emissions outside of town; Euro 3
- E3Sp_Benzol_ges: 2.53365e-5; = ((Anteil_AB*E3Sp_Benzol_AB)+(Anteil_AO*E3Sp_Benzol_AO)+(Anteil_IO*E3Sp_Benzol_IO))*Distanz
  [gBenzene/kg] Benzene emissions weighted; Euro 3
- E3Sp_Benzol_IO: 5.65772e-7; = (0.010704031+(0.013386887-0.010704031)*Auslast)/(Nutzlast*1000*Auslast)
  [gBenzene/(kg*km)] Benzene emissions within a town; Euro 3
- E3Sp_CH4_AB: 3.32112e-7; = (0.007987553+(0.007557458-0.007987553)*Auslast)/(Nutzlast*1000*Auslast)
  [gCH4/(kg*km)] CH4 Emissions motorway; Euro 3
- E3Sp_CH4_AO: 3.05145e-7; = (0.006896685+(0.007021842-0.006896685)*Auslast)/(Nutzlast*1000*Auslast)
  [gCH4/(kg*km)] CH4 Emissions outside of town; Euro 3
- E3Sp_CH4_ges: 3.64118e-5; = ((Anteil_AB*E3Sp_CH4_AB)+(Anteil_AO*E3Sp_CH4_AO)+(Anteil_IO*E3Sp_CH4_IO))*Distanz
  [gCH4/kg] CH4 Emissions weighted; Euro 3
- E3Sp_CH4_IO: 8.13085e-7; = (0.015383039+(0.019238641-0.015383039)*Auslast)/(Nutzlast*1000*Auslast)
  [gCH4/(kg*km)] CH4 Emissions within a town; Euro 3
- E3Sp_CO_AB: 5.97969e-5; = (1.25731194+(1.392638445-1.25731194)*Auslast)/(Nutzlast*1000*Auslast)
  [gCO/(kg*km)] CO Emissions motorway; Euro 3
- E3Sp_CO_AO: 7.14921e-5; = (1.305427074+(1.699917555-1.305427074)*Auslast)/(Nutzlast*1000*Auslast)
  [gCO/(kg*km)] CO Emissions outside of town; Euro 3
- E3Sp_CO_ges: 0.00711407; = ((Anteil_AB*E3Sp_CO_AB)+(Anteil_AO*E3Sp_CO_AO)+(Anteil_IO*E3Sp_CO_IO))*Distanz
  [gCO/kg] CO Emissions weighted; Euro 3
- E3Sp_CO_IO: 0.000166508; = (2.556429863+(4.044592857-2.556429863)*Auslast)/(Nutzlast*1000*Auslast)
  [gCO/(kg*km)] CO Emissions within a town; Euro 3
- E3Sp_CO2_AB: 0.0408637; = (626.593689+(992.7439575-626.593689)*Auslast)/(Nutzlast*1000*Auslast)
  [gCO2/(kg*km)] CO2 Emissions motorway; Euro 3
- E3Sp_CO2_AO: 0.0439465; = (607.892334+(1079.281006-607.892334)*Auslast)/(Nutzlast*1000*Auslast)
  [gCO2/(kg*km)] CO2 Emissions outside of town; Euro 3
- E3Sp_CO2_ges: 4.39505; = ((Anteil_AB*E3Sp_CO2_AB)+(Anteil_AO*E3Sp_CO2_AO)+(Anteil_IO*E3Sp_CO2_IO))*Distanz
  [gCO2/kg] CO2 Emissions weighted; Euro 3
- E3Sp_CO2_IO: 0.0702009; = (964.913269+(1725.145508-964.913269)*Auslast)/(Nutzlast*1000*Auslast)
  [gCO2/(kg*km)] CO2 Emissions within a town; Euro 3
- E3Sp_Diesel_AB: 1.28704e-5; = (0.19735234+(0.31267526-0.19735234)*Auslast)/(Nutzlast*1000*Auslast)
  [kgDiesel/(kg*km)] Diesel consumption; Euro 3
- E3Sp_Diesel_AO: 1.38414e-5; = (0.19146216+(0.33993103-0.19146216)*Auslast)/(Nutzlast*1000*Auslast)
  [kgDiesel/(kg*km)] Diesel consumption; Euro 3
- E3Sp_Diesel_ges: 0.00138427; = ((Anteil_AB*E3Sp_Diesel_AB)+(Anteil_AO*E3Sp_Diesel_AO)+(Anteil_IO*E3Sp_Diesel_IO))*Distanz
  [kgDiesel/kg] Diesel consumption; Euro 3
- E3Sp_Diesel_IO: 2.21105e-5; = (0.3039097+(0.54335291-0.3039097)*Auslast)/(Nutzlast*1000*Auslast)
  [kgDiesel/(kg* km)] Diesel consumption; Euro 3
- E3Sp_N2O_AB: 0.000257081; = 5.9/(Tonnage*1000)
  [mgN2O/(kg*km)] N2O Emissions motorway; Euro 3
- E3Sp_N2O_AO: 0.000339869; = 7.8/(Tonnage*1000)
  [mgN2O/(kg*km)] N2O Emissions outside of town; Euro 3
- E3Sp_N2O_ges: 0.0285664; = ((Anteil_AB*E3Sp_N2O_AB)+(Anteil_AO*E3Sp_N2O_AO)+(Anteil_IO*E3Sp_N2O_IO))*Distanz
  [mgN2O/kg] N2O Emissions weighted; Euro 3
- E3Sp_N2O_IO: 0.000366013; = 8.4/(Tonnage*1000)
  [mgN2O/(kg*km)] N2O Emissions within a town; Euro 3
- E3Sp_NH3: 0.0217865; = 5*Distanz/(Tonnage*1000)
  [mgNH3/kg)] NH3 Emissions in any traffic situation; Euro 3
- E3Sp_NMVOC_AB: 1.31198e-5; = (0.315541634+(0.298551084-0.315541634)*Auslast)/(Nutzlast*1000*Auslast)
  [gNMVOC/(kg*km)] NMVOC Emissions (Without Xylene, Toluene and Benzene); Euro 3
- E3Sp_NMVOC_AO: 1.20545e-5; = (0.272447819+(0.277391995-0.272447819)*Auslast)/(Nutzlast*1000*Auslast)
  [gNMVOC/(kg*km)] NMVOC Emissions (Without Xylene, Toluene and Benzene); Euro 3
- E3Sp_NMVOC_ges: 0.00143842; = ((Anteil_AB*E3Sp_NMVOC_AB)+(Anteil_AO*E3Sp_NMVOC_AO)+(Anteil_IO*E3Sp_NMVOC_IO))*Distanz
  [gNMVOC/kg] NMVOC Emissions (Without Xylene, Toluene and Benzene); Euro 3
- E3Sp_NMVOC_IO: 3.21202e-5; = (0.60769413+(0.760006482-0.60769413)*Auslast)/(Nutzlast*1000*Auslast)
  [gNMVOC/(kg*km)] NMVOC Emissions (Without Xylene, Toluene and Benzene); Euro 3
- E3Sp_NOx_AB: 0.000330699; = (5.222245693+(8.007289886-5.222245693)*Auslast)/(Nutzlast*1000*Auslast)
  [gNOx/(kg*km)] NOx Emissions motorway; Euro 3
- E3Sp_NOx_AO: 0.00037414; = (5.738945961+(9.089015961-5.738945961)*Auslast)/(Nutzlast*1000*Auslast)
  [gNOx/(kg*km)] NOx Emissions outside of town; Euro 3
- E3Sp_NOx_ges: 0.0364394; = ((Anteil_AB*E3Sp_NOx_AB)+(Anteil_AO*E3Sp_NOx_AO)+(Anteil_IO*E3Sp_NOx_IO))*Distanz
  [gNOx/kg] NOx Emissions weighted; Euro 3
- E3Sp_NOx_IO: 0.000621568; = (8.795174599+(15.2302351-8.795174599)*Auslast)/(Nutzlast*1000*Auslast)
  [gNOx/(kg*km)] NOx Emissions within a town; Euro 3
- E3Sp_Part_AB: 6.96659e-6; = (0.154254138+(0.160876617-0.154254138)*Auslast)/(Nutzlast*1000*Auslast)
  [gParticulate matter/(kg*km)] Particulate emissions motorway; Euro 3
- E3Sp_Part_AO: 7.27994e-6; = (0.14788948+(0.170460165-0.14788948)*Auslast)/(Nutzlast*1000*Auslast)
  [gParticulate matter/(kg*km)] Particulate emissions outside of town; Euro 3
- E3Sp_Part_ges: 0.000782419; = ((Anteil_AB*E3Sp_Part_AB)+(Anteil_AO*E3Sp_Part_AO)+(Anteil_IO*E3Sp_Part_IO))*Distanz
  [gParticulate matter/kg] Particulate emissions weighted; Euro 3
- E3Sp_Part_IO: 1.67465e-5; = (0.291178823+(0.400771141-0.291178823)*Auslast)/(Nutzlast*1000*Auslast)
  [gParticulate matter/(kg*km)] Particulate emissions within a town; Euro 3
- E3Sp_SO2_AB: 1.28704e-9; = (ppm_Schwefel/1000000)*2*E3Sp_Diesel_AB
  [kgSO2/(kg*km)] SO2 Emissions motorway / 2 (Molar weight SO2/Molar weight S=64g/32g); Euro 3
- E3Sp_SO2_AO: 1.38414e-9; = (ppm_Schwefel/1000000)*2*E3Sp_Diesel_AO
  [kgSO2/(kg*km)] SO2 Emissions outside of town / 2 (Molar weight SO2/Molar weight S=64g/32g); Euro 3
- E3Sp_SO2_ges: 1.38427e-7; = ((Anteil_AB*E3Sp_SO2_AB)+(Anteil_AO*E3Sp_SO2_AO)+(Anteil_IO*E3Sp_SO2_IO))*Distanz
  [kgSO2/kg] SO2 Emissions weighted; Euro 3
- E3Sp_SO2_IO: 2.21105e-9; = (ppm_Schwefel/1000000)*2*E3Sp_Diesel_IO
  [kgSO2/(kg*km)] SO2 Emissions within a town / 2 (Molar weight SO2/Molar weight S=64g/32g); Euro 3
- E3Sp_Toluol_AB: 4.42816e-8; = (0.001065007+(0.001007661-0.001065007)*Auslast)/(Nutzlast*1000*Auslast)
  [gToluene/(kg*km)] Toluene Emissions motorway; Euro 3
- E3Sp_Toluol_AO: 4.0686e-8; = (0.000919558+(0.000936246-0.000919558)*Auslast)/(Nutzlast*1000*Auslast)
  [gToluene/(kg*km)] Toluene Emissions outside of town; Euro 3
- E3Sp_Toluol_ges: 4.8549e-6; = ((Anteil_AB*E3Sp_Toluol_AB)+(Anteil_AO*E3Sp_Toluol_AO)+(Anteil_IO*E3Sp_Toluol_IO))*Distanz
  [gToluene/kg] Toluene Emissions weighted; Euro 3
- E3Sp_Toluol_IO: 1.08411e-7; = (0.002051072+(0.002565152-0.002051072)*Auslast)/(Nutzlast*1000*Auslast)
  [gToluene/(kg*km)] Toluene Emissions within a town; Euro 3
- E3Sp_Xylol_AB: 1.10704e-7; = (0.002662518+(0.002519153-0.002662518)*Auslast)/(Nutzlast*1000*Auslast)
  [gXylene/(kg*km)] Xylene Emissions motorway; Euro 3
- E3Sp_Xylol_AO: 1.01715e-7; = (0.002298895+(0.002340614-0.002298895)*Auslast)/(Nutzlast*1000*Auslast)
  [gXylene/(kg*km)] Xylene Emissions outside of town; Euro 3
- E3Sp_Xylol_ges: 1.21373e-5; = ((Anteil_AB*E3Sp_Xylol_AB)+(Anteil_AO*E3Sp_Xylol_AO)+(Anteil_IO*E3Sp_Xylol_IO))*Distanz
  [gXylene/kg] Xylene Emissions weighted; Euro 3
- E3Sp_Xylol_IO: 2.71028e-7; = (0.00512768+(0.00641288-0.00512768)*Auslast)/(Nutzlast*1000*Auslast)
  [gXylene/(kg*km)] Xylene Emissions within a town; Euro 3
- E4Sp_Benzol_AB: 2.98459e-7; = (0.006866262+(0.006846708-0.006866262)*Auslast)/(Nutzlast*1000*Auslast)
  [gBenzene/(kg*km)] Benzene emissions motorway; Euro 4
- E4Sp_Benzol_AO: 2.77004e-7; = (0.005975349+(0.006424624-0.005975349)*Auslast)/(Nutzlast*1000*Auslast)
  [gBenzene/(kg*km)] Benzene emissions outside of town; Euro 4
- E4Sp_Benzol_ges: 3.22491e-5; = ((Anteil_AB*E4Sp_Benzol_AB)+(Anteil_AO*E4Sp_Benzol_AO)+(Anteil_IO*E4Sp_Benzol_IO))*Distanz
  [gBenzene/kg] Benzene emissions weighted; Euro 4
- E4Sp_Benzol_IO: 6.63227e-7; = (0.012266223+(0.015742512-0.012266223)*Auslast)/(Nutzlast*1000*Auslast)
  [gBenzene/(kg*km)] Benzene emissions within a town; Euro 4
- E4Sp_CH4_AB: 4.28924e-7; = (0.009867683+(0.00983958-0.009867683)*Auslast)/(Nutzlast*1000*Auslast)
  [gCH4/(kg*km)] CH4 Emissions motorway; Euro 4
- E4Sp_CH4_AO: 3.98089e-7; = (0.008587328+(0.009232994-0.008587328)*Auslast)/(Nutzlast*1000*Auslast)
  [gCH4/(kg*km)] CH4 Emissions outside of town; Euro 4
- E4Sp_CH4_ges: 4.63461e-5; = ((Anteil_AB*E4Sp_CH4_AB)+(Anteil_AO*E4Sp_CH4_AO)+(Anteil_IO*E4Sp_CH4_IO))*Distanz
  [gCH4/kg] CH4 Emissions weighted; Euro 4
- E4Sp_CH4_IO: 9.53141e-7; = (0.017628107+(0.022623971-0.017628107)*Auslast)/(Nutzlast*1000*Auslast)
  [gCH4/(kg*km)] CH4 Emissions within a town; Euro 4
- E4Sp_CO_AB: 3.77986e-5; = (0.906178653+(0.860649645-0.906178653)*Auslast)/(Nutzlast*1000*Auslast)
  [gCO/(kg*km)] CO Emissions motorway; Euro 4
- E4Sp_CO_AO: 4.7106e-5; = (0.971730471+(1.100381255-0.971730471)*Auslast)/(Nutzlast*1000*Auslast)
  [gCO/(kg*km)] CO Emissions outside of town; Euro 4
- E4Sp_CO_ges: 0.00461303; = ((Anteil_AB*E4Sp_CO_AB)+(Anteil_AO*E4Sp_CO_AO)+(Anteil_IO*E4Sp_CO_IO))*Distanz
  [gCO/kg] CO Emissions weighted; Euro 4
- E4Sp_CO_IO: 0.000114022; = (1.765907645+(2.766971111-1.765907645)*Auslast)/(Nutzlast*1000*Auslast)
  [gCO/(kg*km)] CO Emissions within a town; Euro 4
- E4Sp_CO2_AB: 0.0413962; = (627.8233032+(1006.904602-627.8233032)*Auslast)/(Nutzlast*1000*Auslast)
  [gCO2/(kg*km)] CO2 Emissions motorway; Euro 4
- E4Sp_CO2_AO: 0.0444108; = (606.0595093+(1092.139038-606.0595093)*Auslast)/(Nutzlast*1000*Auslast)
  [gCO2/(kg*km)] CO2 Emissions outside of town; Euro 4
- E4Sp_CO2_ges: 4.43933; = ((Anteil_AB*E4Sp_CO2_AB)+(Anteil_AO*E4Sp_CO2_AO)+(Anteil_IO*E4Sp_CO2_IO))*Distanz
  [gCO2/kg] CO2 Emissions weighted; Euro 4
- E4Sp_CO2_IO: 0.0698166; = (943.6578979+(1718.52124-943.6578979)*Auslast)/(Nutzlast*1000*Auslast)
  [gCO2/(kg*km)] CO2 Emissions within a town; Euro 4
- E4Sp_Diesel_AB: 1.30382e-5; = (0.19773962+(0.31713531-0.19773962)*Auslast)/(Nutzlast*1000*Auslast)
  [kgDiesel/(kg*km)] Diesel consumption; Euro 4
- E4Sp_Diesel_AO: 1.39876e-5; = (0.19088489+(0.3439808-0.19088489)*Auslast)/(Nutzlast*1000*Auslast)
  [kgDiesel/(kg*km)] Diesel consumption; Euro 4
- E4Sp_Diesel_ges: 0.00139821; = ((Anteil_AB*E4Sp_Diesel_AB)+(Anteil_AO*E4Sp_Diesel_AO)+(Anteil_IO*E4Sp_Diesel_IO))*Distanz
  [kgDiesel/kg] Diesel consumption; Euro 4
- E4Sp_Diesel_IO: 2.19895e-5; = (0.29721509+(0.54126654-0.29721509)*Auslast)/(Nutzlast*1000*Auslast)
  [kgDiesel/(kg* km)] Diesel consumption; Euro 4
- E4Sp_N2O_AB: 0.000257081; = 5.9/(Tonnage*1000)
  [mgN2O/(kg*km)] N2O Emissions motorway; Euro 4
- E4Sp_N2O_AO: 0.000339869; = 7.8/(Tonnage*1000)
  [mgN2O/(kg*km)] N2O Emissions outside of town; Euro 4
- E4Sp_N2O_ges: 0.0285664; = ((Anteil_AB*E4Sp_N2O_AB)+(Anteil_AO*E4Sp_N2O_AO)+(Anteil_IO*E4Sp_N2O_IO))*Distanz
  [mgN2O/kg] N2O Emissions weighted; Euro 4
- E4Sp_N2O_IO: 0.000366013; = 8.4/(Tonnage*1000)
  [mgN2O/(kg*km)] N2O Emissions within a town; Euro 4
- E4Sp_NH3: 0.0217865; = 5*Distanz/(Tonnage*1000)
  [mgNH3/kg)] NH3 Emissions in any traffic situation; Euro 4
- E4Sp_NMVOC_AB: 1.69443e-5; = (0.389814587+(0.388704455-0.389814587)*Auslast)/(Nutzlast*1000*Auslast)
  [gNMVOC/(kg*km)] NMVOC Emissions (Without Xylene, Toluene and Benzene); Euro 4
- E4Sp_NMVOC_AO: 1.57262e-5; = (0.339235242+(0.364741724-0.339235242)*Auslast)/(Nutzlast*1000*Auslast)
  [gNMVOC/(kg*km)] NMVOC Emissions (Without Xylene, Toluene and Benzene); Euro 4
- E4Sp_NMVOC_ges: 0.00183086; = ((Anteil_AB*E4Sp_NMVOC_AB)+(Anteil_AO*E4Sp_NMVOC_AO)+(Anteil_IO*E4Sp_NMVOC_IO))*Distanz
  [gNMVOC/kg] NMVOC Emissions (Without Xylene, Toluene and Benzene); Euro 4
- E4Sp_NMVOC_IO: 3.76531e-5; = (0.696383655+(0.893741136-0.696383655)*Auslast)/(Nutzlast*1000*Auslast)
  [gNMVOC/(kg*km)] NMVOC Emissions (Without Xylene, Toluene and Benzene); Euro 4
- E4Sp_NOx_AB: 0.00020367; = (3.190988541+(4.935979366-3.190988541)*Auslast)/(Nutzlast*1000*Auslast)
  [gNOx/(kg*km)] NOx Emissions motorway; Euro 4
- E4Sp_NOx_AO: 0.000250772; = (4.190591812+(6.03132534-4.190591812)*Auslast)/(Nutzlast*1000*Auslast)
  [gNOx/(kg*km)] NOx Emissions outside of town; Euro 4
- E4Sp_NOx_ges: 0.0240629; = ((Anteil_AB*E4Sp_NOx_AB)+(Anteil_AO*E4Sp_NOx_AO)+(Anteil_IO*E4Sp_NOx_IO))*Distanz
  [gNOx/kg] NOx Emissions weighted; Euro 4
- E4Sp_NOx_IO: 0.00052435; = (7.732958317+(12.79281235-7.732958317)*Auslast)/(Nutzlast*1000*Auslast)
  [gNOx/(kg*km)] NOx Emissions within a town; Euro 4
- E4Sp_Part_AB: 1.36886e-6; = (0.02739075+(0.032125678-0.02739075)*Auslast)/(Nutzlast*1000*Auslast)
  [gParticulate matter/(kg*km)] Particulate emissions motorway; Euro 4
- E4Sp_Part_AO: 1.7047e-6; = (0.035441618+(0.039772589-0.035441618)*Auslast)/(Nutzlast*1000*Auslast)
  [gParticulate matter/(kg*km)] Particulate emissions outside of town; Euro 4
- E4Sp_Part_ges: 0.000169414; = ((Anteil_AB*E4Sp_Part_AB)+(Anteil_AO*E4Sp_Part_AO)+(Anteil_IO*E4Sp_Part_IO))*Distanz
  [gParticulate matter/kg] Particulate emissions weighted; Euro 4
- E4Sp_Part_IO: 4.42729e-6; = (0.071415022+(0.106934227-0.071415022)*Auslast)/(Nutzlast*1000*Auslast)
  [gParticulate matter/(kg*km)] Particulate emissions within a town; Euro 4
- E4Sp_SO2_AB: 1.30382e-9; = (ppm_Schwefel/1000000)*2*E4Sp_Diesel_AB
  [kgSO2/(kg*km)] SO2 Emissions motorway / 2 (Molar weight SO2/Molar weight S=64g/32g); Euro 4
- E4Sp_SO2_AO: 1.39876e-9; = (ppm_Schwefel/1000000)*2*E4Sp_Diesel_AO
  [kgSO2/(kg*km)] SO2 Emissions outside of town / 2 (Molar weight SO2/Molar weight S=64g/32g); Euro 4
- E4Sp_SO2_ges: 1.39821e-7; = ((Anteil_AB*E4Sp_SO2_AB)+(Anteil_AO*E4Sp_SO2_AO)+(Anteil_IO*E4Sp_SO2_IO))*Distanz
  [kgSO2/kg] SO2 Emissions weighted; Euro 4
- E4Sp_SO2_IO: 2.19895e-9; = (ppm_Schwefel/1000000)*2*E4Sp_Diesel_IO
  [kgSO2/(kg*km)] SO2 Emissions within a town / 2 (Molar weight SO2/Molar weight S=64g/32g); Euro 4
- E4Sp_Toluol_AB: 5.71898e-8; = (0.001315691+(0.001311944-0.001315691)*Auslast)/(Nutzlast*1000*Auslast)
  [gToluene/(kg*km)] Toluene Emissions motorway; Euro 4
- E4Sp_Toluol_AO: 5.30785e-8; = (0.001144977+(0.001231066-0.001144977)*Auslast)/(Nutzlast*1000*Auslast)
  [gToluene/(kg*km)] Toluene Emissions outside of town; Euro 4
- E4Sp_Toluol_ges: 6.17948e-6; = ((Anteil_AB*E4Sp_Toluol_AB)+(Anteil_AO*E4Sp_Toluol_AO)+(Anteil_IO*E4Sp_Toluol_IO))*Distanz
  [gToluene/kg] Toluene Emissions weighted; Euro 4
- E4Sp_Toluol_IO: 1.27085e-7; = (0.002350414+(0.003016529-0.002350414)*Auslast)/(Nutzlast*1000*Auslast)
  [gToluene/(kg*km)] Toluene Emissions within a town; Euro 4
- E4Sp_Xylol_AB: 1.42975e-7; = (0.003289228+(0.00327986-0.003289228)*Auslast)/(Nutzlast*1000*Auslast)
  [gXylene/(kg*km)] Xylene Emissions motorway; Euro 4
- E4Sp_Xylol_AO: 1.32696e-7; = (0.002862443+(0.003077665-0.002862443)*Auslast)/(Nutzlast*1000*Auslast)
  [gXylene/(kg*km)] Xylene Emissions outside of town; Euro 4
- E4Sp_Xylol_ges: 1.54487e-5; = ((Anteil_AB*E4Sp_Xylol_AB)+(Anteil_AO*E4Sp_Xylol_AO)+(Anteil_IO*E4Sp_Xylol_IO))*Distanz
  [gXylene/kg] Xylene Emissions weighted; Euro 4
- E4Sp_Xylol_IO: 3.17714e-7; = (0.005876035+(0.007541324-0.005876035)*Auslast)/(Nutzlast*1000*Auslast)
  [gXylene/(kg*km)] Xylene Emissions within a town; Euro 4
- Nutzlast: 27
  [07] [t] Standard = 27 t
- ppm_Schwefel: 50
  [03] [ppm] Proportion of sulphur in diesel, European standard as of 2003 = 50 ppm
- Spez_Benzol_ges: 3.03626e-5; = E0Sp_Benzol_ges*Anteil_E0+E1Sp_Benzol_ges*Anteil_E1+E2Sp_Benzol_ges*Anteil_E2+E3Sp_Benzol_ges*Anteil_E3+E4Sp_Benzol_ges*Anteil_E4
  [gBenzene/kg] Benzene emissions weighted; Mix
- Spez_CH4_ges: 4.36348e-5; = E0Sp_CH4_ges*Anteil_E0+E1Sp_CH4_ges*Anteil_E1+E2Sp_CH4_ges*Anteil_E2+E3Sp_CH4_ges*Anteil_E3+E4Sp_CH4_ges*Anteil_E4
  [gCH4/kg] CH4 Emissions weighted; Mix
- Spez_CO_ges: 0.00629818; = E0Sp_CO_ges*Anteil_E0+E1Sp_CO_ges*Anteil_E1+E2Sp_CO_ges*Anteil_E2+E3Sp_CO_ges*Anteil_E3+E4Sp_CO_ges*Anteil_E4
  [gCO/kg] CO Emissions weighted; Mix
- Spez_CO2_ges: 4.42449; = E0Sp_CO2_ges*Anteil_E0+E1Sp_CO2_ges*Anteil_E1+E2Sp_CO2_ges*Anteil_E2+E3Sp_CO2_ges*Anteil_E3+E4Sp_CO2_ges*Anteil_E4
  [gCO2/kg] CO2 Emissions weighted; Mix
- Spez_Diesel_ges: 0.00139354; = E0Sp_Diesel_ges*Anteil_E0+E1Sp_Diesel_ges*Anteil_E1+E2Sp_Diesel_ges*Anteil_E2+E3Sp_Diesel_ges*Anteil_E3+E4Sp_Diesel_ges*Anteil_E4
  [kgDiesel/kg] Diesel consumption; Mix
- Spez_N2O_ges: 0.0342242; = E0Sp_N2O_ges*Anteil_E0+E1Sp_N2O_ges*Anteil_E1+E2Sp_N2O_ges*Anteil_E2+E3Sp_N2O_ges*Anteil_E3+E4Sp_N2O_ges*Anteil_E4
  [mgN2O/kg] N2O Emissions weighted; Mix
- Spez_NH3: 0.0217865; = E0Sp_NH3*Anteil_E0+E1Sp_NH3*Anteil_E1+E2Sp_NH3*Anteil_E2+E3Sp_NH3*Anteil_E3+E4Sp_NH3*Anteil_E4
  [mgNH3/kg)] NH3 Emissions in any traffic situation; Mix
- Spez_NMVOC_ges: 0.00172376; = E0Sp_NMVOC_ges*Anteil_E0+E1Sp_NMVOC_ges*Anteil_E1+E2Sp_NMVOC_ges*Anteil_E2+E3Sp_NMVOC_ges*Anteil_E3+E4Sp_NMVOC_ges*Anteil_E4
  [gNMVOC/kg] NMVOC Emissions (Without Xylene, Toluene and Benzene); Mix
- Spez_NOx_ges: 0.0372097; = E0Sp_NOx_ges*Anteil_E0+E1Sp_NOx_ges*Anteil_E1+E2Sp_NOx_ges*Anteil_E2+E3Sp_NOx_ges*Anteil_E3+E4Sp_NOx_ges*Anteil_E4
  [gNOx/kg] NOx Emissions weighted; Mix
- Spez_Part_ges: 0.000716765; = E0Sp_Part_ges*Anteil_E0+E1Sp_Part_ges*Anteil_E1+E2Sp_Part_ges*Anteil_E2+E3Sp_Part_ges*Anteil_E3+E4Sp_Part_ges*Anteil_E4
  [gParticulate matter/kg] Particulate emissions weighted; Mix
- Spez_SO2_ges: 1.39354e-7; = E0Sp_SO2_ges*Anteil_E0+E1Sp_SO2_ges*Anteil_E1+E2Sp_SO2_ges*Anteil_E2+E3Sp_SO2_ges*Anteil_E3+E4Sp_SO2_ges*Anteil_E4
  [kgSO2/kg] SO2 Emissions weighted; Mix
- Spez_Toluol_ges: 5.81798e-6; = E0Sp_Toluol_ges*Anteil_E0+E1Sp_Toluol_ges*Anteil_E1+E2Sp_Toluol_ges*Anteil_E2+E3Sp_Toluol_ges*Anteil_E3+E4Sp_Toluol_ges*Anteil_E4
  [gToluene/kg] Toluene Emissions weighted; Mix
- Spez_Xylol_ges: 1.45449e-5; = E0Sp_Xylol_ges*Anteil_E0+E1Sp_Xylol_ges*Anteil_E1+E2Sp_Xylol_ges*Anteil_E2+E3Sp_Xylol_ges*Anteil_E3+E4Sp_Xylol_ges*Anteil_E4
  [gXylene/kg] Xylene Emissions weighted; Mix
- Tonnage: 22.95; = Auslast*Nutzlast
  [t]

## Reference product
- cargo: 1

## Inputs
- cargo: 1
- diesel: 0.00139354; = Spez_Diesel_ges; calculated

## Outputs
All rows: calculated
- ammonia (Emissions to air): 2.17865e-8; = 1e-6 * Spez_NH3
- benzene (Emissions to air): 3.03626e-8; = 0.001 * Spez_Benzol_ges
- carbon dioxide (Emissions to air): 0.00442449; = 0.001 * Spez_CO2_ges
- carbon monoxide (Emissions to air): 6.29818e-6; = 0.001 * Spez_CO_ges
- methane (Emissions to air): 4.36348e-8; = 0.001 * Spez_CH4_ges
- nitrogen dioxide (Emissions to air): 3.72097e-5; = 0.001 * Spez_NOx_ges
- nitrous oxide (Emissions to air): 3.42242e-8; = 1e-6 * Spez_N2O_ges
- non-methane volatile organic compounds (Emissions to air): 1.72376e-6; = 0.001 * Spez_NMVOC_ges
- particles (PM2.5) (Emissions to air): 7.16765e-7; = 0.001 * Spez_Part_ges
- sulfur dioxide (Emissions to air): 1.39354e-7; = Spez_SO2_ges
- toluene (Emissions to air): 5.81798e-9; = 0.001 * Spez_Toluol_ges
- xylene (all isomers) (Emissions to air): 1.45449e-8; = 0.001 * Spez_Xylol_ges

## Modelling constants
All data used in the calculation of the LCI results refer to net calorific value.

## Cut-off and completeness
Cut-off rules for each unit process: Coverage of at least 95 % of mass and energy of the input and output flows, and 98 % of their environmental relevance (according to expert judgement).

## Deviations from cut-off and completeness
Manufacturing and EoL of vehicle is not included.

## Data selection and combination
Data sources for the transport system are sufficiently consistent, emission factors are based on average European conditions (key emissions are based on measured operating data). LCI modelling is fully consistent.

## Data treatment and extrapolations
Several data sources have been averaged. Measured data from representative transport systems have been upscaled.

## Sampling procedure
Weighted average based on transport performance.

## Data collection period
2003-2007

## Use advice
The data set should be used for LCI/LCA studies where bulk commodities or packaged goods have to be transported via road. The data set allows individual settings of the variable parameters. The following parameters are variable (default settings): payload (27 t), utilisation ratio (85%), distance (100 km), sulphur content of fuel (50ppm), driving share urban/interurban/motorway as well as the share of EURO 0 to EURO 4 tonkilometers. Default values of the variable parameters have to be checked and adjusted for individual use. The data set does not include the fuel supply route. Therefore the fuel supply data set (diesel) has to be linked with this data set. Vehicle production and end-of-life treatment are not part of the data set (negligible from a LCA point of view).

## Review details
Inventory: The internal review was done by several iteration steps concerning raw data validation, raw data documentation, representativity, completeness and consistency of modelling with regard to ISO 14040 and 14044.; Documentation: The review of the documentation was performed by Ecobilan and is in compliance with ISO 14040 and 14044. The data set documentation is correct in view of the appropriateness of the information provided. It includes all relevant information in view of data quality and scope of application of the respective LCI result.

## Data sources
- Simulierung umweltrelevanter Auswirkungen von Transportprozessen, 1995
- Ökologische Bilanzierung - Einsatz von Nutzfahrzeugen in Transport, Landwirtschaft und Bergbau, 1999
- BGL - Daten und Fakten, 2006
- Richtlinie 1999/96/EG, Maßnahmen gegen Emission gasf. Schadstoffe und luftverunreinigender Partikel,
- Richtlinie 2003/17/EG - Qualität von Otto- und Dieselkraftstoffen, 2003
- EUROPA - Environment - Auto-Oil II Programme, 2000
- Emission functions for Heavy Duty Vehicles, 2003
- Statistische Mitteilungen, Reihe 2: Kraftfahrzeuge, 2003
- Emissionen und Minderungspotential von HFKW, FKW und SF6 in Deutschland, Im Auftrag des UBA, 1999
- Handbuch Emissionsfaktoren des Straáenverkehrs, Version 2.1, 2004
- Umweltlexikon: Betankungsverlust, 2006
- Spezif. Energieeinsatz im Verkehr, Ermittlung und Vergleich der spezif. Energieverbräuche, 1990
- TREMOVE 2.7 / EMISSIONS, 2007
- GaBi databases 2006

## Intended applications
This background LCI data set can be used for any types of LCA studies.
