# Waste water treatment; chemical reduction/oxidation process, municipal waste water; at waste water treatment plant

Dataset: ILCD process, Unit process, single operation
Geography: RER
Reference year: 2003
Valid until: 2010
Classification: End-of-life treatment / Waste water treatment
LCI method principle: Attributional
Completeness: All relevant flows quantified
Share of supply or production covered: 95 %
Method details: GaBi Modelling Principles
Generated by: PE INTERNATIONAL; LBP-GaBi
Owner: PE INTERNATIONAL
Compliance: ILCD Data Network - Entry-level
Review: Dependent internal review by PE INTERNATIONAL, LBP-GaBi, Ecobilan
Amounts: no units in this file; such an amount is in the reference unit of its flow, which a separate flow dataset defines
copyright: true
accessRestrictions: The data set can be used free of charge by anybody to perform LCA studies, to distribute it to third parties, to convert it to other formats, to develop own data sets etc. as long as the copyright and license conditions for the ELCD data sets and the ILCD format are met that can be accessed via http://lca.jrc.ec.europa.eu. Please note e.g. that reference must be given to the 'Owner of data set' and to the 'ELCD database' plus version number, when using the data set or parts thereof. Please note also, that any modifications/omissions of the data set results in invalidity of any existing 'Official approval of data set by producer/operator', that the impression must be avoided that this would still be a complete ELCD data set, and that the content of further fields has to be adjusted. For details see the aforementioned copyright and license conditions.

## General comment
The data set covers all relevant process steps / technologies with a good overall data quality. The inventory is mainly based on industry data and completed, where necessary, by secondary data.

## Geography
Average based on Central European countries. No distinction between Northern and Southern Europe is done.

## Time period
Data set valid for annually equal discharge. Not appropriate for differences in seasons or seasonal peaks.

## Technology and included processes
This data set represents an average waste water treatment plant using the chemical reduction/oxidation process. Inputs to the process are: waste water untreated, iron chloride, hydrated lime (dry slaked), phosphoric acid, power and thermal energy from natural gas. The outputs are treated water and the emissions to fresh water. Emissions are calculated based on the reduction number provided by the user in the variable parameters. Energy supply chain and the production of intermediates used in the process are not included in the data set.

## Technical purpose
Average treatment for urban (domestic) waste water.

## Model description
Variable parameters (with default setting) are: BOD, COD, cadmium, chromium (III), chromium (VI), copper, mercury, heavy metals (values will be used for arsenic, cobalt, manganese and thallium), nitrogen, ammonia, nickel, nitrate, phosphor, lead, phosphate and zinc entering the treatment plant and the reduction to be achieved. They are all measured in mg/l. For all these parameters, the reduction to be achieved in the process should also be given by the user (default values are provided).
The emission profile is calculated according to the settings of the variable parameters. The calculation formulas of the single variables are given in the section variable / parameter.

## Parameters
- bod: 16; = bod_in-bod_red*bod_in
  [mg/l out] Biochemical oxygen demand (BOD) in the output
- bod_in: 1000
  [mg/l in] Biochemical oxygen demand (BOD) in the input
- bod_red: 0.984
  [-] Biochemical oxygen demand (BOD) Reduction (default 98,4% = 0,984)
- cd: 13.5; = cd_in-cd_red*cd_in
  [mg/l out] Cadmium in the output
- cd_in: 50
  [mg/l in] Cadmium in the input
- cd_red: 0.73
  [-] Cadmium Reduction (default 73% = 0,73)
- cod: 59; = cod_in-cod_red*cod_in
  [mg/l out] Chemical oxygen deman (COD) in the output
- cod_in: 1000
  [mg/l in] Chemical oxygen deman (COD) in the input
- cod_red: 0.941
  [-] Chemical oxygen demand reduction (default 94,1% = 0,941)
- cr3: 1.5; = cr3_in-cr3_red*cr3_in
  [mg/l out] Chromium (III) in the output
- cr3_in: 10
  [mg/l in] Chromium (III) in the input
- cr3_red: 0.85
  [-] Chromium (III) reduction (default 85% = 0,85)
- cr6: 1.5; = cr6_in-cr6_red*cr6_in
  [mg/l out] Chromium (VI) in the output
- cr6_in: 10
  [mg/l in] Chromium (VI) in the input
- cr6_red: 0.85
  [-] Chromium (VI) reduction (default 85% = 0,85)
- cu: 1.2; = cu_in-cu_red*cu_in
  [mg/l out] Copper in the output
- cu_in: 10
  [mg/l in] Copper in the input
- cu_red: 0.88
  [-] Copper Reduction (default 88% = 0,88)
- hg: 2.1; = hg_in-hg_red*hg_in
  [mg/l out] Mercury in the output
- hg_in: 10
  [mg/l in] Mercury in the input
- hg_red: 0.79
  [-] Mercury reduction (default 79% = 0,79)
- hm: 3.7; = hm_in-hm_red*hm_in
  [mg/l out] Remaining heavy metals in the output
- hm_in: 10
  [mg/l in] Remaining heavy metals in the input
- hm_red: 0.63
  [-] Remaining heavy metals reduction [default worst case 63%, Ni = 0,63)
- n: 160; = n_in-n_red*n_in
  [mg/l out] Nitrogen in the output
- n_in: 1000
  [mg/l in] Nitrogen in the input
- n_red: 0.84
  [-] Nitrogen reduction (default 84% = 0,84)
- nh3: 4.8; = nh3_in-nh3_red*nh3_in
  [mg/l out] Ammonia in the output
- nh3_in: 100
  [mg/l in] Ammonia in the input
- nh3_red: 0.952
  [-] Ammonia reduction (default 95,2% = 0,925)
- ni: 3.7; = ni_in-ni_red*ni_in
  [mg/l out] Nickel in the output
- ni_in: 10
  [mg/l in] Nickel in the input
- ni_red: 0.63
  [-] Nickel reduction (default 63% = 0,63)
- no3: 160; = no3_in-no3_red*no3_in
  [mg/l out] Nitrate in the output
- no3_in: 1000
  [mg/l in] Nitrate in the input
- no3_red: 0.84
  [-] Nitrate reduction (default 84% = 0,84)
- p: 18; = p_in-p_red*p_in
  [mg/l out] Phosphor in the output
- p_in: 500
  [mg/l in] Phosphor in the input
- p_red: 0.964
  [-] Phosphor reduction (default 96,4% = 0,964)
- pb: 1.2; = pb_in-pb_red*pb_in
  [mg/l out] Lead in the output
- pb_in: 10
  [mg/l in] Lead in the input
- pb_red: 0.88
  [-] Lead reduction (default 88% = 0,88)
- po4: 18; = po4_in-po4_red*po4_in
  [mg/l out] Phosphate in the output
- po4_in: 500
  [mg/l in] Phosphate in the input
- po4_red: 0.964
  [-] Phosphate reduction (default 96,4% = 0,964)
- zi: 2.1; = zi_in-zi_red*zi_in
  [mg/l out] Zinc in the output
- zi_in: 10
  [mg/l in] Zinc in the input
- zi_red: 0.79
  [-] Zinc reduction (default 79% = 0,79)

## Reference product
- waste water - untreated: 1; input

## Inputs
- electricity: 0.0028572
- hydrated lime dry slaked: 0.0011429
- iron chloride: 0.00057086
- phosphoric acid: 6.258e-8
- process steam: 0.10213

## Outputs
- ammonia (Emissions to water): 4.8e-6; = 1e-6 * nh3
- arsenic (Emissions to water): 3.7e-6; = 1e-6 * hm
- biological oxygen demand (Emissions to water): 1.6e-5; = 1e-6 * bod
- cadmium (Emissions to water): 1.35e-5; = 1e-6 * cd
- chemical oxygen demand (Emissions to water): 5.9e-5; = 1e-6 * cod
- chromium III (Emissions to water): 1.5e-6; = 1e-6 * cr3
- chromium VI (Emissions to water): 1.5e-6; = 1e-6 * cr6
- cobalt (Emissions to water): 3.7e-6; = 1e-6 * hm
- copper (Emissions to water): 1.2e-6; = 1e-6 * cu
- lead (Emissions to water): 1.2e-6; = 1e-6 * pb
- manganese (Emissions to water): 3.7e-6; = 1e-6 * hm
- mercury (Emissions to water): 2.1e-6; = 1e-6 * hg
- nickel (Emissions to water): 3.7e-6; = 1e-6 * ni
- nitrate (Emissions to water): 0.00016; = 1e-6 * no3
- nitrogen (Emissions to water): 0.00016; = 1e-6 * n
- phosphate (Emissions to water): 0.00011826
- thallium (Emissions to water): 3.7e-6; = 1e-6 * hm
- waste water - treated: 1
- zinc (Emissions to water): 2.1e-6; = 1e-6 * zi

## Cut-off and completeness
Cut-off rules for each unit process: Coverage of at least 95 % of mass and energy of the input and output flows, and 98 % of their environmental relevance (according to expert judgement).

## Data selection and combination
Several data sources have been averaged in order to provide a general waste treatment plant. The inputs to the waste water treatment plant provide average quantities of the reduction/oxidation process. Default values for chemical reduction are also based on average. LCI modelling is fully consistent.

## Data treatment and extrapolations
Averaged literature data are used in order to provide a general waste treatment plant.

## Sampling procedure
Emission values represent legal site permit data. Only in the case of heavy metal a worst case number for reduction is applied as 63%, based on expert judgement.

## Data collection period
2003 for product flows, waste flows and emission data; single site measurements 2002

## Use advice
The data set covers the end-of-life stage only, in form of a parameterised unit process level. It can be used to characterise the process chain situation of the respective end-of-life treatment in a representative manner within user specific product LCAs.

## Review details
Inventory: The internal review was done by several iteration steps concerning raw data validation, raw data documentation, representativity, completeness and consistency of modelling with regard to ISO 14040 and 14044.; Documentation: The review of the documentation was performed by Ecobilan and is in compliance with ISO 14040 and 14044. The data set documentation is correct in view of the appropriateness of the information provided. It includes all relevant information in view of data quality and scope of application of the respective LCI result.

## Data sources
- Handbuch des U-schutzes und der U-technik, Additiver Umweltschutz: Behandlung von Abwässern, 1996
- Abwassertechnologie (2. Auflage), 1994
- Organisch verschmutze Abwässer sonstiger Industriegruppen, 1986
- Bayer AG: Sustainable development report 2001, 2001
- Umwelt, Sicherheit, Gesundheit 2002 - Daten und Fakten BASF AG Werk Ludwigshafen, 2002
- ATV Handbuch Industrieabwasser Grundlagen, 1999
- BAT - Common Waste Water and Waste Gas Treatment / Management Systems in the Chemical Sector, 2003
- Council Directive 91/271/EEC of 21 May 1991 concerning urban waste-water treatment, 1991
- GaBi databases 2006

## Intended applications
This background LCI data set can be used for any types of LCA studies.
