# Polyethylene terephthalate (PET) granulate; production mix, at plant; bottle grade

Dataset: ILCD process, Partly terminated system
Geography: RER
Reference year: 1999
Valid until: 2009
Classification: Materials production / Plastics
Synonyms: Ethylene terephthalate polymer; Poly(oxy-1,2-ethanediyloxycarbonyl-1,4phenylenecarbonyl); Polyethylene glycol terephthalate; Terephtahlic acid-ethylene glycol polyester.
LCI method principle: Attributional
LCI method approaches: Allocation - element content
Completeness: All relevant flows quantified
Share of supply or production covered: 95 %
Project: PlasticsEurope Eco-Profiles
Generated by: Boustead
Owner: Plastics Europe
Compliance: ILCD Data Network - Entry-level
Review: Dependent internal review by Plastics Europe; Dependent internal review by Boustead
Amounts: no units in this file; such an amount is in the reference unit of its flow, which a separate flow dataset defines
copyright: true
accessRestrictions: The data set can be used free of charge by anybody to perform LCA studies, to distribute it to third parties, to convert it to other formats, to develop own data sets etc. as long as the copyright and license conditions for the ELCD data sets and the ILCD format are met that can be accessed via http://lca.jrc.ec.europa.eu. Please note e.g. that reference must be given to the 'Owner of data set' and to the 'ELCD database' plus version number, when using the data set or parts thereof. Please note also, that any modifications/omissions of the data set results in invalidity of any existing 'Official approval of data set by producer/operator', that the impression must be avoided that this would still be a complete ELCD data set, and that the content of further fields has to be adjusted. For details see the aforementioned copyright and license conditions.

## General comment
Raw data for polymerization and intermediate products are collected by several producers in Europe; the average is calculated by the consultant based on the production capacity of the companies. The LCI result is calculated with background data from the Boustead database.

## Geography
The data set represents the region specific situation, focusing on the main technologies and the region specific characteristics.

## Time period
The data corresponding to the amorphous PET production was collected in 1999. Data on crude oil extraction and refining and on natural gas extraction and processing was collected in 2001. All the calculations were carried out in 2005.

## Technology and included processes
The starting compounds for the commercial production of PET are ethylene (CH2=CH2) for the production of ethylene glycol and para-xylene for the production of terephthalic acid. Naphtha cracking produces only a very small quantity of xylenes. Most xylenes are produced either from pyrolysis gasoline, an aromatic rich fraction produced during naphtha cracking or directly from naphtha in a process known as catalytic reforming. In both cases, the basic feedstock is converted into a mixture of products of which the principal components are benzene, toluene and xylenes (the process is often referred to as the BTX process). Benzene and other aromatics are isolated in the pure state from the output of the reformer by solvent extraction and fractional distillation. The output from xylene production is a mixture of the three forms (isomers) of xylene. Before use in the production of terephthalic acid, the different isomers are separated. Para-xylene is used in the production of terephthalic acid because the #straight# chain structure is best suited to linear polymers. In practice there are two routes used in the production of PET: in the first one, p-xylene is oxidised to terephthalic acid which is then purified. This purified terephthalic acid (PTA) is then reacted with ethylene glycol to produce bishydroxyethyl terepthalate (BHET) with water as a by-product. The alternative route, oxidises p-xylene to terephthalic acid but then immediately reacts the acid with methanol to produce dimethyl terephthalate (DMT). When DMT is reacted with ethylene glycol, the result is again BHET, as in the alternative route, but the by-product is now methanol rather than water. The methanol is recovered and re-used. The monomer from either route can now be polymerised in the liquid phase to produce amorphous PET. A second polymerisation in the solid state increases the molecular weight of the polymer and produces a partially crystalline resin that can be used to produce bottles via injection moulding and stretch blow moulding. The background system is addressed as follows:
Electricity:
Electricity used, is modelled according to the individual country-specific situation. Modelling the electricity production system covers the production and delivery of primary fuels, the steam generator, the electricity generator and the distributor.
Electricity is regarded to be derived from the public electricity supply and from on-site electricity generation of plants. Input materials used for producing electricity are fossil fuels, like coal, oil and gas.
Process Steam:
Process steam/thermal energy used, is modelled according to the individual country-specific situation. Process steam is regarded to be derived as by-product from the public electricity supply and from on-site steam generation of plants. Input materials used for producing process steam are fossil fuels, like coal, oil and gas. Another source for process steam are waste incineration plants.
Transport:
All relevant and known transport processes used, are included. Overseas transport to and from major ports as well as all relevant and known pipeline and / or tanker transport of crude oil imports are included.
Energy carriers:
Crude oil is modelled according to the production and supply of crude oil to Western Europe. The crude oil supply is regarded regional. Therefore, interchanges between countries within that region do not count as imports or exports. Oil processing is reckoned as standard worldwide with overall energy production efficiency of the order of 90%. The IEA data on world oil production and processing data have been used for the use of energy. The total inputs have been partitioned between the products using energy as the partitioning parameter. Modelling covers the extraction, the transport and the delivery including emissions arising at the extraction site and reported losses during subsequent distribution of the oil. The transport for indigenous crude oil production is based on the characteristics of North Sea production since this represents 98% of indigenous production. For North Sea oil some 75% is delivered by pipeline with the remainder delivered by tanker.
Coal modelling covers the production, the transport and the delivery.

## Technical purpose
Bottle grade PET is used to produce bottles via injection moulding and stretch blow moulding.

## Reference product
- polyethylene terephthalate (PET) granulate: 1

## Inputs
- carcass meal: 2.09462e-13
- energy (recovered): -1.29175
- hydrogen: 6.5068e-6
- municipal waste (unspecified): 0.00732513
- air (Resources from air): 4.70481
- baryte (Resources from ground): 1.13065e-7
- bauxite (Resources from ground): 2.1724e-6
- bentonite (Resources from ground): 7.18389e-5
- biomass (Resources from biosphere): 0.225396
- brown coal (Resources from ground): 0.00025223
- calcium carbonate (Resources from ground): 0.000278881
- chromium (Resources from ground): 2.31749e-12
- clay (Resources from ground): 1.4516e-8
- copper (Resources from ground): 6.49271e-9
- crude oil (Resources from ground): 31.4891
- dolomite (Resources from ground): 4.07877e-6
- feldspar (Resources from ground): 1.55331e-16
- fluorspar (Resources from ground): 8.27541e-7
- granite (Resources from ground): 6.71348e-15
- ground water (Resources from water): 0.00063023
- gypsum (Resources from ground): 7.1597e-6
- hard coal (Resources from ground): 8.08691
- inert rock (Resources from ground): 2.11382e-8
- iron (Resources from ground): 0.000332826
- lead (Resources from ground): 7.82947e-7
- magnesium (Resources from ground): 1.50579e-18
- manganese (Resources from ground): 2.50638e-7
- mercury (Resources from ground): 3.03176e-9
- natural aggregate (Resources from ground): 1.22762e-6
- natural gas (Resources from ground): 32.8897
- nickel (Resources from ground): 7.57602e-13
- nitrogen (Resources from air): 0.310341
- olivine (Resources from ground): 3.12155e-6
- oxygen (Resources from air): 6.0416e-6
- peat (Resources from ground): 0.00114372
- phosphorus (Resources from ground): 7.11499e-6
- potassium chloride (Resources from ground): 5.30682e-7
- primary energy from geothermics (Resources from ground): 0.0455252
- primary energy from hydro power (Resources from water): 0.26011
- primary energy from solar energy (Resources from air): 8.65089e-5
- primary energy from waves (Resources from water): 0.000276091
- primary energy from wind power (Resources from air): 0.018087
- quartz sand (Resources from ground): 6.39575e-26
- river water (Resources from water): 0.243747
- sand (Resources from ground): 0.000244199
- sea water (Resources from water): 3.78438
- slate (Resources from ground): 2.02691e-5
- sodium chloride (Resources from ground): 0.00169078
- sodium nitrate (Resources from ground): 4.5232e-18
- sulfur (Resources from ground): 8.15791e-5
- talc (Resources from ground): 5.11129e-27
- titanium (Resources from ground): 9.07987e-34
- uranium (Resources from ground): 4.76441
- water (Resources from water): 58.6681
- wood (Resources from biosphere): 8.15684e-5
- zinc (Resources from ground): 2.73816e-8

## Outputs
- chemical waste (unspecified): 0.00887343
- chemical waste, inert (unspecified): 0.00194718
- chemical waste, toxic (unspecified): 0.00281482
- demolition waste (unspecified): 5.37377e-5
- industrial waste (unspecified): 0.00136948
- mineral waste (unspecified): 0.000398803
- municipal waste (unspecified): -0.0069105
- organic waste (unspecified): 2.17363e-8
- overburden (unspecified): 0.0571633
- packaging waste (metal): 6.45354e-9
- packaging waste (plastic): 1.56002e-12
- plastic (unspecified): 0.00232198
- tailings (unspecified): 3.31774e-6
- waste (unspecified): 0.00145431
- waste paper (unspecified): 2.14625e-11
- wood (unspecified): 1.97713e-7
- wooden pallet (EURO): 7.64419e-12
- 1,2-dichloroethane (Emissions to air): 3.31101e-11
- 1,2-dichloroethane (Emissions to water): 7.50723e-13
- 2,3,7,8-tetrachlorodibenzo-p-dioxin (Emissions to air): 1.69553e-31
- 2,3,7,8-tetrachlorodibenzo-p-dioxin (Emissions to water): 1.67088e-16
- acid (as H+) (Emissions to air): 5.67232e-16
- acid (as H+) (Emissions to water): 4.6951e-6
- adsorbable organic halogen compounds (Emissions to water): 1.40493e-12
- aluminium (Emissions to water): 7.79907e-7
- ammonia (Emissions to air): 1.23177e-9
- ammonia (Emissions to water): 2.5882e-6
- antimony (Emissions to air): 1.77445e-15
- arsenic (Emissions to air): 3.74359e-11
- arsenic (Emissions to water): 3.22018e-10
- benzene (Emissions to air): 2.32365e-6
- benzene (Emissions to water): 8.45696e-21
- biological oxygen demand (Emissions to water): 0.00199062
- bromate (Emissions to water): 3.96847e-10
- cadmium (Emissions to air): 2.58227e-11
- cadmium (Emissions to water): 4.38241e-15
- calcium (Emissions to water): 1.56322e-7
- carbon dioxide (Emissions to air): 2.92267
- carbon disulfide (Emissions to air): 3.81154e-11
- carbon monoxide (Emissions to air): 0.00743633
- carbonate (Emissions to water): 8.12573e-5
- chemical oxygen demand (Emissions to water): 0.00120094
- chlorate (Emissions to water): 4.4536e-7
- chloride (Emissions to water): 0.000218181
- chlorine (Emissions to air): 3.38496e-10
- chlorine (Emissions to water): 1.04798e-9
- chromium (Emissions to air): 3.64416e-6
- chromium (Emissions to water): 3.61567e-12
- copper (Emissions to air): 1.07055e-11
- copper (Emissions to water): 8.24538e-8
- cyanide (Emissions to water): 2.63705e-11
- decane (Emissions to water): 2.01096e-5
- dichloromethane (Emissions to air): 8.10115e-13
- ethyl benzene (Emissions to air): 4.98045e-7
- ethylene (Emissions to air): 1.69978e-6
- fluoride (Emissions to water): 1.11537e-9
- fluorine (Emissions to air): 1.9736e-11
- hydrocarbons (unspecified) (Emissions to water): 0.000108156
- hydrocyanic acid (Emissions to air): 1.23426e-18
- hydrogen (Emissions to air): 0.000137837
- hydrogen chloride (Emissions to air): 0.000162664
- hydrogen fluoride (Emissions to air): 6.08962e-6
- hydrogen sulfide (Emissions to air): 1.10361e-8
- iron (Emissions to water): 1.4426e-8
- lead (Emissions to air): 3.82087e-10
- lead (Emissions to water): 2.05655e-10
- manganese (Emissions to water): 4.32368e-14
- mercury (Emissions to air): 2.13314e-9
- mercury (Emissions to water): 1.5223e-10
- methane (Emissions to air): 0.0189209
- nickel (Emissions to air): 6.62543e-6
- nickel (Emissions to water): 1.76748e-9
- nitrate (Emissions to water): 3.10404e-6
- nitrogen (Emissions to water): 2.10039e-6
- nitrogen dioxide (Emissions to air): 0.00718888
- nitrous oxide (Emissions to air): 4.53905e-11
- non-methane volatile organic compounds (Emissions to air): 0.00943388
- oxygen (Emissions to air): 1.90109e-14
- particles (> PM10) (Emissions to water): 0.000368993
- particles (PM10) (Emissions to air): 0.00194608
- particles (PM10) (Emissions to water): 1.96143e-5
- particles (PM2.5) (Emissions to air): 8.23212e-14
- phenol (Emissions to water): 6.84212e-7
- phosphate (Emissions to water): 6.37854e-7
- polycyclic aromatic hydrocarbons (Emissions to air): 6.63292e-6
- potassium (Emissions to water): 1.66524e-8
- propene (Emissions to air): 1.2591e-6
- selenium (Emissions to air): 1.20947e-15
- silver (Emissions to air): 3.49227e-14
- sodium (Emissions to water): 0.000371249
- strontium (Emissions to water): 4.88773e-11
- styrene (Emissions to air): 3.3511e-10
- sulfate (Emissions to water): 0.000354567
- sulfur (Emissions to water): 7.05078e-12
- sulfur dioxide (Emissions to air): 0.0104035
- tin (Emissions to water): 2.22173e-16
- toluene (Emissions to air): 1.2786e-6
- total organic carbon (Emissions to water): 4.06582e-5
- vinyl chloride (Emissions to air): 7.29979e-10
- vinyl chloride (Emissions to water): 1.35555e-11
- volatile organic compound (Emissions to air): 0.000667028
- volatile organic compound (Emissions to water): 0.000320454
- xylene (all isomers) (Emissions to air): 8.29267e-7
- zinc (Emissions to air): 1.68559e-10
- zinc (Emissions to water): 4.84981e-8

## Modelling constants
All data used in the calculation of the LCI results refer to net calorific value.

## Cut-off and completeness
All relevant mass and energy flows are included in the inventory; no specific cut-off rule is applied.

## Deviations from cut-off and completeness
It is unusually to receive questionnaires completed in all respects. In such cases data are extrapolated.

## Data selection and combination
Full coverage of the European industry, modelling the integrated sites as far as possible.

## Deviations from data selection and combination
Many industrial sites contain a large number of different plants and therefore it is usual that certain services are provided from some central source. That is the case of the provision of steam and compressed air, and the treatment of water. In this case the attribution of these central services is a matter of estimating and guesswork. Frequently the information is not held by the companies in a form that is directly usable in eco-profile calculations. For example, air and water emission are normally expressed as concentrations (kg/m3) whereas eco-profiles want the total annual loading (kg/year). Companies can often make the conversion using internal conversion factors, but there is no standarisation of these factors across Europe. Besides, issues such as weighing errors, materials in transit, stock changes and so on, make it difficult to maintain absolutely accurate records.

## Data treatment and extrapolations
Missing data are substituted by the average value calculated from the data supplied by those plants that made positive returns. Thus, for example, suppose that three plants with the same output volume fill in questionnaires. For one of the parameters, one plant returns a value of 1 mg, the second plant returns a value of 2 mg and the third is unable to provide the data. The average from the two plants returning data is 1.5 mg and this value is substituted in place of the missing data for the third plant.

## Sampling procedure
The data are collected from participating companies for the performance characteristics of their plants through questionnaires. Most of the information supplied is derived from the records that are already kept by companies and plants.

## Use advice
The LCI data set should be used for LCI/ LCA studies where PET (bottle grade) is used along the production chain of a product, e.g. bottles via injection moulding and stretch blow moulding.

## Data sources
- Boustead Model
- Ecoprofile PET (bottle grade)

## Intended applications
Provide well documented, high quality, up-to-date and industry representative LCI data sets for any kind of LCA study. In order to elaborate the reports, some objectives shall be defined: target generic data which could be used to optimise the management of plastics waste (facilitates choosing among options such as mechanical recycling, reuse as a petrochemical raw material and use as a substitute fuel, and provide sufficient data to investigate alternative solutions for regulatory compliance), compile average industry data which could be used for internal company benchmarking allowing individual process improvement (leading to elimination of poor sections of processes, improvements by addition of waste treatment sections), include sufficient data which could be used by customers for product development against environmental criteria to (allow evaluation of the plastics contribution relative to the overall product, enable collaboration with recovery procedures to reduce collective impacts, draw attention to poor environmental links in user chains, which can lead to subsequent improvement). It was also important to provide neutral, objective, quantitative information with no attempt at interpretation, so that only explanations on how the data were generated need be given.
