# Polystyrene expandable granulate (EPS); production mix, at plant

Dataset: ILCD process, Partly terminated system
Geography: RER
Reference year: 2003
Valid until: 2013
Classification: Materials production / Plastics
LCI method principle: Attributional
LCI method approaches: Allocation - element content
Completeness: All relevant flows quantified
Share of supply or production covered: 95 %
Project: PlasticsEurope Eco-Profiles
Generated by: Boustead
Owner: Plastics Europe
Compliance: ILCD Data Network - Entry-level
Review: Dependent internal review by Plastics Europe; Dependent internal review by Boustead
Amounts: no units in this file; such an amount is in the reference unit of its flow, which a separate flow dataset defines
copyright: true
accessRestrictions: The data set can be used free of charge by anybody to perform LCA studies, to distribute it to third parties, to convert it to other formats, to develop own data sets etc. as long as the copyright and license conditions for the ELCD data sets and the ILCD format are met that can be accessed via http://lca.jrc.ec.europa.eu. Please note e.g. that reference must be given to the 'Owner of data set' and to the 'ELCD database' plus version number, when using the data set or parts thereof. Please note also, that any modifications/omissions of the data set results in invalidity of any existing 'Official approval of data set by producer/operator', that the impression must be avoided that this would still be a complete ELCD data set, and that the content of further fields has to be adjusted. For details see the aforementioned copyright and license conditions.

## General comment
Raw data for polymerization and intermediate products are collected by several producers in Europe; the average is calculated by the consultant based on the production capacity of the companies. The LCI result is calculated with background data from the Boustead database.

## Geography
The data set represents the region specific situation, focusing on the main technologies and the region specific characteristics.

## Time period
The data corresponding to the styrene production was collected in 2002 and on pentane production (oil refining) in 2001. Data on crude oil extraction and refining and on natural gas extraction and processing was collected in 2001. All the calculations were carried out in 2005.

## Technology and included processes
The production of styrene monomer can be thought of as replacing one of the hydrogen atoms in ethylene by a benzene ring (C6H6). The monomer is then polymerised is a manner similar to polyethylene; that is, the double bonds in the monomer molecules are opened and neighbouring molecules link together to form a chain. The repeat unit, has the same chemical composition as the styrene monomer. Crude oil refining produces a fraction known as naphtha which contains a mixture of low molecular weight, saturated hydrocarbons of various composition. This is converted into a smaller group of unsaturated hydrocarbons by cracking - a process in which the naphtha is heated to a high temperature in the absence of air, maintained for a short time at this high temperature and then very rapidly cooled back to a low temperature when all of the reactions stop and the mix of products is essentially fixed. The resulting mixture is then separated into its constituent components by distillation producing principally ethylene (C2H4), propylene (C3H6), mixed butenes of general formula C4H8 and a number of other compounds which find uses elsewhere in the petrochemical plant either as feedstocks or fuels. The precise mix of products from cracking are determined by a number of factors such as cracker temperature, residence time and the nature of the feedstock and the operation of a cracker can often be adjusted to produce the required mix of products. Natural gas is also converted into ethylene, propylene, butenes and other products by cracking. Although benzene is usually present in small quantities in crude oil, its direct extraction is usually uneconomic. However, one by product of naphtha cracking is a liquid usually referred to as pyrolysis gasoline which is high in unsaturated aliphatic and aromatic hydrocarbons. The benzene fraction in pyrolysis gasoline can be extracted by repeated distillation and it is thought that about half of all benzene used in Europe is produced in this way. Benzene is also produced directly from naphtha by a process known as catalytic reforming. The expandable form is the same as the crystal form except that low molecular mass hydrocarbons, usually pentane, are incorporated into the finished resin. These additives vaporise during subsequent processing to produce a foam. The background system is addressed as follows:
Electricity:
Electricity used, is modelled according to the individual country-specific situation. Modelling the electricity production system covers the production and delivery of primary fuels, the steam generator, the electricity generator and the distributor.
Electricity is regarded to be derived from the public electricity supply and from on-site electricity generation of plants. Input materials used for producing electricity are fossil fuels, like coal, oil and gas.
Process Steam:
Process steam/thermal energy used, is modelled according to the individual country-specific situation. Process steam is regarded to be derived as by-product from the public electricity supply and from on-site steam generation of plants. Input materials used for producing process steam are fossil fuels, like coal, oil and gas. Another source for process steam are waste incineration plants.
Transport:
All relevant and known transport processes used, are included. Overseas transport to and from major ports as well as all relevant and known pipeline and / or tanker transport of crude oil imports are included.
Energy carriers:
Crude oil is modelled according to the production and supply of crude oil to Western Europe. The crude oil supply is regarded regional. Therefore, interchanges between countries within that region do not count as imports or exports. Oil processing is reckoned as standard worldwide with overall energy production efficiency of the order of 90%. The IEA data on world oil production and processing data have been used for the use of energy. The total inputs have been partitioned between the products using energy as the partitioning parameter. Modelling covers the extraction, the transport and the delivery including emissions arising at the extraction site and reported losses during subsequent distribution of the oil. The transport for indigenous crude oil production is based on the characteristics of North Sea production since this represents 98% of indigenous production. For North Sea oil some 75% is delivered by pipeline with the remainder delivered by tanker.
Coal modelling covers the production, the transport and the delivery.

## Technical purpose
Polystyrene is a versatile polymer resin used in a wide range of applications - especially in the packaging industry.

## Reference product
- polystyrene expandable granulate (EPS): 1

## Inputs
- carcass meal: 2.16932e-6
- energy (recovered): -3.35944
- hydrogen: 0.00636927
- municipal waste (unspecified): 0.00450738
- air (Resources from air): 0.441878
- baryte (Resources from ground): 1.25845e-6
- bauxite (Resources from ground): 0.000703901
- bentonite (Resources from ground): 8.33799e-5
- biomass (Resources from biosphere): 0.0927958
- brown coal (Resources from ground): 0.000371756
- calcium carbonate (Resources from ground): 0.000389147
- chromium (Resources from ground): 2.31835e-8
- clay (Resources from ground): 1.14348e-7
- copper (Resources from ground): 0.000187773
- crude oil (Resources from ground): 44.1484
- dolomite (Resources from ground): 4.33553e-6
- feldspar (Resources from ground): 2.81335e-16
- fluorspar (Resources from ground): 1.48166e-5
- granite (Resources from ground): 4.90901e-13
- ground water (Resources from water): 0.102418
- gypsum (Resources from ground): 8.47039e-6
- hard coal (Resources from ground): 3.88486
- inert rock (Resources from ground): 2.24606e-8
- iron (Resources from ground): 0.000353181
- lead (Resources from ground): 5.9401e-7
- magnesium (Resources from ground): 2.26049e-10
- manganese (Resources from ground): 2.66318e-7
- mercury (Resources from ground): 8.87189e-9
- natural aggregate (Resources from ground): 1.30289e-6
- natural gas (Resources from ground): 34.2487
- nickel (Resources from ground): 2.69362e-5
- nitrogen (Resources from air): 0.409047
- olivine (Resources from ground): 3.31324e-6
- oxygen (Resources from air): 0.00618744
- peat (Resources from ground): 0.00873534
- phosphorus (Resources from ground): 1.46476e-11
- potassium chloride (Resources from ground): 6.22799e-6
- primary energy from geothermics (Resources from ground): 0.0147053
- primary energy from hydro power (Resources from water): 0.258645
- primary energy from solar energy (Resources from air): 6.93765e-5
- primary energy from waves (Resources from water): 0.000513274
- primary energy from wind power (Resources from air): 0.00939239
- quartz sand (Resources from ground): 1.86137e-21
- river water (Resources from water): 11.1954
- sand (Resources from ground): 0.000646281
- sea water (Resources from water): 7.6671
- slate (Resources from ground): 2.39798e-5
- sodium chloride (Resources from ground): 0.00230754
- sodium nitrate (Resources from ground): 6.78146e-10
- sulfur (Resources from ground): 0.000206721
- talc (Resources from ground): 5.53218e-27
- titanium (Resources from ground): 4.36666e-31
- uranium (Resources from ground): 2.73324
- water (Resources from water): 152.216
- wood (Resources from biosphere): 0.000259904
- zinc (Resources from ground): 2.37487e-5

## Outputs
- chemical waste (unspecified): 0.0079249
- chemical waste, inert (unspecified): 0.0053259
- chemical waste, toxic (unspecified): 0.493687
- demolition waste (unspecified): 7.82012e-5
- industrial waste (unspecified): 0.00163669
- mineral waste (unspecified): 0.00101884
- municipal waste (unspecified): -0.00330572
- organic waste (unspecified): 6.63741e-7
- overburden (unspecified): 0.0433841
- packaging waste (metal): 1.60013e-6
- packaging waste (plastic): 6.86153e-9
- plastic (unspecified): 0.0021083
- tailings (unspecified): 0.00781784
- waste (unspecified): 0.00153045
- waste paper (unspecified): 0.000237901
- wood (unspecified): 0.000103702
- wooden pallet (EURO): 5.65122e-5
- 1,2-dichloroethane (Emissions to air): 1.37816e-9
- 1,2-dichloroethane (Emissions to water): 2.15703e-11
- 2,3,7,8-tetrachlorodibenzo-p-dioxin (Emissions to air): 1.54608e-31
- 2,3,7,8-tetrachlorodibenzo-p-dioxin (Emissions to water): 7.42674e-15
- acid (as H+) (Emissions to air): 1.53067e-16
- acid (as H+) (Emissions to water): 9.2706e-6
- adsorbable organic halogen compounds (Emissions to water): 8.13491e-8
- aluminium (Emissions to water): 1.21631e-6
- ammonia (Emissions to air): 7.13676e-9
- ammonia (Emissions to water): 1.81604e-5
- antimony (Emissions to air): 3.0789e-11
- arsenic (Emissions to air): 1.0162e-8
- arsenic (Emissions to water): 8.28653e-10
- benzene (Emissions to air): 1.69098e-5
- benzene (Emissions to water): 1.85697e-6
- biological oxygen demand (Emissions to water): 0.000168141
- bromate (Emissions to water): 3.20796e-9
- cadmium (Emissions to air): 1.14988e-9
- cadmium (Emissions to water): 2.77246e-11
- calcium (Emissions to water): 1.60192e-5
- carbon dioxide (Emissions to air): 2.5762
- carbon disulfide (Emissions to air): 4.21986e-9
- carbon monoxide (Emissions to air): 0.00387628
- carbonate (Emissions to water): 0.000115548
- chemical oxygen demand (Emissions to water): 0.00172801
- chlorate (Emissions to water): 6.14271e-7
- chloride (Emissions to water): 0.00063829
- chlorine (Emissions to air): 9.31339e-7
- chlorine (Emissions to water): 2.0767e-8
- chromium (Emissions to air): 2.8641e-6
- chromium (Emissions to water): 8.56724e-12
- copper (Emissions to air): 6.52361e-8
- copper (Emissions to water): 1.73554e-7
- cyanide (Emissions to water): 3.34746e-11
- decane (Emissions to water): 4.06333e-5
- dichloromethane (Emissions to air): 2.94605e-9
- ethyl benzene (Emissions to air): 5.17495e-6
- ethylene (Emissions to air): 6.18997e-6
- fluoride (Emissions to water): 3.63352e-7
- fluorine (Emissions to air): 3.23617e-8
- hydrocarbons (unspecified) (Emissions to water): 1.47536e-5
- hydrocyanic acid (Emissions to air): 2.23549e-18
- hydrogen (Emissions to air): 6.38926e-5
- hydrogen chloride (Emissions to air): 6.47806e-5
- hydrogen fluoride (Emissions to air): 2.38818e-6
- hydrogen sulfide (Emissions to air): 1.21226e-8
- iron (Emissions to water): 4.15272e-8
- lead (Emissions to air): 2.73302e-7
- lead (Emissions to water): 2.03243e-9
- manganese (Emissions to water): 2.4285e-10
- mercury (Emissions to air): 1.94695e-9
- mercury (Emissions to water): 1.97228e-10
- methane (Emissions to air): 0.0321324
- molybdenum (Emissions to water): 6.7031e-9
- nickel (Emissions to air): 5.20699e-6
- nickel (Emissions to water): 1.17039e-7
- nitrate (Emissions to water): 8.61728e-6
- nitrogen (Emissions to water): 3.37348e-6
- nitrogen dioxide (Emissions to air): 0.00503073
- nitrous oxide (Emissions to air): 1.97541e-8
- non-methane volatile organic compounds (Emissions to air): 0.00493698
- oxygen (Emissions to air): 4.54609e-11
- particles (> PM10) (Emissions to water): 0.00150844
- particles (PM10) (Emissions to air): 0.000910414
- particles (PM10) (Emissions to water): 5.46625e-5
- particles (PM2.5) (Emissions to air): 1.50485e-14
- phenol (Emissions to water): 4.19178e-7
- phosphate (Emissions to water): 0.000398401
- polycyclic aromatic hydrocarbons (Emissions to air): 5.65146e-6
- potassium (Emissions to water): 1.97264e-7
- propene (Emissions to air): 4.58487e-6
- selenium (Emissions to air): 3.52005e-11
- silver (Emissions to air): 1.01636e-9
- sodium (Emissions to water): 0.00180664
- strontium (Emissions to water): 5.15172e-11
- styrene (Emissions to air): 3.64191e-5
- sulfate (Emissions to water): 0.000415313
- sulfur (Emissions to water): 1.81417e-7
- sulfur dioxide (Emissions to air): 0.00722084
- tin (Emissions to water): 4.16101e-14
- toluene (Emissions to air): 2.44294e-6
- total organic carbon (Emissions to water): 3.80745e-5
- vinyl chloride (Emissions to air): 7.64918e-10
- vinyl chloride (Emissions to water): 1.69058e-11
- volatile organic compound (Emissions to air): 0.000252265
- volatile organic compound (Emissions to water): 1.11249e-5
- xylene (all isomers) (Emissions to air): 1.04216e-6
- zinc (Emissions to air): 3.20489e-8
- zinc (Emissions to water): 3.76995e-8

## Modelling constants
All data used in the calculation of the LCI results refer to net calorific value.

## Cut-off and completeness
All relevant mass and energy flows are included in the inventory; no specific cut-off rule is applied.

## Deviations from cut-off and completeness
It is unusually to receive questionnaires completed in all respects. In such cases data are extrapolated.

## Data selection and combination
Full coverage of the European industry, modelling the integrated sites as far as possible.

## Deviations from data selection and combination
Many industrial sites contain a large number of different plants and therefore it is usual that certain services are provided from some central source. That is the case of the provision of steam and compressed air, and the treatment of water. In this case the attribution of these central services is a matter of estimating and guesswork. Frequently the information is not held by the companies in a form that is directly usable in eco-profile calculations. For example, air and water emission are normally expressed as concentrations (kg/m3) whereas eco-profiles want the total annual loading (kg/year). Companies can often make the conversion using internal conversion factors, but there is no standarisation of these factors across Europe. Besides, issues such as weighing errors, materials in transit, stock changes and so on, make it difficult to maintain absolutely accurate records.

## Data treatment and extrapolations
Missing data are substituted by the average value calculated from the data supplied by those plants that made positive returns. Thus, for example, suppose that three plants with the same output volume fill in questionnaires. For one of the parameters, one plant returns a value of 1 mg, the second plant returns a value of 2 mg and the third is unable to provide the data. The average from the two plants returning data is 1.5 mg and this value is substituted in place of the missing data for the third plant.

## Sampling procedure
The data are collected from participating companies for the performance characteristics of their plants through questionnaires. Most of the information supplied is derived from the records that are already kept by companies and plants.

## Use advice
The LCI data set should be used for LCI/ LCA studies where EPS granulate is used along the production chain for a product.

## Data sources
- Boustead Model
- Ecoprofile EPS

## Intended applications
Provide well documented, high quality, up-to-date and industry representative LCI data sets for any kind of LCA study. In order to elaborate the reports, some objectives shall be defined: target generic data which could be used to optimise the management of plastics waste (facilitates choosing among options such as mechanical recycling, reuse as a petrochemical raw material and use as a substitute fuel, and provide sufficient data to investigate alternative solutions for regulatory compliance), compile average industry data which could be used for internal company benchmarking allowing individual process improvement (leading to elimination of poor sections of processes, improvements by addition of waste treatment sections), include sufficient data which could be used by customers for product development against environmental criteria to (allow evaluation of the plastics contribution relative to the overall product, enable collaboration with recovery procedures to reduce collective impacts, draw attention to poor environmental links in user chains, which can lead to subsequent improvement). It was also important to provide neutral, objective, quantitative information with no attempt at interpretation, so that only explanations on how the data were generated need be given.
