# Rail transport; technology mix, diesel driven, cargo

Dataset: ILCD process, Unit process, single operation
Geography: GLO
Reference year: 2000
Valid until: 2009
Classification: Transport services / Rail
LCI method principle: Attributional
Completeness: All relevant flows quantified
Share of supply or production covered: 95 %
Method details: GaBi Modelling Principles
Generated by: PE INTERNATIONAL; LBP-GaBi
Owner: PE INTERNATIONAL
Compliance: ILCD Data Network - Entry-level
Review: Dependent internal review by PE INTERNATIONAL, LBP-GaBi, Ecobilan
Amounts: no units in this file; such an amount is in the reference unit of its flow, which a separate flow dataset defines
copyright: true
accessRestrictions: The data set can be used free of charge by anybody to perform LCA studies, to distribute it to third parties, to convert it to other formats, to develop own data sets etc. as long as the copyright and license conditions for the ELCD data sets and the ILCD format are met that can be accessed via http://lca.jrc.ec.europa.eu. Please note e.g. that reference must be given to the 'Owner of data set' and to the 'ELCD database' plus version number, when using the data set or parts thereof. Please note also, that any modifications/omissions of the data set results in invalidity of any existing 'Official approval of data set by producer/operator', that the impression must be avoided that this would still be a complete ELCD data set, and that the content of further fields has to be adjusted. For details see the aforementioned copyright and license conditions.

## General comment
The data set represents the applied technology with a good overall data quality. The inventory is based on industry and literature data.

## Geography
The data set is representative for the mentioned region.

## Time period
Average

## Technology and included processes
Rail transport via cargo train. Variable parameters are: utilisation ratio and distance.Train production, end-of-life treatment of the train and upstream processes for fuel production (e.g. exploration and production of fuels, refinery, transport, combustion emissions of power plants) are not included in the data set.

## Technical purpose
Rail transport of bulk or packaged goods.

## Model description
The emission profile as well as the fuel consumption is calculated according to the settings of the variable parameters as described in the technology description. The calculation formulas of the single variables are given in the section variable / parameter.

## Parameters
- Auslast: 0.6
  [-] average utilisation ratio (60%)
- Distanz: 100
  [km] distance start - destination
- Spez_Verbr: 0.000696671; = Verbrauch/(Auslast*766*1000)
  [kg] Diesel per kg cargo
- Verbrauch: 320.19; = (0.0049*Auslast^-0.6889*Distanz*Auslast*766)
  [kg] Diesel total consumption, payload 766t

## Reference product
- cargo: 1

## Inputs
- cargo: 1
- diesel: 0.000696671; = Spez_Verbr; calculated

## Outputs
All rows: calculated
- carbon dioxide (Emissions to air): 0.00221193; = 3.175 * Spez_Verbr
- carbon monoxide (Emissions to air): 1.25401e-5; = 0.018 * Spez_Verbr
- methane (Emissions to air): 1.39334e-8; = 2e-5 * Spez_Verbr
- nitrogen dioxide (Emissions to air): 3.83169e-5; = 0.055 * Spez_Verbr
- nitrous oxide (Emissions to air): 8.63872e-7; = 0.00124 * Spez_Verbr
- non-methane volatile organic compounds (Emissions to air): 4.31379e-6; = 0.006192 * Spez_Verbr
- particles (PM10) (Emissions to air): 2.09001e-6; = 0.003 * Spez_Verbr
- sulfur dioxide (Emissions to air): 2.09001e-6; = 0.003 * Spez_Verbr

## Modelling constants
All data used in the calculation of the LCI results refer to net calorific value.

## Cut-off and completeness
Cut-off rules for each unit process: Coverage of at least 95 % of mass and energy of the input and output flows, and 98 % of their environmental relevance (according to expert judgement).

## Deviations from cut-off and completeness
Manufacturing and EoL of the vehicle is not included.

## Data selection and combination
Data sources for the transport system are sufficiently consistent, emission factors as are based on average European conditions (key emissions are based on measured operating data). LCI modelling is fully consistent.

## Data treatment and extrapolations
Several datasources have been averaged. Measured data from representative transport systems have been upscaled.

## Data collection period
2000-2005

## Use advice
The data set should be used for LCI/LCA studies where bulk commodities or packaged goods have to be transported via railway. The data set allows individual settings of the variable parameters. The following parameters are variable: utilisation ratio and distance. Default values of the variable parameters have to be checked and adjusted for individual use. The data set does not include the fuel supply route. Therefore the fuel supply data set has to be linked with this data set. Train production and end-of-life treatment are not part of the data set (negligible from a LCA point of view).

## Review details
Inventory: The internal review was done by several iteration steps concerning raw data validation, raw data documentation, representativity, completeness and consistency of modelling with regard to ISO 14040 and 14044.; Documentation: The review of the documentation was performed by Ecobilan and is in compliance with ISO 14040 and 14044. The data set documentation is correct in view of the appropriateness of the information provided. It includes all relevant information in view of data quality and scope of application of the respective LCI result.

## Data sources
- Spezif. Energieeinsatz im Verkehr, Ermittlung und Vergleich der spezif. Energieverbräuche, 1990
- Verminderung der Luft- und Lärmbelastung im Güterfernverkehr 2010, Forschungsbericht, 10405962, 1994
- GaBi databases 2006

## Intended applications
This background LCI data set can be used for any types of LCA studies.
