# Bulk carrier ocean; technology mix; 100.000-200.000 dwt

Dataset: ILCD process, Unit process, single operation
Geography: GLO
Reference year: 2005
Valid until: 2010
Classification: Transport services / Water
LCI method principle: Attributional
Completeness: All relevant flows quantified
Share of supply or production covered: 95 %
Method details: GaBi Modelling Principles
Generated by: PE INTERNATIONAL; LBP-GaBi
Owner: PE INTERNATIONAL
Compliance: ILCD Data Network - Entry-level
Review: Dependent internal review by PE INTERNATIONAL, LBP-GaBi, Ecobilan
Amounts: no units in this file; such an amount is in the reference unit of its flow, which a separate flow dataset defines
copyright: true
accessRestrictions: The data set can be used free of charge by anybody to perform LCA studies, to distribute it to third parties, to convert it to other formats, to develop own data sets etc. as long as the copyright and license conditions for the ELCD data sets and the ILCD format are met that can be accessed via http://lca.jrc.ec.europa.eu. Please note e.g. that reference must be given to the 'Owner of data set' and to the 'ELCD database' plus version number, when using the data set or parts thereof. Please note also, that any modifications/omissions of the data set results in invalidity of any existing 'Official approval of data set by producer/operator', that the impression must be avoided that this would still be a complete ELCD data set, and that the content of further fields has to be adjusted. For details see the aforementioned copyright and license conditions.

## General comment
The data set represents the applied technology with a good overall data quality. The inventory is based on industry and literature data.

## Geography
The data set is representative for the mentioned region.

## Time period
Average

## Technology and included processes
Bulk carrier ocean 100.000-200.000 dead weight tons (dwt) pay load capacity. Variable parameters (with default setting) are: distance (100km) and utilisation (105.000 dwt, max. 200.000t). Inputs: heavy fuel oil and cargo. Outputs: cargo and combustion emissions (carbon dioxide, carbon monoxide, methane, nitrogen oxides, NMVOC, particulate PM 2.5, sulphur dioxide). Vessel production, end-of-life treatment of the vessel and the fuel supply chain (emissions of exploration, refinery, transportation etc.) are not included in the data set.

## Technical purpose
Transport of bulk commodities with a payload of up to 200.000 dead weight tons for long distance transport (seaway).

## Model description
The emission profile as well as the fuel consumption is calculated according to the settings of the variable parameters as described in the technology description. The calculation formulas of the single variables are given in the section variable / parameter.

## Parameters
- Distanz: 100
  [km] distance start - destination
- DWT: 105000
  [t] dead weight tons average payload 105000 t
- Spez_Verbr: 6.8706e-5; = Verbrauch/(DWT*1000)
  [kg] heavy fuel oil per kg cargo
- Verbrauch: 7214.13; = (0.2058*DWT^-0.4932*DWT*Distanz)
  [kg] heavy fuel oil total consumption

## Reference product
- cargo: 1

## Inputs
- cargo: 1
- heavy fuel oil: 6.8706e-5; = Spez_Verbr; calculated

## Outputs
All rows: calculated
- carbon dioxide (Emissions to air): 0.000217455; = 3.165 * Spez_Verbr
- carbon monoxide (Emissions to air): 6.18354e-7; = 0.009 * Spez_Verbr
- methane (Emissions to air): 5.58236e-9; = 8.125e-5 * Spez_Verbr
- nitrogen dioxide (Emissions to air): 5.77131e-6; = 0.084 * Spez_Verbr
- nitrous oxide (Emissions to air): 5.49648e-9; = 8e-5 * Spez_Verbr
- non-methane volatile organic compounds (Emissions to air): 1.66186e-7; = 0.0024188 * Spez_Verbr
- particles (PM10) (Emissions to air): 1.37412e-7; = 0.002 * Spez_Verbr
- sulfur dioxide (Emissions to air): 4.17046e-6; = 0.0607 * Spez_Verbr

## Modelling constants
All data used in the calculation of the LCI results refer to net calorific value.

## Cut-off and completeness
Cut-off rules for each unit process: Coverage of at least 95 % of mass and energy of the input and output flows, and 98 % of their environmental relevance (according to expert judgement).

## Deviations from cut-off and completeness
Manufacturing and EoL of the vessel is not included.

## Data selection and combination
Data sources for the transport system are sufficiently consistent, emission factors are based on average European conditions (key emissions are based on measured operating data). LCI modelling is fully consistent.

## Data treatment and extrapolations
Several data sources have been averaged. Measured data from representative transport systems have been upscaled.

## Data collection period
2000-2005

## Use advice
The data set should be used for LCI/LCA studies where bulk commodities or packaged goods have to be transported via seaway over a long distance. The data set allows individual settings of the variable parameters. The following parameters are variable (default settings): distance (100 km) and utilisation (105.000 dwt, max. 200.000t). Default values of the variable parameters have to be checked and adjusted for individual use. The data set does not include the fuel supply route. Therefore the fuel supply data set (heavy fuel oil) has to be linked with this data set. Vessel production and end-of-life treatment are not part of the data set (negligible from a LCA point of view).

## Review details
Inventory: The internal review was done by several iteration steps concerning raw data validation, raw data documentation, representativity, completeness and consistency of modelling with regard to ISO 14040 and 14044.; Documentation: The review of the documentation was performed by Ecobilan and is in compliance with ISO 14040 and 14044. The data set documentation is correct in view of the appropriateness of the information provided. It includes all relevant information in view of data quality and scope of application of the respective LCI result.

## Data sources
- Verminderung der Luft- und Lärmbelastung im Güterfernverkehr 2010, Forschungsbericht, 10405962, 1994
- Binnenschifffahrt in Zahlen 1994, 1994
- Marine Exhaust Emission Research Programme, Steady State Operation, 1990
- Marine Exhaust Emission Research Programme, Steady State Operation (Slow Speed appendum), 1990
- Spezif. Energieeinsatz im Verkehr, Ermittlung und Vergleich der spezif. Energieverbräuche, 1990
- GaBi databases 2006

## Intended applications
This background LCI data set can be used for any types of LCA studies.
