# Nylon 66 GF 30 compound (PA 66 GF 30); production mix, at plant

Dataset: ILCD process, Partly terminated system
Geography: RER
Reference year: 1996
Valid until: 2006
Classification: Materials production / Plastics
Synonyms: PA 66 glass filled, Nylon 66 glass filled
LCI method principle: Attributional
LCI method approaches: Allocation - element content
Completeness: All relevant flows quantified
Share of supply or production covered: 95 %
Project: PlasticsEurope Eco-Profiles
Generated by: Boustead
Owner: Plastics Europe
Compliance: ILCD Data Network - Entry-level
Review: Dependent internal review by Plastics Europe; Dependent internal review by Boustead
Amounts: no units in this file; such an amount is in the reference unit of its flow, which a separate flow dataset defines
copyright: true
accessRestrictions: The data set can be used free of charge by anybody to perform LCA studies, to distribute it to third parties, to convert it to other formats, to develop own data sets etc. as long as the copyright and license conditions for the ELCD data sets and the ILCD format are met that can be accessed via http://lca.jrc.ec.europa.eu. Please note e.g. that reference must be given to the 'Owner of data set' and to the 'ELCD database' plus version number, when using the data set or parts thereof. Please note also, that any modifications/omissions of the data set results in invalidity of any existing 'Official approval of data set by producer/operator', that the impression must be avoided that this would still be a complete ELCD data set, and that the content of further fields has to be adjusted. For details see the aforementioned copyright and license conditions.

## General comment
Raw data for polymerization and intermediate products are collected by several producers in Europe; the average is calculated by the consultant based on the production capacity of the companies. The LCI result is calculated with background data from the Boustead database.

## Geography
The data set represents the region specific situation, focusing on the main technologies and the region specific characteristics.

## Time period
The data corresponding to the nylon 66 production was collected in 1996. Data on crude oil extraction and refining and on natural gas extraction and processing was collected in 2001. All the calculations were carried out in 2005.

## Technology and included processes
The essential precursors for nylon 66 are hexamethylene diamine, H2N-(CH2)6-NH2, and adipic acid, HOOC-(CH2)4-COOH. When they are reacted they produce hexamethylene diammonium adipate, commonly referred to as nylon salt, H3N(CH2)6NH3OOC(CH2)4COO-. For fibre applications, it is important to ensure that the precursors are reacted in equimolar proportions and that the product is highly purified. The formation, extraction and purification of the salt ensures that these conditions are met. Adipic acid is made by the oxidation of cyclohexane to a mixture of cyclohexanol and cyclohexanone (called KA oil). This mixture is further oxidised with nitric acid to adipic acid. Hexamethylene diamine is made by the reduction of adiponitrile, which is made either by the electronic coupling of acrylonitrile or by the hydrocyanation of butadiene. Adipic acid and hexamethylene diamine are combined in water to make a salt solution. This solution is then passed through a batch or continuous reactor in which the water is removed at high temperature and the nylon polymerises. The polymer is expelled from the reactor and granulated. Higher molecular weights are achieved by solid phase polymerisation. Modified nylons are made by extrusion compounding of the nylon with the modifiers or reinforcements. In some cases, it is possible to compound directly at the reactor without granulating the nylon. The background system is addressed as follows:
Electricity:
Electricity used, is modelled according to the individual country-specific situation. Modelling the electricity production system covers the production and delivery of primary fuels, the steam generator, the electricity generator and the distributor.
Electricity is regarded to be derived from the public electricity supply and from on-site electricity generation of plants. Input materials used for producing electricity are fossil fuels, like coal, oil and gas.
Process Steam:
Process steam/thermal energy used, is modelled according to the individual country-specific situation. Process steam is regarded to be derived as by-product from the public electricity supply and from on-site steam generation of plants. Input materials used for producing process steam are fossil fuels, like coal, oil and gas. Another source for process steam are waste incineration plants.
Transport:
All relevant and known transport processes used, are included. Overseas transport to and from major ports as well as all relevant and known pipeline and / or tanker transport of crude oil imports are included.
Energy carriers:
Crude oil is modelled according to the production and supply of crude oil to Western Europe. The crude oil supply is regarded regional. Therefore, interchanges between countries within that region do not count as imports or exports. Oil processing is reckoned as standard worldwide with overall energy production efficiency of the order of 90%. The IEA data on world oil production and processing data have been used for the use of energy. The total inputs have been partitioned between the products using energy as the partitioning parameter. Modelling covers the extraction, the transport and the delivery including emissions arising at the extraction site and reported losses during subsequent distribution of the oil. The transport for indigenous crude oil production is based on the characteristics of North Sea production since this represents 98% of indigenous production. For North Sea oil some 75% is delivered by pipeline with the remainder delivered by tanker.
Coal modelling covers the production, the transport and the delivery.

## Technical purpose
About two thirds of the nylon produced in Europe is used for fibres (textiles, carpets, etc.) while most of the remainder is used in injection moulded components (automotive parts, consumer goods, etc.) Other smaller uses are films and filaments. Nylon 66 is often selected for use because of its combination of toughness, stiffness, high melting point and chemical resistance. It is a relatively easy polymer to modify, so the range of different nylon resins available is wider than for most other polymers. Typical modifiers are flame retardants to reduce flammability, rubber to improve impact resistance and glass or minerals to improve stiffness and dimensional stability

## Reference product
- nylon 66 GF 30 compound (PA 66 GF 30): 1

## Inputs
- carcass meal: 3.33742e-11
- energy (recovered): -3.55678
- hydrogen: 8.68452e-5
- municipal waste (unspecified): 0.013811
- air (Resources from air): 2.22425
- baryte (Resources from ground): 3.11902e-6
- bauxite (Resources from ground): 0.00201748
- bentonite (Resources from ground): 4.61335e-5
- biomass (Resources from biosphere): 0.3641
- brown coal (Resources from ground): 0.000179552
- calcium carbonate (Resources from ground): 0.125906
- chromium (Resources from ground): 3.98751e-10
- clay (Resources from ground): 1.13765e-7
- copper (Resources from ground): 1.03415e-6
- crude oil (Resources from ground): 29.3102
- dolomite (Resources from ground): 0.0672604
- feldspar (Resources from ground): 1.19943e-16
- fluorspar (Resources from ground): 3.87425e-5
- granite (Resources from ground): 1.78626e-11
- ground water (Resources from water): 0.0303494
- gypsum (Resources from ground): 4.56806e-6
- hard coal (Resources from ground): 18.6419
- inert rock (Resources from ground): 4.1258e-8
- iron (Resources from ground): 0.000649462
- lead (Resources from ground): 3.87225e-6
- magnesium (Resources from ground): 2.41313e-16
- manganese (Resources from ground): 4.892e-7
- mercury (Resources from ground): 5.05123e-8
- natural aggregate (Resources from ground): 2.39433e-6
- natural gas (Resources from ground): 53.0374
- nickel (Resources from ground): 4.96164e-10
- nitrogen (Resources from air): 0.302308
- olivine (Resources from ground): 6.08815e-6
- oxygen (Resources from air): 1.28465e-5
- peat (Resources from ground): 0.001392
- phosphorus (Resources from ground): 2.55315e-6
- potassium chloride (Resources from ground): 1.1805e-5
- primary energy from geothermics (Resources from ground): 0.0028592
- primary energy from hydro power (Resources from water): 0.354558
- primary energy from solar energy (Resources from air): 0.000626698
- primary energy from waves (Resources from water): 0.000406037
- primary energy from wind power (Resources from air): 0.0535043
- quartz sand (Resources from ground): 1.02496e-23
- river water (Resources from water): 368.471
- sand (Resources from ground): 0.192862
- sea water (Resources from water): 5.31803
- slate (Resources from ground): 1.29323e-5
- sodium chloride (Resources from ground): 0.159141
- sodium nitrate (Resources from ground): 7.2487e-16
- sulfur (Resources from ground): 0.0146426
- talc (Resources from ground): 7.22692e-27
- titanium (Resources from ground): 1.67992e-13
- uranium (Resources from ground): 7.18191
- water (Resources from water): 55.6007
- wood (Resources from biosphere): 0.00118406
- zinc (Resources from ground): 1.74512e-5

## Outputs
- chemical waste (unspecified): 0.0111905
- chemical waste, inert (unspecified): 0.00667222
- chemical waste, toxic (unspecified): 0.0037519
- demolition waste (unspecified): 1.43138e-5
- industrial waste (unspecified): 0.00320016
- mineral waste (unspecified): 0.101327
- municipal waste (unspecified): -0.0130289
- organic waste (unspecified): 1.13467e-7
- overburden (unspecified): 0.13387
- packaging waste (metal): 4.44021e-8
- packaging waste (plastic): 8.10031e-12
- plastic (unspecified): 2.45215e-5
- tailings (unspecified): 7.15995e-5
- waste (unspecified): 0.00194502
- waste paper (unspecified): 1.148e-6
- wood (unspecified): 2.83179e-6
- wooden pallet (EURO): 3.96915e-11
- 1,2-dichloroethane (Emissions to air): 3.03874e-10
- 1,2-dichloroethane (Emissions to water): 5.24277e-12
- 2,3,7,8-tetrachlorodibenzo-p-dioxin (Emissions to air): 8.49165e-32
- 2,3,7,8-tetrachlorodibenzo-p-dioxin (Emissions to water): 2.32487e-13
- acid (as H+) (Emissions to air): 7.75426e-15
- acid (as H+) (Emissions to water): 2.24406e-5
- adsorbable organic halogen compounds (Emissions to water): 3.10822e-11
- aluminium (Emissions to water): 6.03625e-7
- ammonia (Emissions to air): 1.52639e-5
- ammonia (Emissions to water): 0.00178765
- antimony (Emissions to air): 2.4687e-12
- arsenic (Emissions to air): 9.96915e-11
- arsenic (Emissions to water): 2.65355e-10
- benzene (Emissions to air): 5.36276e-6
- benzene (Emissions to water): 1.14683e-19
- biological oxygen demand (Emissions to water): 3.29171e-5
- bromate (Emissions to water): 5.52701e-9
- cadmium (Emissions to air): 7.57811e-11
- cadmium (Emissions to water): 5.31526e-12
- calcium (Emissions to water): 2.33364e-6
- carbon dioxide (Emissions to air): 6.05786
- carbon disulfide (Emissions to air): 5.46918e-11
- carbon monoxide (Emissions to air): 0.00601736
- carbonate (Emissions to water): 5.78832e-5
- chemical oxygen demand (Emissions to water): 0.00570939
- chlorate (Emissions to water): 6.18239e-6
- chloride (Emissions to water): 0.00138553
- chlorine (Emissions to air): 1.42191e-6
- chlorine (Emissions to water): 3.88802e-8
- chromium (Emissions to air): 8.84266e-7
- chromium (Emissions to water): 2.39364e-12
- copper (Emissions to air): 1.69784e-9
- copper (Emissions to water): 1.41087e-5
- cyanide (Emissions to water): 1.60602e-10
- decane (Emissions to water): 1.34623e-5
- dichloromethane (Emissions to air): 3.70294e-9
- ethyl benzene (Emissions to air): 3.02909e-7
- ethylene (Emissions to air): 2.73285e-6
- fluoride (Emissions to water): 1.02095e-6
- fluorine (Emissions to air): 2.27298e-6
- hydrocarbons (unspecified) (Emissions to water): 6.06031e-6
- hydrocyanic acid (Emissions to air): 9.5307e-19
- hydrogen (Emissions to air): 0.000266469
- hydrogen chloride (Emissions to air): 0.000242379
- hydrogen fluoride (Emissions to air): 8.96046e-6
- hydrogen sulfide (Emissions to air): 2.20767e-8
- iron (Emissions to water): 3.3989e-8
- lead (Emissions to air): 3.14272e-9
- lead (Emissions to water): 5.26397e-10
- manganese (Emissions to water): 2.37898e-11
- mercury (Emissions to air): 6.99455e-9
- mercury (Emissions to water): 1.20569e-9
- methane (Emissions to air): 0.0301333
- nickel (Emissions to air): 1.60739e-6
- nickel (Emissions to water): 1.28216e-5
- nitrate (Emissions to water): 0.0197541
- nitrogen (Emissions to water): 1.97176e-5
- nitrogen dioxide (Emissions to air): 0.0110227
- nitrous oxide (Emissions to air): 0.000669055
- non-methane volatile organic compounds (Emissions to air): 0.00330657
- oxygen (Emissions to air): 3.05052e-12
- particles (> PM10) (Emissions to water): 0.0165937
- particles (PM10) (Emissions to air): 0.00340415
- particles (PM10) (Emissions to water): 6.02582e-5
- particles (PM2.5) (Emissions to air): 1.19184e-12
- phenol (Emissions to water): 5.65762e-7
- phosphate (Emissions to water): 0.000337338
- polycyclic aromatic hydrocarbons (Emissions to air): 1.60739e-6
- potassium (Emissions to water): 3.71145e-7
- propene (Emissions to air): 2.02428e-6
- selenium (Emissions to air): 1.93826e-13
- silver (Emissions to air): 5.59658e-12
- sodium (Emissions to water): 0.00651394
- strontium (Emissions to water): 6.65165e-10
- styrene (Emissions to air): 5.37034e-8
- sulfate (Emissions to water): 0.00488988
- sulfur (Emissions to water): 5.79686e-9
- sulfur dioxide (Emissions to air): 0.0164393
- tin (Emissions to water): 2.92484e-13
- toluene (Emissions to air): 9.0885e-7
- total organic carbon (Emissions to water): 0.00359028
- vinyl chloride (Emissions to air): 3.85754e-9
- vinyl chloride (Emissions to water): 7.04208e-11
- volatile organic compound (Emissions to air): 0.00032639
- volatile organic compound (Emissions to water): 1.91913e-5
- xylene (all isomers) (Emissions to air): 3.75373e-7
- zinc (Emissions to air): 1.03138e-9
- zinc (Emissions to water): 2.47424e-8

## Modelling constants
All data used in the calculation of the LCI results refer to net calorific value.

## Cut-off and completeness
All relevant mass and energy flows are included in the inventory; no specific cut-off rule is applied.

## Deviations from cut-off and completeness
It is unusually to receive questionnaires completed in all respects. In such cases data are extrapolated.

## Data selection and combination
Full coverage of the European industry, modelling the integrated sites as far as possible.

## Deviations from data selection and combination
Many industrial sites contain a large number of different plants and therefore it is usual that certain services are provided from some central source. That is the case of the provision of steam and compressed air, and the treatment of water. In this case the attribution of these central services is a matter of estimating and guesswork. Frequently the information is not held by the companies in a form that is directly usable in eco-profile calculations. For example, air and water emission are normally expressed as concentrations (kg/m3) whereas eco-profiles want the total annual loading (kg/year). Companies can often make the conversion using internal conversion factors, but there is no standarisation of these factors across Europe. Besides, issues such as weighing errors, materials in transit, stock changes and so on, make it difficult to maintain absolutely accurate records.

## Data treatment and extrapolations
Missing data are substituted by the average value calculated from the data supplied by those plants that made positive returns. Thus, for example, suppose that three plants with the same output volume fill in questionnaires. For one of the parameters, one plant returns a value of 1 mg, the second plant returns a value of 2 mg and the third is unable to provide the data. The average from the two plants returning data is 1.5 mg and this value is substituted in place of the missing data for the third plant.

## Sampling procedure
The data are collected from participating companies for the performance characteristics of their plants through questionnaires. Most of the information supplied is derived from the records that are already kept by companies and plants.

## Use advice
The LCI data set should be used for LCI/ LCA studies where glass filled PA66 is used along the production chain of a product. Typical uses of glass filled nylon 66 are: Radiator end tanks, air intake manifolds, covers of various types etc.

## Data sources
- Boustead Model
- Ecoprofile Nylon66g

## Intended applications
Provide well documented, high quality, up-to-date and industry representative LCI data sets for any kind of LCA study. In order to elaborate the reports, some objectives shall be defined: target generic data which could be used to optimise the management of plastics waste (facilitates choosing among options such as mechanical recycling, reuse as a petrochemical raw material and use as a substitute fuel, and provide sufficient data to investigate alternative solutions for regulatory compliance), compile average industry data which could be used for internal company benchmarking allowing individual process improvement (leading to elimination of poor sections of processes, improvements by addition of waste treatment sections), include sufficient data which could be used by customers for product development against environmental criteria to (allow evaluation of the plastics contribution relative to the overall product, enable collaboration with recovery procedures to reduce collective impacts, draw attention to poor environmental links in user chains, which can lead to subsequent improvement). It was also important to provide neutral, objective, quantitative information with no attempt at interpretation, so that only explanations on how the data were generated need be given.
